# OpenSim document version 30000
Model pendulum:
  credits: Ajay Seth
  publications: For testing
  length_units: meters
  force_units: N
  gravity: 0 -9.81 0
  BodySet:
    Body ground: mass=0 mass_center=(0 0 0) inertia_xx=0 inertia_yy=0 inertia_zz=0 meshes=Unassigned
    Body rod1: mass=1 mass_center=(0 -1 0) inertia_xx=0 inertia_yy=0 inertia_zz=0 meshes=(cylinder.vtp sphere.vtp)
      PinJoint pin1: parent_body=ground location_in_parent=(0 0 0) location=(0 0 0)
        Coordinate q1: motion_type=rotational default_value=0 range=(-Inf Inf) clamped=false
  ForceSet:
    CoordinateActuator Torq1: coordinate=q1 optimal_force=1
  ControllerSet Controllers:
    PrescribedController OptCntrl_Torq1: actuator_list=Torq1
      FunctionSet ControlFunctions: Constant(value=1)
