# OpenSim document version 30000
Model muscle-mass11:
  credits: Ajay Seth
  publications: For testing
  length_units: meters
  force_units: N
  gravity: -9.80665 0 0
  BodySet:
    Body ground: mass=0 mass_center=(0 0 0) inertia_xx=0 inertia_yy=0 inertia_zz=0 meshes=Unassigned
    Body mass: mass=10 mass_center=(0 0 0) inertia_xx=0 inertia_yy=0 inertia_zz=0 meshes=sphere.vtp
      SliderJoint slider1: parent_body=ground location_in_parent=(0 0 0) location=(0 0 0)
        Coordinate q1: motion_type=translational default_value=-0.1 range=(-Inf Inf) clamped=false
  ForceSet:
    Thelen2003Muscle Muscle: min_control=0.05 max_control=1 optimal_force=1 max_isometric_force=500
        optimal_fiber_length=0.1138 tendon_slack_length=0.098 pennation_angle_at_optimal=0 [radians]
        max_contraction_velocity=10 activation_time_constant=1e-5 deactivation_time_constant=1e-5
        FmaxTendonStrain=0.033 FmaxMuscleStrain=0.6 KshapeActive=0.5 KshapePassive=4 Af=0.3 Flen=1.8
      PathPoint P1: ground (0.1 0 0)
      PathPoint P2: mass (0 0 0)
  ControllerSet Controllers:
    PrescribedController OptCntrl_Torq1: actuator_list=Muscle
      FunctionSet ControlFunctions: Constant(value=0.2)
