# OpenSim document version 30000
Model arm28_optimize:
  publications: .
  length_units: meters
  force_units: N
  gravity: 0 -9.80665 0
  credits:
    The OpenSim Development Team (Reinbolt, J; Seth, A; Habib, A; Hamner, S) adapted from a model originally created by Kate Holzbaur (11/22/04) Hamner removed wrapping surfaces for improved performance. License: Creative Commons (CCBY 3.0). You are free to distribute, remix, tweak, and build upon this work, even commercially, as long as you credit us for the original creation. http://creativecommons.org/licenses/by/3.0/
  BodySet:
    Body ground: mass=0 mass_center=(0 0 0) inertia_xx=0 inertia_yy=0 inertia_zz=0
        meshes=(ground_ribs.vtp ground_spine.vtp ground_skull.vtp ground_jaw.vtp ground_r_clavicle.vtp ground_r_scapula.vtp)
      WrapEllipsoid DeltPostWrap: xyz_body_rotation=(1.57 0 0) translation=(-0.017545 0.1 0.152) quadrant=y
          dimensions=(0.05 0.2 0.15)
      WrapEllipsoid DeltAntWrap: xyz_body_rotation=(1.57 0 0) translation=(-0.13 0 0.14) quadrant=y
          dimensions=(0.15 0.5 0.05)
    Body r_humerus: mass=1.864572 mass_center=(0 -0.180496 0) inertia_xx=0.01481 inertia_yy=0.004551
        inertia_zz=0.013193 meshes=arm_r_humerus.vtp
      CustomJoint r_shoulder: parent_body=ground location_in_parent=(-0.017545 -0.007 0.17) location=(0 0 0)
        Coordinate r_shoulder_elev: motion_type=rotational default_value=0 range=(-1.22 2.79) clamped=false
        SpatialTransform: axes_held_at_zero=(rotation1 rotation2 translation1 translation2 translation3)
          TransformAxis rotation3: coordinates=r_shoulder_elev axis=(-0.05889802 0.0023 0.9982614)
              LinearFunction(coefficients=1 0)
    Body r_ulna_radius_hand: mass=1.534315 mass_center=(0 -0.181479 0) inertia_xx=0.019281 inertia_yy=0.001571
        inertia_zz=0.020062
        meshes=(arm_r_ulna.vtp arm_r_radius.vtp arm_r_lunate.vtp arm_r_scaphoid.vtp arm_r_pisiform.vtp arm_r_triquetrum.vtp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)
      CustomJoint r_elbow: parent_body=r_humerus location_in_parent=(0.0061 -0.2904 -0.0123) location=(0 0 0)
        Coordinate r_elbow_flex: motion_type=rotational default_value=0.3490659 range=(0 2.268928) clamped=false
        SpatialTransform: axes_held_at_zero=(rotation1 rotation2 translation1 translation2 translation3)
          TransformAxis rotation3: coordinates=r_elbow_flex axis=(0.04940001 0.03660001 0.9981083)
              LinearFunction(coefficients=1 0)
  ForceSet:
    Thelen2003Muscle [values shared by the 8 below unless stated]: min_control=0.05 max_control=1 optimal_force=1
        max_contraction_velocity=10 activation_time_constant=0.01 deactivation_time_constant=0.04
        FmaxTendonStrain=0.033 FmaxMuscleStrain=0.6 KshapeActive=0.5 KshapePassive=4 Af=0.3 Flen=1.8
    Thelen2003Muscle TRIlong: max_isometric_force=798.52 optimal_fiber_length=0.134 tendon_slack_length=0.143
        pennation_angle_at_optimal=0.2094395 [radians] default_activation=0.05 default_fiber_length=0.1438659
      PathPoint P1: ground (-0.05365 -0.01373 0.14723)
      PathPoint P2: r_humerus (-0.02714 -0.11441 -0.00664)
      PathPoint P3: r_humerus (-0.03184 -0.22637 -0.01217)
      PathPoint P4: r_humerus (-0.01743 -0.26757 -0.01208)
      PathPoint P5: r_ulna_radius_hand (-0.0219 0.01046 -0.00078)
    Thelen2003Muscle TRIlat: max_isometric_force=624.3 optimal_fiber_length=0.1138 tendon_slack_length=0.098
        pennation_angle_at_optimal=0.1570796 default_activation=0.05 default_fiber_length=0.07785696
      PathPoint P1: r_humerus (-0.00599 -0.12646 0.00428)
      PathPoint P2: r_humerus (-0.02344 -0.14528 0.00928)
      PathPoint P3: r_humerus (-0.03184 -0.22637 -0.01217)
      PathPoint P4: r_humerus (-0.01743 -0.26757 -0.01208)
      PathPoint P5: r_ulna_radius_hand (-0.0219 0.01046 -0.00078)
    Thelen2003Muscle TRImed: max_isometric_force=624.3 optimal_fiber_length=0.1138 tendon_slack_length=0.0908
        pennation_angle_at_optimal=0.1570796 default_activation=0.05 default_fiber_length=0.07291275
      PathPoint P1: r_humerus (-0.00838 -0.13695 -0.00906)
      PathPoint P2: r_humerus (-0.02601 -0.15139 -0.0108)
      PathPoint P3: r_humerus (-0.03184 -0.22637 -0.01217)
      PathPoint P4: r_humerus (-0.01743 -0.26757 -0.01208)
      PathPoint P5: r_ulna_radius_hand (-0.0219 0.01046 -0.00078)
    Thelen2003Muscle BIClong: max_isometric_force=624.3 optimal_fiber_length=0.1157 tendon_slack_length=0.2723
        pennation_angle_at_optimal=0 default_activation=0.08940645 default_fiber_length=0.1394763
      PathPoint P1: ground (-0.039235 0.00347 0.14795)
      PathPoint P2: ground (-0.028945 0.01391 0.15639)
      PathPoint P3: r_humerus (0.02131 0.01793 0.01028)
      PathPoint P4: r_humerus (0.02378 -0.00511 0.01201)
      PathPoint P5: r_humerus (0.01345 -0.02827 0.00136)
      PathPoint P6: r_humerus (0.01068 -0.07736 -0.00165)
      PathPoint P7: r_humerus (0.01703 -0.12125 0.00024)
      PathPoint P8: r_humerus (0.0228 -0.1754 -0.0063)
      PathPoint P9: r_ulna_radius_hand (0.00751 -0.04839 0.02179)
    Thelen2003Muscle BICshort: max_isometric_force=435.56 optimal_fiber_length=0.1321 tendon_slack_length=0.1923
        pennation_angle_at_optimal=0 default_activation=0.1071816 default_fiber_length=0.1413465
      PathPoint P1: ground (0.004675 -0.01231 0.13475)
      PathPoint P2: ground (-0.007075 -0.04004 0.14507)
      PathPoint P3: r_humerus (0.01117 -0.07576 -0.01101)
      PathPoint P4: r_humerus (0.01703 -0.12125 -0.01079)
      PathPoint P5: r_humerus (0.0228 -0.1754 -0.0063)
      PathPoint P6: r_ulna_radius_hand (0.00751 -0.04839 0.02179)
    Thelen2003Muscle BRA: max_isometric_force=987.26 optimal_fiber_length=0.0858 tendon_slack_length=0.0535
        pennation_angle_at_optimal=0 default_activation=0.05198892 default_fiber_length=0.08637751
      PathPoint P1: r_humerus (0.0068 -0.1739 -0.0036)
      PathPoint P2: r_ulna_radius_hand (-0.0032 -0.0239 0.0009)
    Thelen2003Muscle DeltAnt: max_isometric_force=16000 optimal_fiber_length=0.16 tendon_slack_length=0.05
        pennation_angle_at_optimal=0 default_activation=0.05 default_fiber_length=0.1619683
      PathPoint DeltA-P1: ground (-0.05 0.07 0.15)
      PathPoint DeltB-P2: r_humerus (0.01 -0.1 0.004)
      PathWrap: wrap_object=DeltAntWrap method=hybrid
    Thelen2003Muscle DeltPost: max_isometric_force=5000 optimal_fiber_length=0.108 tendon_slack_length=0.0535
        pennation_angle_at_optimal=0 default_activation=0.1076825 default_fiber_length=0.1083673
      PathPoint DeltB-P1: ground (-0.08 0.02 0.15)
      PathPoint DeltB-P2: r_humerus (-0.01 -0.125 0.004)
      PathWrap: wrap_object=DeltPostWrap method=hybrid
  MarkerSet:
    Marker r_acromion: ground (-0.01256 0.04 0.17)
    Marker r_humerus_epicondyle: r_humerus (0.005 -0.2904 0.03)
    Marker r_radius_styloid: r_ulna_radius_hand (-0.0011 -0.23559 0.0943)
  ControllerSet Controllers:
    PrescribedController OptCntrl_TRIlong: actuator_list=TRIlong
      FunctionSet ControlFunctions:
        SimmSpline: x=(0 0.03 0.031 0.032 0.033 0.034 0.035 0.036 0.037 0.038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)
            y=(0.05 0.0505986 0.0511471 0.0516279 0.0520395 0.0523631 0.0526474 0.0528951 0.0530862 0.053257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)
    PrescribedController OptCntrl_TRIlat: actuator_list=TRIlat
      FunctionSet ControlFunctions:
        SimmSpline: x=(0 0.03 0.031 0.032 0.033 0.034 0.035 0.036 0.037 0.038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)
            y=(0.05 0.0503165 0.0506067 0.0508612 0.0510791 0.0512504 0.0514009 0.051532 0.051633 0.0517234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)
    PrescribedController OptCntrl_TRImed: actuator_list=TRImed
      FunctionSet ControlFunctions:
        SimmSpline: x=(0 0.03 0.031 0.032 0.033 0.034 0.035 0.036 0.037 0.038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)
            y=(0.05 0.0503175 0.0506086 0.0508639 0.0510825 0.0512543 0.0514053 0.0515368 0.0516382 0.0517288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)
    PrescribedController OptCntrl_BIClong: actuator_list=BIClong
      FunctionSet ControlFunctions:
        SimmSpline: x=(0 0.03 0.031 0.032 0.033 0.034 0.035 0.036 0.037 0.038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)
            y=(0.0525174 0.0524841 0.0524485 0.0524133 0.0523786 0.0523446 0.0523109 0.0522776 0.052245 0.0522128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)
    PrescribedController OptCntrl_BICshort: actuator_list=BICshort
      FunctionSet ControlFunctions:
        SimmSpline: x=(0 0.03 0.031 0.032 0.033 0.034 0.035 0.036 0.037 0.038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)
            y=(0.0629317 0.0627538 0.0625664 0.0623811 0.0621984 0.0620194 0.0618426 0.0616678 0.0614969 0.0613278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)
    PrescribedController OptCntrl_BRA: actuator_list=BRA
      FunctionSet ControlFunctions:
        SimmSpline: x=(0 0.03 0.031 0.032 0.033 0.034 0.035 0.036 0.037 0.038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)
            y=(0.0526527 0.0526433 0.0526341 0.052625 0.052616 0.0526071 0.0525984 0.0525898 0.0525813 0.052573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)
    PrescribedController OptCntrl_DeltAnt: actuator_list=DeltAnt
      FunctionSet ControlFunctions:
        SimmSpline: x=(0 0.03 0.031 0.032 0.033 0.034 0.035 0.036 0.037 0.038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)
            y=(0.05 0.05 0.05 0.05 0.05 0.05 0.05 0.05 0.05 0.05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)
    PrescribedController OptCntrl_DeltPost: actuator_list=DeltPost
      FunctionSet ControlFunctions:
        SimmSpline: x=(0 0.03 0.031 0.032 0.033 0.034 0.035 0.036 0.037 0.038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)
            y=(0.331024 0.330751 0.330485 0.330225 0.329971 0.329725 0.329484 0.329247 0.329019 0.328795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)
