# OpenSim document version 20302
CMCTool arm28:
  model_file: Arm28_Optimize.osim
  replace_force_set: false
  results_directory: Results_ShoulderExtention
  output_precision: 8
  initial_time: 0
  final_time: 2
  solve_for_equilibrium_for_auxiliary_states: true
  maximum_number_of_integrator_steps: 20000
  maximum_integrator_step_size: 1
  minimum_integrator_step_size: 1e-7
  integrator_error_tolerance: 1e-5
  desired_kinematics_file: arm26_InverseKinematics_ShoulderExtention.mot
  task_set_file: arm26_ComputedMuscleControl_Tasks.xml
  lowpass_cutoff_frequency: 6
  cmc_time_window: 0.01
  use_fast_optimization_target: true
  optimizer_algorithm: ipopt
  optimizer_derivative_dx: 0.0001
  optimizer_convergence_criterion: 0.000001
  optimizer_max_iterations: 1000
  optimizer_print_level: 0
  use_verbose_printing: false
  AnalysisSet Analyses:
    Kinematics: start_time=-infinity end_time=infinity step_interval=10 in_degrees=true coordinates=all
    Actuation: start_time=-infinity end_time=infinity step_interval=10 in_degrees=true
