# OpenSim document version 10600
Model UpperLower Body Simple Model:
  angle_units: radians
  credits:
    Menegolo Andrea
    IMPORTANT NOTE: The geometry files included in the ULB_Project.zip file have similar names but different reference frames from the ones included in the OpenSim distribution.
    Please, include the Geometry directory from this model in the front of your GeometryPath.
  publications:
    Delp, S.L., Loan, J.P., Hoy, M.G., Zajac, F.E., Topp E.L., Rosen, J.M.: An interactive graphics-based model of the lower extremity to study orthopaedic surgical procedures, IEEE Transactions on Biomedical Engineering, vol. 37, pp. 757-767, 1990.
    Yamaguchi G.T., Zajac F.E.: A planar model of the knee joint to characterize the knee extensor mechanism." J . Biomecl7. vol. 21. pp. 1-10. 1989.
    Anderson F.C., Pandy M.G.: A dynamic optimization solution for vertical jumping in three dimensions. Computer Methods in Biomechanics and Biomedical Engineering 2:201-231, 1999.
    Anderson F.C., Pandy M.G.: Dynamic optimization of human walking. Journal of Biomechanical Engineering 123:381-390, 2001.
    Delp SL, Anderson FC, Arnold AS, Loan P, Habib A, John CT, Guendelman E, Thelen DG (in press). OpenSim: Open-source Software to Create and Analyze Dynamic Simulations of Movement. IEEE Transactions on Biomedical Engineering. (2007)
    Holzbaur KR, Murray WM, Delp SL.: A model of the upper extremity for simulating musculoskeletal surgery and analyzing neuromuscular control., Ann Biomed Eng. 2005 Jun;33(6):829-40. (2005)
  defaults:
    Schutte1993Muscle defaultmuscle: max_isometric_force=546 optimal_fiber_length=0.0535 tendon_slack_length=0.078
        pennation_angle=0.1396263 max_contraction_velocity=0
      tendon_force_length_curve: natCubicSpline: x=(-10 -0.002 -0.001 0 0.00131 0.00281 0.00431 0.00581 0.00731 0.00881 0.0103 0.0118 0.0123 9.2 9.201 9.202 20)
          y=(0 0 0 0 0.0108 0.0257 0.0435 0.0652 0.0915 0.123 0.161 0.208 0.227 345 345 345 345)
      active_force_length_curve: natCubicSpline: x=(-35 0 0.401 0.402 0.4035 0.52725 0.62875 0.71875 0.86125 1.045 1.2175 1.43875 1.61875 1.62 1.621 2.2 35)
          y=(0 0 0 0 0 0.226667 0.636667 0.856667 0.95 0.993333 0.77 0.246667 0 0 0 0 0)
      passive_force_length_curve: natCubicSpline: x=(-35 0.998 0.999 1.15 1.25 1.35 1.45 1.55 1.65 1.75 1.7501 1.7502 35)
          y=(0 0 0 0 0.035 0.12 0.26 0.55 1.17 2 2 2 2)
    Thelen2003Muscle defaultmuscle: max_isometric_force=546 optimal_fiber_length=0.0535 tendon_slack_length=0.078
        pennation_angle=0.1396263 max_contraction_velocity=0
      tendon_force_length_curve: natCubicSpline: x=(-10 -0.002 -0.001 0 0.00131 0.00281 0.00431 0.00581 0.00731 0.00881 0.0103 0.0118 0.0123 9.2 9.201 9.202 20)
          y=(0 0 0 0 0.0108 0.0257 0.0435 0.0652 0.0915 0.123 0.161 0.208 0.227 345 345 345 345)
      active_force_length_curve: natCubicSpline: x=(-35 0 0.401 0.402 0.4035 0.52725 0.62875 0.71875 0.86125 1.045 1.2175 1.43875 1.61875 1.62 1.621 2.2 35)
          y=(0 0 0 0 0 0.226667 0.636667 0.856667 0.95 0.993333 0.77 0.246667 0 0 0 0 0)
      passive_force_length_curve: natCubicSpline: x=(-35 0.998 0.999 1.15 1.25 1.35 1.45 1.55 1.65 1.75 1.7501 1.7502 35)
          y=(0 0 0 0 0.035 0.12 0.26 0.55 1.17 2 2 2 2)
  ActuatorSet:
    ObjectGroup R_hip_abd: members=(glut_max1_r glut_med1_r glut_med2_r glut_med3_r peri_r sar_r tfl_r)
    ObjectGroup R_hip_flex: members=(glut_med1_r grac_r iliacus_r pect_r psoas_r rect_fem_r sar_r tfl_r)
    ObjectGroup R_hip_inrot: members=(glut_med1_r iliacus_r psoas_r tfl_r)
    ObjectGroup R_hip_exrot: members=(gem_r glut_med3_r peri_r quad_fem_r)
    ObjectGroup R_hip_ext: members=(add_mag2_r bifemlh_r glut_max1_r glut_max2_r glut_max3_r glut_med3_r)
    ObjectGroup R_hip_add: members=(add_mag2_r bifemlh_r grac_r pect_r)
    ObjectGroup R_knee_bend: members=(bifemlh_r bifemsh_r grac_r med_gas_r sar_r)
    ObjectGroup R_knee_ext: members=(rect_fem_r vas_int_r)
    ObjectGroup R_ankle_pf: members=(med_gas_r soleus_r tib_post_r)
    ObjectGroup R_inverter: members=(tib_ant_r tib_post_r)
    ObjectGroup R_ankle_df: members=tib_ant_r
    ObjectGroup L_hip_abd: members=(glut_max1_l glut_med1_l glut_med2_l glut_med3_l peri_l sar_l tfl_l)
    ObjectGroup L_hip_flex: members=(glut_med1_l grac_l iliacus_l pect_l psoas_l rect_fem_l sar_l tfl_l)
    ObjectGroup L_hip_inrot: members=(glut_med1_l iliacus_l psoas_l tfl_l)
    ObjectGroup L_hip_exrot: members=(gem_l glut_med3_l peri_l quad_fem_l)
    ObjectGroup L_hip_ext: members=(add_mag2_l bifemlh_l glut_max1_l glut_max2_l glut_max3_l glut_med3_l)
    ObjectGroup L_hip_add: members=(add_mag2_l bifemlh_l grac_l pect_l)
    ObjectGroup L_knee_bend: members=(bifemlh_l bifemsh_l grac_l med_gas_l sar_l)
    ObjectGroup L_knee_ext: members=(rect_fem_l vas_int_l)
    ObjectGroup L_ankle_pf: members=(med_gas_l soleus_l tib_post_l)
    ObjectGroup L_inverter: members=(tib_ant_l tib_post_l)
    ObjectGroup L_ankle_df: members=tib_ant_l
    ObjectGroup back_ext: members=(ercspn_l ercspn_r)
    ObjectGroup back_rlb: members=(ercspn_r extobl_r intobl_r)
    ObjectGroup back_introt: members=(ercspn_r extobl_l intobl_r)
    ObjectGroup back_llb: members=(ercspn_l extobl_l intobl_l)
    ObjectGroup back_extrot: members=(ercspn_l extobl_r intobl_l)
    ObjectGroup back_flex: members=(extobl_l extobl_r intobl_l intobl_r)
    ObjectGroup shoulder: members=(CORB DELT1 DELT2 DELT3 INFSP LAT1 LAT2 LAT3 PECM1 PECM2 PECM3 SUBSC SUPSP TMAJ TMIN)
    ObjectGroup elbow: members=(ANC BIClong BICshort BRA BRD ECRL PT TRIlat TRIlong TRImed)
    ObjectGroup wrist: members=(ECRB ECU FCR FCU)
    ObjectGroup shoulder_l: members=(CORB_l DELT1_l DELT2_l DELT3_l INFSP_l LAT1_l LAT2_l LAT3_l PECM1_l PECM2_l PECM3_l SUBSC_l SUPSP_l TMAJ_l TMIN_l)
    ObjectGroup elbow_l: members=(ANC_l BIClong_l BICshort_l BRA_l BRD_l ECRL_l PT_l TRIlat_l TRIlong_l TRImed_l)
    ObjectGroup wrist_l: members=(ECRB_l ECU_l FCR_l FCU_l)
    Thelen2003Muscle glut_med1_r: max_isometric_force=1119 optimal_fiber_length=0.0535 tendon_slack_length=0.078
        pennation_angle=0.1396263 muscle_model=9
      MusclePoint: pelvis (-0.0408 0.0304 0.1209)
      MusclePoint: femur_r (-0.0218 -0.0117 0.0555)
    Thelen2003Muscle glut_med2_r: max_isometric_force=873 optimal_fiber_length=0.0845 tendon_slack_length=0.053
        pennation_angle=0 muscle_model=9
      MusclePoint: pelvis (-0.0855 0.0445 0.0766)
      MusclePoint: femur_r (-0.0258 -0.0058 0.0527)
    Thelen2003Muscle glut_med3_r: max_isometric_force=1000 optimal_fiber_length=0.0646 tendon_slack_length=0.053
        pennation_angle=0.3316126 muscle_model=9
      MusclePoint: pelvis (-0.1223 0.0105 0.0648)
      MusclePoint: femur_r (-0.0309 -0.0047 0.0518)
    Thelen2003Muscle bifemlh_r: max_isometric_force=2700 optimal_fiber_length=0.109 tendon_slack_length=0.326
        pennation_angle=0 muscle_model=9
      MusclePoint: pelvis (-0.12596 -0.10257 0.06944)
      MusclePoint: tibia_r (-0.0301 -0.036 0.02943)
      MusclePoint: tibia_r (-0.0234 -0.0563 0.0343)
    Thelen2003Muscle bifemsh_r: max_isometric_force=804 optimal_fiber_length=0.173 tendon_slack_length=0.089
        pennation_angle=0.4014257 muscle_model=9
      MusclePoint: femur_r (0.005 -0.2111 0.0234)
      MusclePoint: tibia_r (-0.0301 -0.036 0.02943)
      MusclePoint: tibia_r (-0.0234 -0.0563 0.0343)
    Thelen2003Muscle sar_r: max_isometric_force=156 optimal_fiber_length=0.52 tendon_slack_length=0.1 pennation_angle=0
        muscle_model=9
      MusclePoint: pelvis (-0.0153 -0.0013 0.1242)
      MusclePoint: femur_r (-0.003 -0.3568 -0.0421)
      MusclePoint: tibia_r (-0.0056 -0.0419 -0.0399)
      MusclePoint: tibia_r (0.006 -0.0589 -0.0383)
      MusclePoint: tibia_r (0.0243 -0.084 -0.0252)
    Thelen2003Muscle add_mag2_r: max_isometric_force=2343 optimal_fiber_length=0.121 tendon_slack_length=0.12
        pennation_angle=0.05235988 muscle_model=9
      MusclePoint: pelvis (-0.0831 -0.1192 0.0308)
      MusclePoint: femur_r (0.0054 -0.2285 0.0227)
    Thelen2003Muscle tfl_r: max_isometric_force=233 optimal_fiber_length=0.095 tendon_slack_length=0.425
        pennation_angle=0.05235988 muscle_model=9
      MusclePoint: pelvis (-0.0311 0.0214 0.1241)
      MusclePoint: femur_r (0.0294 -0.0995 0.0597)
      MusclePoint: femur_r (0.0054 -0.4049 0.0357)
      MusclePoint: tibia_r (0.006 -0.0487 0.0297)
    Thelen2003Muscle pect_r: max_isometric_force=266 optimal_fiber_length=0.1 tendon_slack_length=0.033
        pennation_angle=0 muscle_model=9
      MusclePoint: pelvis (-0.0431 -0.0768 0.0451)
      MusclePoint: femur_r (-0.0122 -0.0822 0.0253)
    Thelen2003Muscle grac_r: max_isometric_force=162 optimal_fiber_length=0.352 tendon_slack_length=0.126
        pennation_angle=0.05235988 muscle_model=9
      MusclePoint: pelvis (-0.07401 -0.1187 0.02794)
      MuscleViaPoint: tibia_r (-0.02657 -0.0319 -0.03774) coordinate=knee_angle_r range=(-0.4363323 0.1745329)
      MusclePoint: tibia_r (-0.01943 -0.05153 -0.0358)
      MusclePoint: tibia_r (0.006 -0.0836 -0.0228)
    Thelen2003Muscle glut_max1_r: max_isometric_force=573 optimal_fiber_length=0.142 tendon_slack_length=0.125
        pennation_angle=0.08726646 muscle_model=9
      MusclePoint: pelvis (-0.1195 0.0612 0.07)
      MusclePoint: pelvis (-0.1291 0.0012 0.0886)
      MusclePoint: femur_r (-0.0457 -0.0248 0.0392)
      MusclePoint: femur_r (-0.0277 -0.0566 0.047)
    Thelen2003Muscle glut_max2_r: max_isometric_force=819 optimal_fiber_length=0.147 tendon_slack_length=0.127
        pennation_angle=0 muscle_model=9
      MusclePoint: pelvis (-0.1349 0.0176 0.0563)
      MusclePoint: pelvis (-0.1376 -0.052 0.0914)
      MusclePoint: femur_r (-0.0426 -0.053 0.0293)
      MusclePoint: femur_r (-0.0156 -0.1016 0.0419)
    Thelen2003Muscle glut_max3_r: max_isometric_force=552 optimal_fiber_length=0.144 tendon_slack_length=0.145
        pennation_angle=0.08726646 muscle_model=9
      MusclePoint: pelvis (-0.1556 -0.0314 0.0058)
      MusclePoint: pelvis (-0.1529 -0.1052 0.0403)
      MusclePoint: femur_r (-0.0299 -0.1041 0.0135)
      MusclePoint: femur_r (-0.006 -0.1419 0.0411)
    Thelen2003Muscle iliacus_r: max_isometric_force=1073 optimal_fiber_length=0.1 tendon_slack_length=0.1
        pennation_angle=0.122173 muscle_model=9
      MusclePoint: pelvis (-0.0674 0.0365 0.0854)
      MusclePoint: pelvis (-0.0258 -0.055 0.0811)
      MuscleViaPoint: pelvis (-0.0288 -0.0805 0.0816) coordinate=hip_flexion_r range=(-1.570796 0.7853982)
      MusclePoint: femur_r (0.0017 -0.0543 0.0057)
      MusclePoint: femur_r (-0.0193 -0.0621 0.0129)
    Thelen2003Muscle psoas_r: max_isometric_force=1113 optimal_fiber_length=0.1 tendon_slack_length=0.16
        pennation_angle=0.1396263 muscle_model=9
      MusclePoint: pelvis (-0.0647 0.0887 0.0289)
      MusclePoint: pelvis (-0.0238 -0.057 0.0759)
      MuscleViaPoint: pelvis (-0.0288 -0.0805 0.0816) coordinate=hip_flexion_r range=(-1.570796 0.7853982)
      MusclePoint: femur_r (0.0016 -0.0507 0.0038)
      MusclePoint: femur_r (-0.0188 -0.0597 0.0104)
    Thelen2003Muscle quad_fem_r: max_isometric_force=381 optimal_fiber_length=0.054 tendon_slack_length=0.024
        pennation_angle=0 muscle_model=9
      MusclePoint: pelvis (-0.1143 -0.1151 0.052)
      MusclePoint: femur_r (-0.0381 -0.0359 0.0366)
    Thelen2003Muscle gem_r: max_isometric_force=164 optimal_fiber_length=0.024 tendon_slack_length=0.039
        pennation_angle=0 muscle_model=9
      MusclePoint: pelvis (-0.1133 -0.082 0.0714)
      MusclePoint: femur_r (-0.0142 -0.0033 0.0443)
    Thelen2003Muscle peri_r: max_isometric_force=444 optimal_fiber_length=0.026 tendon_slack_length=0.115
        pennation_angle=0.1745329 muscle_model=9
      MusclePoint: pelvis (-0.1396 0.0003 0.0235)
      MusclePoint: pelvis (-0.1193 -0.0276 0.0657)
      MusclePoint: femur_r (-0.0148 -0.0036 0.0437)
    Thelen2003Muscle rect_fem_r: max_isometric_force=1169 optimal_fiber_length=0.114 tendon_slack_length=0.31
        pennation_angle=0.08726646 muscle_model=9
      MusclePoint: pelvis (-0.0295 -0.0311 0.0968)
      MuscleViaPoint: femur_r (0.0334 -0.403 0.0019) coordinate=knee_angle_r range=(-2.617994 -1.459968)
      MovingMusclePoint: tibia_r x_coordinate=knee_angle_r y_coordinate=knee_angle_r z_coordinate=knee_angle_r
        XAttachment:
          natCubicSpline: x=(-2.094395 -1.999973 -1.570796 -1.457524 -1.396263 -1.047198 -0.6981317 -0.5263913 -0.3490659 -0.1745329 0 0.0001745329 0.0003490659 0.02792527 0.08726646 0.1745329 2.094395)
              y=(0.0155805 0.01799382 0.0275081 0.02965635 0.03076155 0.03656953 0.04220742 0.04509018 0.048391 0.05342993 0.06175755 0.06176687 0.0617762 0.06330831 0.06699396 0.07330346 0.05734807)
        YAttachment:
          natCubicSpline: x=(-2.094395 -1.999973 -1.570796 -1.457524 -1.396263 -1.047198 -0.6981317 -0.5263913 -0.3490659 -0.1745329 0 0.0001745329 0.0003490659 0.02792527 0.08726646 0.1745329 2.094395)
              y=(0.02341162 0.02376131 0.02511413 0.02527948 0.02531463 0.0249184 0.02423731 0.02384473 0.02341972 0.0227644 0.02098402 0.02098143 0.02097883 0.02052247 0.01917541 0.01595544 -0.06737737)
        ZAttachment:
          natCubicSpline: x=(-2.0944 0.1745) y=(0.0014 0.0014)
    Thelen2003Muscle vas_int_r: max_isometric_force=5000 optimal_fiber_length=0.107 tendon_slack_length=0.116
        pennation_angle=0.05235988 muscle_model=9
      MusclePoint: femur_r (0.029 -0.1924 0.031)
      MusclePoint: femur_r (0.0335 -0.2084 0.0285)
      MuscleViaPoint: femur_r (0.0343 -0.403 0.0055) coordinate=knee_angle_r range=(-2.617994 -1.42)
      MovingMusclePoint: tibia_r x_coordinate=knee_angle_r y_coordinate=knee_angle_r z_coordinate=knee_angle_r
        XAttachment:
          natCubicSpline: x=(-2.094395 -1.999973 -1.570796 -1.457524 -1.396263 -1.047198 -0.6981317 -0.5263913 -0.3490659 -0.1745329 0 0.0001745329 0.0003490659 0.02792527 0.08726646 0.1745329 2.094395)
              y=(0.008273297 0.01068662 0.02020416 0.02235298 0.02345827 0.02927151 0.03494648 0.03787104 0.04125689 0.04652869 0.05546322 0.05547346 0.05548371 0.05717169 0.06127199 0.06843685 0.06488175)
        YAttachment:
          natCubicSpline: x=(-2.094395 -1.999973 -1.570796 -1.457524 -1.396263 -1.047198 -0.6981317 -0.5263913 -0.3490659 -0.1745329 0 0.0001745329 0.0003490659 0.02792527 0.08726646 0.1745329 2.094395)
              y=(0.02559904 0.02594872 0.02731241 0.02747964 0.02751511 0.02713628 0.02657369 0.02630726 0.0261187 0.02601292 0.02529232 0.02529107 0.02528981 0.02505258 0.02421913 0.02182878 -0.06857056)
        ZAttachment:
          natCubicSpline: x=(-2.0944 2.0944) y=(0.0018 0.0018)
    Thelen2003Muscle med_gas_r: max_isometric_force=2500 optimal_fiber_length=0.09 tendon_slack_length=0.36
        pennation_angle=0.296706 muscle_model=9
      MusclePoint: femur_r (-0.019 -0.3929 -0.0235)
      MuscleViaPoint: femur_r (-0.03 -0.4022 -0.0258) coordinate=knee_angle_r range=(-0.7853982 0.1745329)
      MusclePoint: calcn_r (0 0.031 -0.0053)
    Thelen2003Muscle soleus_r: max_isometric_force=4000 optimal_fiber_length=0.08 tendon_slack_length=0.22
        pennation_angle=0.4363323 muscle_model=9
      MusclePoint: tibia_r (-0.0024 -0.1533 0.0071)
      MusclePoint: calcn_r (0 0.031 -0.0053)
    Thelen2003Muscle tib_post_r: max_isometric_force=3600 optimal_fiber_length=0.031 tendon_slack_length=0.31
        pennation_angle=0.2094395 muscle_model=9
      MusclePoint: tibia_r (-0.0094 -0.1348 0.0019)
      MusclePoint: tibia_r (-0.0144 -0.4051 -0.0229)
      MusclePoint: calcn_r (0.0417 0.0334 -0.0286)
      MusclePoint: calcn_r (0.0772 0.0159 -0.0281)
    Thelen2003Muscle tib_ant_r: max_isometric_force=3000 optimal_fiber_length=0.098 tendon_slack_length=0.223
        pennation_angle=0.08726646 muscle_model=9
      MusclePoint: tibia_r (0.0179 -0.1624 0.0115)
      MusclePoint: tibia_r (0.0329 -0.3951 -0.0177)
      MusclePoint: calcn_r (0.1166 0.0178 -0.0305)
    Thelen2003Muscle glut_med1_l: max_isometric_force=1119 optimal_fiber_length=0.0535 tendon_slack_length=0.078
        pennation_angle=0.1396263 muscle_model=9
      MusclePoint: pelvis (-0.0408 0.0304 -0.1209)
      MusclePoint: femur_l (-0.0218 -0.0117 -0.0555)
    Thelen2003Muscle glut_med2_l: max_isometric_force=873 optimal_fiber_length=0.0845 tendon_slack_length=0.053
        pennation_angle=0 muscle_model=9
      MusclePoint: pelvis (-0.0855 0.0445 -0.0766)
      MusclePoint: femur_l (-0.0258 -0.0058 -0.0527)
    Thelen2003Muscle glut_med3_l: max_isometric_force=1000 optimal_fiber_length=0.0646 tendon_slack_length=0.053
        pennation_angle=0.3316126 muscle_model=9
      MusclePoint: pelvis (-0.1223 0.0105 -0.0648)
      MusclePoint: femur_l (-0.0309 -0.0047 -0.0518)
    Thelen2003Muscle bifemlh_l: max_isometric_force=2700 optimal_fiber_length=0.109 tendon_slack_length=0.326
        pennation_angle=0 muscle_model=9
      MusclePoint: pelvis (-0.12596 -0.10257 -0.06944)
      MusclePoint: tibia_l (-0.0301 -0.036 -0.02943)
      MusclePoint: tibia_l (-0.0234 -0.0563 -0.0343)
    Thelen2003Muscle bifemsh_l: max_isometric_force=804 optimal_fiber_length=0.173 tendon_slack_length=0.089
        pennation_angle=0.4014257 muscle_model=9
      MusclePoint: femur_l (0.005 -0.2111 -0.0234)
      MusclePoint: tibia_l (-0.0301 -0.036 -0.02943)
      MusclePoint: tibia_l (-0.0234 -0.0563 -0.0343)
    Thelen2003Muscle sar_l: max_isometric_force=156 optimal_fiber_length=0.52 tendon_slack_length=0.1 pennation_angle=0
        muscle_model=9
      MusclePoint: pelvis (-0.0153 -0.0013 -0.1242)
      MusclePoint: femur_l (-0.003 -0.3568 0.0421)
      MusclePoint: tibia_l (-0.0056 -0.0419 0.0399)
      MusclePoint: tibia_l (0.006 -0.0589 0.0383)
      MusclePoint: tibia_l (0.0243 -0.084 0.0252)
    Thelen2003Muscle add_mag2_l: max_isometric_force=2343 optimal_fiber_length=0.121 tendon_slack_length=0.12
        pennation_angle=0.05235988 muscle_model=9
      MusclePoint: pelvis (-0.0831 -0.1192 -0.0308)
      MusclePoint: femur_l (0.0054 -0.2285 -0.0227)
    Thelen2003Muscle tfl_l: max_isometric_force=233 optimal_fiber_length=0.095 tendon_slack_length=0.425
        pennation_angle=0.05235988 muscle_model=9
      MusclePoint: pelvis (-0.0311 0.0214 -0.1241)
      MusclePoint: femur_l (0.0294 -0.0995 -0.0597)
      MusclePoint: femur_l (0.0054 -0.4049 -0.0357)
      MusclePoint: tibia_l (0.006 -0.0487 -0.0297)
    Thelen2003Muscle pect_l: max_isometric_force=266 optimal_fiber_length=0.1 tendon_slack_length=0.033
        pennation_angle=0 muscle_model=9
      MusclePoint: pelvis (-0.0431 -0.0768 -0.0451)
      MusclePoint: femur_l (-0.0122 -0.0822 -0.0253)
    Thelen2003Muscle grac_l: max_isometric_force=162 optimal_fiber_length=0.352 tendon_slack_length=0.126
        pennation_angle=0.05235988 muscle_model=9
      MusclePoint: pelvis (-0.07401 -0.1187 -0.02794)
      MuscleViaPoint: tibia_l (-0.02657 -0.0319 0.03774) coordinate=knee_angle_l range=(-0.4363323 0.1745329)
      MusclePoint: tibia_l (-0.01943 -0.05153 0.0358)
      MusclePoint: tibia_l (0.006 -0.0836 0.0228)
    Thelen2003Muscle glut_max1_l: max_isometric_force=573 optimal_fiber_length=0.142 tendon_slack_length=0.125
        pennation_angle=0.08726646 muscle_model=9
      MusclePoint: pelvis (-0.1195 0.0612 -0.07)
      MusclePoint: pelvis (-0.1291 0.0012 -0.0886)
      MusclePoint: femur_l (-0.0457 -0.0248 -0.0392)
      MusclePoint: femur_l (-0.0277 -0.0566 -0.047)
    Thelen2003Muscle glut_max2_l: max_isometric_force=819 optimal_fiber_length=0.147 tendon_slack_length=0.127
        pennation_angle=0 muscle_model=9
      MusclePoint: pelvis (-0.1349 0.0176 -0.0563)
      MusclePoint: pelvis (-0.1376 -0.052 -0.0914)
      MusclePoint: femur_l (-0.0426 -0.053 -0.0293)
      MusclePoint: femur_l (-0.0156 -0.1016 -0.0419)
    Thelen2003Muscle glut_max3_l: max_isometric_force=552 optimal_fiber_length=0.144 tendon_slack_length=0.145
        pennation_angle=0.08726646 muscle_model=9
      MusclePoint: pelvis (-0.1556 -0.0314 -0.0058)
      MusclePoint: pelvis (-0.1529 -0.1052 -0.0403)
      MusclePoint: femur_l (-0.0299 -0.1041 -0.0135)
      MusclePoint: femur_l (-0.006 -0.1419 -0.0411)
    Thelen2003Muscle iliacus_l: max_isometric_force=1073 optimal_fiber_length=0.1 tendon_slack_length=0.1
        pennation_angle=0.122173 muscle_model=9
      MusclePoint: pelvis (-0.0674 0.0365 -0.0854)
      MusclePoint: pelvis (-0.0258 -0.055 -0.0811)
      MuscleViaPoint: pelvis (-0.0288 -0.0805 -0.0816) coordinate=hip_flexion_l range=(-1.570796 0.7853982)
      MusclePoint: femur_l (0.0017 -0.0543 -0.0057)
      MusclePoint: femur_l (-0.0193 -0.0621 -0.0129)
    Thelen2003Muscle psoas_l: max_isometric_force=1113 optimal_fiber_length=0.1 tendon_slack_length=0.16
        pennation_angle=0.1396263 muscle_model=9
      MusclePoint: pelvis (-0.0647 0.0887 -0.0289)
      MusclePoint: pelvis (-0.0238 -0.057 -0.0759)
      MuscleViaPoint: pelvis (-0.0288 -0.0805 -0.0816) coordinate=hip_flexion_l range=(-1.570796 0.7853982)
      MusclePoint: femur_l (0.0016 -0.0507 -0.0038)
      MusclePoint: femur_l (-0.0188 -0.0597 -0.0104)
    Thelen2003Muscle quad_fem_l: max_isometric_force=381 optimal_fiber_length=0.054 tendon_slack_length=0.024
        pennation_angle=0 muscle_model=9
      MusclePoint: pelvis (-0.1143 -0.1151 -0.052)
      MusclePoint: femur_l (-0.0381 -0.0359 -0.0366)
    Thelen2003Muscle gem_l: max_isometric_force=164 optimal_fiber_length=0.024 tendon_slack_length=0.039
        pennation_angle=0 muscle_model=9
      MusclePoint: pelvis (-0.1133 -0.082 -0.0714)
      MusclePoint: femur_l (-0.0142 -0.0033 -0.0443)
    Thelen2003Muscle peri_l: max_isometric_force=444 optimal_fiber_length=0.026 tendon_slack_length=0.115
        pennation_angle=0.1745329 muscle_model=9
      MusclePoint: pelvis (-0.1396 0.0003 -0.0235)
      MusclePoint: pelvis (-0.1193 -0.0276 -0.0657)
      MusclePoint: femur_l (-0.0148 -0.0036 -0.0437)
    Thelen2003Muscle rect_fem_l: max_isometric_force=1169 optimal_fiber_length=0.114 tendon_slack_length=0.31
        pennation_angle=0.08726646 muscle_model=9
      MusclePoint: pelvis (-0.0295 -0.0311 -0.0968)
      MuscleViaPoint: femur_l (0.0334 -0.403 -0.0019) coordinate=knee_angle_l range=(-2.617994 -1.459968)
      MovingMusclePoint: tibia_l x_coordinate=knee_angle_l y_coordinate=knee_angle_l z_coordinate=knee_angle_l
        XAttachment:
          natCubicSpline: x=(-2.094395 -1.999973 -1.570796 -1.457524 -1.396263 -1.047198 -0.6981317 -0.5263913 -0.3490659 -0.1745329 0 0.0001745329 0.0003490659 0.02792527 0.08726646 0.1745329 2.094395)
              y=(0.0155805 0.01799382 0.0275081 0.02965635 0.03076155 0.03656953 0.04220742 0.04509018 0.048391 0.05342993 0.06175755 0.06176687 0.0617762 0.06330831 0.06699396 0.07330346 0.05734807)
        YAttachment:
          natCubicSpline: x=(-2.094395 -1.999973 -1.570796 -1.457524 -1.396263 -1.047198 -0.6981317 -0.5263913 -0.3490659 -0.1745329 0 0.0001745329 0.0003490659 0.02792527 0.08726646 0.1745329 2.094395)
              y=(0.02341162 0.02376131 0.02511413 0.02527948 0.02531463 0.0249184 0.02423731 0.02384473 0.02341972 0.0227644 0.02098402 0.02098143 0.02097883 0.02052247 0.01917541 0.01595544 -0.06737737)
        ZAttachment:
          natCubicSpline: x=(-2.0944 0.1745) y=(-0.0014 -0.0014)
    Thelen2003Muscle vas_int_l: max_isometric_force=5000 optimal_fiber_length=0.107 tendon_slack_length=0.116
        pennation_angle=0.05235988 muscle_model=9
      MusclePoint: femur_l (0.029 -0.1924 -0.031)
      MusclePoint: femur_l (0.0335 -0.2084 -0.0285)
      MuscleViaPoint: femur_l (0.0343 -0.403 -0.0055) coordinate=knee_angle_l range=(-2.617994 -1.42)
      MovingMusclePoint: tibia_l x_coordinate=knee_angle_l y_coordinate=knee_angle_l z_coordinate=knee_angle_l
        XAttachment:
          natCubicSpline: x=(-2.094395 -1.999973 -1.570796 -1.457524 -1.396263 -1.047198 -0.6981317 -0.5263913 -0.3490659 -0.1745329 0 0.0001745329 0.0003490659 0.02792527 0.08726646 0.1745329 2.094395)
              y=(0.008273297 0.01068662 0.02020416 0.02235298 0.02345827 0.02927151 0.03494648 0.03787104 0.04125689 0.04652869 0.05546322 0.05547346 0.05548371 0.05717169 0.06127199 0.06843685 0.06488175)
        YAttachment:
          natCubicSpline: x=(-2.094395 -1.999973 -1.570796 -1.457524 -1.396263 -1.047198 -0.6981317 -0.5263913 -0.3490659 -0.1745329 0 0.0001745329 0.0003490659 0.02792527 0.08726646 0.1745329 2.094395)
              y=(0.02559904 0.02594872 0.02731241 0.02747964 0.02751511 0.02713628 0.02657369 0.02630726 0.0261187 0.02601292 0.02529232 0.02529107 0.02528981 0.02505258 0.02421913 0.02182878 -0.06857056)
        ZAttachment:
          natCubicSpline: x=(-2.0944 2.0944) y=(-0.0018 -0.0018)
    Thelen2003Muscle med_gas_l: max_isometric_force=2500 optimal_fiber_length=0.09 tendon_slack_length=0.36
        pennation_angle=0.296706 muscle_model=9
      MusclePoint: femur_l (-0.019 -0.3929 0.0235)
      MuscleViaPoint: femur_l (-0.03 -0.4022 0.0258) coordinate=knee_angle_l range=(-0.7853982 0.1745329)
      MusclePoint: calcn_l (0 0.031 0.0053)
    Thelen2003Muscle soleus_l: max_isometric_force=4000 optimal_fiber_length=0.08 tendon_slack_length=0.22
        pennation_angle=0.4363323 muscle_model=9
      MusclePoint: tibia_l (-0.0024 -0.1533 -0.0071)
      MusclePoint: calcn_l (0 0.031 0.0053)
    Thelen2003Muscle tib_post_l: max_isometric_force=3600 optimal_fiber_length=0.031 tendon_slack_length=0.31
        pennation_angle=0.2094395 muscle_model=9
      MusclePoint: tibia_l (-0.0094 -0.1348 -0.0019)
      MusclePoint: tibia_l (-0.0144 -0.4051 0.0229)
      MusclePoint: calcn_l (0.0417 0.0334 0.0286)
      MusclePoint: calcn_l (0.0772 0.0159 0.0281)
    Thelen2003Muscle tib_ant_l: max_isometric_force=3000 optimal_fiber_length=0.098 tendon_slack_length=0.223
        pennation_angle=0.08726646 muscle_model=9
      MusclePoint: tibia_l (0.0179 -0.1624 -0.0115)
      MusclePoint: tibia_l (0.0329 -0.3951 0.0177)
      MusclePoint: calcn_l (0.1166 0.0178 0.0305)
    Thelen2003Muscle ercspn_r: max_isometric_force=2500 optimal_fiber_length=0.12 tendon_slack_length=0.03
        pennation_angle=0 muscle_model=9
      MusclePoint: pelvis (-0.14 0.0439 0.0436)
      MusclePoint: thorax (-0.0755 -0.2685 0.0241)
    Thelen2003Muscle ercspn_l: max_isometric_force=2500 optimal_fiber_length=0.12 tendon_slack_length=0.03
        pennation_angle=0 muscle_model=9
      MusclePoint: pelvis (-0.14 0.0439 -0.0436)
      MusclePoint: thorax (-0.0755 -0.2685 -0.0241)
    Thelen2003Muscle intobl_r: max_isometric_force=900 optimal_fiber_length=0.1 tendon_slack_length=0.1
        pennation_angle=0 muscle_model=9
      MusclePoint: pelvis (-0.04 0.07 0.1157)
      MusclePoint: thorax (0.0495 -0.2185 0.015)
    Thelen2003Muscle intobl_l: max_isometric_force=900 optimal_fiber_length=0.1 tendon_slack_length=0.1
        pennation_angle=0 muscle_model=9
      MusclePoint: pelvis (-0.04 0.07 -0.1157)
      MusclePoint: thorax (0.0495 -0.2185 -0.015)
    Thelen2003Muscle extobl_r: max_isometric_force=900 optimal_fiber_length=0.12 tendon_slack_length=0.14
        pennation_angle=0 muscle_model=9
      MusclePoint: pelvis (-0.03 -0.0636 0.01)
      MusclePoint: thorax (0.0445 -0.2685 0.11)
    Thelen2003Muscle extobl_l: max_isometric_force=900 optimal_fiber_length=0.12 tendon_slack_length=0.14
        pennation_angle=0 muscle_model=9
      MusclePoint: pelvis (-0.03 -0.0636 -0.01)
      MusclePoint: thorax (0.0445 -0.2685 -0.11)
    Schutte1993Muscle DELT1: max_isometric_force=1142.6 optimal_fiber_length=0.0976 tendon_slack_length=0.093
        pennation_angle=0.3839724
      MusclePoint: humerus (0.00896 -0.11883 0.00585)
      MusclePoint: humerus (0.01623 -0.11033 0.00412)
      MusclePoint: scapula (0.04347 -0.03252 0.00099)
      MusclePoint: clavicle (-0.014 0.01106 0.08021)
      MuscleWrap: wrap_object=delt2hum
      MuscleWrap: wrap_object=DELT1hh method=hybrid range=(2 3)
    Schutte1993Muscle DELT2: max_isometric_force=1142.6 optimal_fiber_length=0.1078 tendon_slack_length=0.1095
        pennation_angle=0.2617994
      MusclePoint: humerus (0.00461 -0.13611 0.0056)
      MusclePoint: DELT2pt2 (0.0272 0.00535 0.04807)
      MusclePoint: scapula (0.00005 0.00294 0.02233)
      MusclePoint: scapula (-0.01078 -0.00034 0.0062)
      MuscleWrap: wrap_object=Deltoid2 method=hybrid
      MuscleWrap: wrap_object=delt2hum
      MuscleWrap: wrap_object=TMAJ_LAT_PEC_CORBhh
    Schutte1993Muscle DELT3: max_isometric_force=259.88 optimal_fiber_length=0.1367 tendon_slack_length=0.038
        pennation_angle=0.3141593
      MusclePoint: scapula (-0.05573 0.00122 -0.02512)
      MusclePoint: scapula (-0.07247 -0.03285 0.01233)
      MusclePoint: humerus (0.00206 -0.07602 0.01045)
      MuscleWrap: wrap_object=Delt3
      MuscleWrap: wrap_object=delt3hum method=hybrid
      MuscleWrap: wrap_object=TMAJ_LAT_PEC_CORBhh
    Schutte1993Muscle SUPSP: max_isometric_force=487.82 optimal_fiber_length=0.0682 tendon_slack_length=0.0395
        pennation_angle=0.122173
      MusclePoint: humerus (0.00256 0.01063 0.02593)
      MusclePoint: scapula (-0.01918 0.00127 -0.01271)
      MusclePoint: scapula (-0.044 -0.01512 -0.05855)
      MuscleWrap: wrap_object=SUPSP method=hybrid
    Schutte1993Muscle INFSP: max_isometric_force=1210.84 optimal_fiber_length=0.0755 tendon_slack_length=0.0308
        pennation_angle=0.3228859
      MusclePoint: humerus (-0.00887 0.00484 0.02448)
      MusclePoint: scapula (-0.07382 -0.05476 -0.04781)
      MuscleWrap: wrap_object=INFSP
      MuscleWrap: wrap_object=INFSP_and_TMIN_hum_head method=hybrid
    Schutte1993Muscle SUBSC: max_isometric_force=1377.81 optimal_fiber_length=0.0873 tendon_slack_length=0.033
        pennation_angle=0.3490659
      MusclePoint: humerus (0.01403 0.0084 -0.01331)
      MusclePoint: scapula (-0.01831 -0.05223 -0.02457)
      MusclePoint: scapula (-0.07246 -0.03943 -0.06475)
      MuscleWrap: wrap_object=SUBSCAP method=hybrid
    Schutte1993Muscle TMIN: max_isometric_force=354.25 optimal_fiber_length=0.0741 tendon_slack_length=0.0713
        pennation_angle=0.418879
      MusclePoint: humerus (-0.0011 -0.01264 0.02156)
      MusclePoint: scapula (-0.09473 -0.07991 -0.04737)
      MusclePoint: scapula (-0.09643 -0.08121 -0.05298)
      MuscleWrap: wrap_object=TMIN method=hybrid range=(1 2)
      MuscleWrap: wrap_object=INFSP_and_TMIN_hum_head method=hybrid range=(1 2)
      MuscleWrap: wrap_object=TMINhum range=(1 2)
    Schutte1993Muscle TMAJ: max_isometric_force=425.39 optimal_fiber_length=0.1624 tendon_slack_length=0.02
        pennation_angle=0.2792527
      MusclePoint: humerus (0.00998 -0.05419 -0.00568)
      MusclePoint: scapula (-0.10264 -0.10319 -0.05829)
      MusclePoint: scapula (-0.10489 -0.10895 -0.07117)
      MuscleWrap: wrap_object=TMAJ_LAThum
      MuscleWrap: wrap_object=LAT_TMAJhh range=(1 2)
      MuscleWrap: wrap_object=LAT_TMAJ2hh
    Schutte1993Muscle PECM1: max_isometric_force=364.41 optimal_fiber_length=0.1442 tendon_slack_length=0.0028
        pennation_angle=0.296706
      MusclePoint: humerus (0.01169 -0.04191 0.0078)
      MusclePoint: PEC1pt2 (0.01615 -0.04045 -0.00577)
      MusclePoint: PEC1pt3 (0.00958 -0.01509 0.12664)
      MusclePoint: clavicle (0.00321 -0.00013 0.05113)
      MuscleWrap: wrap_object=Thorax method=hybrid
      MuscleWrap: wrap_object=PEC12hum range=(2 3)
      MuscleWrap: wrap_object=PEC1hh method=hybrid
    Schutte1993Muscle PECM2: max_isometric_force=515.41 optimal_fiber_length=0.1385 tendon_slack_length=0.089
        pennation_angle=0.4363323
      MusclePoint: humerus (0.01274 -0.04289 0.00785)
      MusclePoint: PEC2pt2 (0.01453 -0.04568 -0.00687)
      MusclePoint: PEC2pt3 (0.02018 -0.04165 0.1269)
      MusclePoint: thorax (0.03091 -0.03922 0.09705)
      MusclePoint: thorax (0.02769 -0.04498 0.02271)
      MuscleWrap: wrap_object=Thorax method=hybrid
      MuscleWrap: wrap_object=PEC12hum range=(2 3)
      MuscleWrap: wrap_object=TMAJ_LAT_PEC_CORBhh
      MuscleWrap: wrap_object=PEC23hh
    Schutte1993Muscle PECM3: max_isometric_force=390.55 optimal_fiber_length=0.1385 tendon_slack_length=0.132
        pennation_angle=0.4363323
      MusclePoint: humerus (0.01269 -0.04375 0.0075)
      MusclePoint: PEC3pt2 (0.01243 -0.05157 -0.01807)
      MusclePoint: PEC3pt3 (0.02984 -0.071 0.1151)
      MusclePoint: thorax (0.0525 -0.08417 0.08935)
      MusclePoint: thorax (0.05724 -0.11654 0.03787)
      MuscleWrap: wrap_object=Thorax method=hybrid
      MuscleWrap: wrap_object=PEC3hum range=(2 3)
      MuscleWrap: wrap_object=PEC23hh
    Schutte1993Muscle LAT1: max_isometric_force=389.1 optimal_fiber_length=0.254 tendon_slack_length=0.12
        pennation_angle=0.4363323
      MusclePoint: humerus (0.0105 -0.03415 -0.00653)
      MusclePoint: LAT1pt2 (-0.07947 -0.08581 -0.02188)
      MusclePoint: LAT1pt3 (-0.11215 -0.09779 -0.05322)
      MusclePoint: thorax (-0.11828 -0.10118 0.03316)
      MusclePoint: thorax (-0.09578 -0.11724 0.00882)
      MuscleWrap: wrap_object=TMAJ_LAThum
      MuscleWrap: wrap_object=LAT_TMAJhh range=(1 2)
      MuscleWrap: wrap_object=LAT_TMAJ2hh
    Schutte1993Muscle LAT2: max_isometric_force=389.1 optimal_fiber_length=0.2324 tendon_slack_length=0.1765
        pennation_angle=0.3316126
      MusclePoint: humerus (0.00968 -0.04071 -0.00611)
      MusclePoint: LAT2pt2 (-0.0764 -0.1022 -0.01808)
      MusclePoint: LAT2pt3 (-0.10054 -0.13969 -0.05258)
      MusclePoint: thorax (-0.10992 -0.16908 0.02878)
      MusclePoint: thorax (-0.07186 -0.18818 0.00815)
      MuscleWrap: wrap_object=TMAJ_LAThum
      MuscleWrap: wrap_object=LAT_TMAJhh range=(1 2)
      MuscleWrap: wrap_object=LAT_TMAJ2hh
    Schutte1993Muscle LAT3: max_isometric_force=281.66 optimal_fiber_length=0.2789 tendon_slack_length=0.1403
        pennation_angle=0.3665191
      MusclePoint: humerus (0.01208 -0.03922 -0.00416)
      MusclePoint: LAT3pt2 (-0.05678 -0.13303 -0.0213)
      MusclePoint: LAT3pt3 (-0.09449 -0.17553 -0.04606)
      MusclePoint: thorax (-0.11157 -0.19387 0.05532)
      MusclePoint: thorax (-0.07117 -0.24858 0.00907)
      MuscleWrap: wrap_object=TMAJ_LAThum
      MuscleWrap: wrap_object=LAT_TMAJhh range=(1 2)
      MuscleWrap: wrap_object=LAT_TMAJ2hh
    Schutte1993Muscle CORB: max_isometric_force=242.46 optimal_fiber_length=0.0932 tendon_slack_length=0.097
        pennation_angle=0
      MusclePoint: scapula (0.0125 -0.04127 -0.02652)
      MusclePoint: scapula (0.00483 -0.06958 -0.01563)
      MusclePoint: humerus (0.00743 -0.15048 -0.00782)
      MuscleWrap: wrap_object=CORBhum
      MuscleWrap: wrap_object=TMAJ_LAT_PEC_CORBhh
    Schutte1993Muscle TRIlong: max_isometric_force=798.52 optimal_fiber_length=0.134 tendon_slack_length=0.143
        pennation_angle=0.2094395
      MusclePoint: scapula (-0.04565 -0.04073 -0.01377)
      MusclePoint: humerus (-0.02714 -0.11441 -0.00664)
      MusclePoint: humerus (-0.03184 -0.22637 -0.01217)
      MusclePoint: humerus (-0.01743 -0.26757 -0.01208)
      MusclePoint: ulna (-0.0219 0.01046 -0.00078)
      MuscleWrap: wrap_object=TRI
      MuscleWrap: wrap_object=TRIlonghh method=hybrid
      MuscleWrap: wrap_object=TRIlongglen
    Schutte1993Muscle TRIlat: max_isometric_force=624.3 optimal_fiber_length=0.1138 tendon_slack_length=0.098
        pennation_angle=0.1570796
      MusclePoint: humerus (-0.00599 -0.12646 0.00428)
      MusclePoint: humerus (-0.02344 -0.14528 0.00928)
      MusclePoint: humerus (-0.03184 -0.22637 -0.01217)
      MusclePoint: humerus (-0.01743 -0.26757 -0.01208)
      MusclePoint: ulna (-0.0219 0.01046 -0.00078)
      MuscleWrap: wrap_object=TRI
    Schutte1993Muscle TRImed: max_isometric_force=624.3 optimal_fiber_length=0.1138 tendon_slack_length=0.0908
        pennation_angle=0.1570796
      MusclePoint: humerus (-0.00838 -0.13695 -0.00906)
      MusclePoint: humerus (-0.02601 -0.15139 -0.0108)
      MusclePoint: humerus (-0.03184 -0.22637 -0.01217)
      MusclePoint: humerus (-0.01743 -0.26757 -0.01208)
      MusclePoint: ulna (-0.0219 0.01046 -0.00078)
      MuscleWrap: wrap_object=TRI
    Schutte1993Muscle ANC: max_isometric_force=350 optimal_fiber_length=0.027 tendon_slack_length=0.018
        pennation_angle=0
      MusclePoint: humerus (-0.00744 -0.28359 0.00979)
      MusclePoint: ulna (-0.02532 -0.00124 0.006)
      MuscleWrap: wrap_object=ANC method=hybrid
    Schutte1993Muscle BIClong: max_isometric_force=624.3 optimal_fiber_length=0.1157 tendon_slack_length=0.2723
        pennation_angle=0
      MusclePoint: scapula (-0.03123 -0.02353 -0.01305)
      MusclePoint: scapula (-0.02094 -0.01309 -0.00461)
      MusclePoint: humerus (0.02131 0.01793 0.01028)
      MusclePoint: humerus (0.02378 -0.00511 0.01201)
      MusclePoint: humerus (0.01345 -0.02827 0.00136)
      MusclePoint: humerus (0.01068 -0.07736 -0.00165)
      MusclePoint: humerus (0.01703 -0.12125 0.00024)
      MusclePoint: humerus (0.0228 -0.1754 -0.0063)
      MusclePoint: bicpt2 (0 0 0)
      MuscleViaPoint: bicpt (0 0 0) coordinate=pro_sup range=(-0.6387905 1.570796)
      MusclePoint: radius (-0.002 -0.0375 -0.002)
      MuscleWrap: wrap_object=Elbow_BIC_BRD method=hybrid
      MuscleWrap: wrap_object=BIClong method=hybrid range=(2 3)
    Schutte1993Muscle BICshort: max_isometric_force=435.56 optimal_fiber_length=0.1321 tendon_slack_length=0.1923
        pennation_angle=0
      MusclePoint: scapula (0.01268 -0.03931 -0.02625)
      MusclePoint: scapula (0.00093 -0.06704 -0.01593)
      MusclePoint: humerus (0.01117 -0.07576 -0.01101)
      MusclePoint: humerus (0.01703 -0.12125 -0.01079)
      MusclePoint: humerus (0.0228 -0.1754 -0.0063)
      MusclePoint: bicpt2 (0 0 0)
      MuscleViaPoint: bicpt (0 0 0) coordinate=pro_sup range=(-0.6387905 1.570796)
      MusclePoint: radius (-0.002 -0.0375 -0.002)
      MuscleWrap: wrap_object=Elbow_BIC_BRD method=hybrid
    Schutte1993Muscle BRA: max_isometric_force=987.26 optimal_fiber_length=0.0858 tendon_slack_length=0.0535
        pennation_angle=0
      MusclePoint: humerus (0.0068 -0.1739 -0.0036)
      MuscleViaPoint: humerus (0.01894 -0.28559 -0.01105) coordinate=elbow_flexion range=(0 0.8131489)
      MuscleViaPoint: ulna (0.00498 -0.01463 0.00128) coordinate=elbow_flexion range=(0 0.8131489)
      MusclePoint: ulna (-0.0032 -0.0239 0.0009)
    Schutte1993Muscle BRD: max_isometric_force=261.33 optimal_fiber_length=0.1726 tendon_slack_length=0.133
        pennation_angle=0
      MusclePoint: humerus (-0.0098 -0.19963 0.00223)
      MusclePoint: radius (0.03577 -0.12742 0.02315)
      MusclePoint: radius (0.0419 -0.221 0.0224)
      MuscleWrap: wrap_object=Elbow_BIC_BRD method=hybrid
    Schutte1993Muscle ECRL: max_isometric_force=304.89 optimal_fiber_length=0.081 tendon_slack_length=0.224
        pennation_angle=0
      MusclePoint: humerus (-0.0073 -0.2609 0.0091)
      MusclePoint: radius (0.03195 -0.13463 0.02779)
      MusclePoint: radius (0.04243 -0.23684 0.0362)
      MusclePoint: secondmc (0.00249 0.0164 0.0008)
      MuscleWrap: wrap_object=Elbow_PT_ECRL method=hybrid
      MuscleWrap: wrap_object=ECRL
    Schutte1993Muscle ECRB: max_isometric_force=100.52 optimal_fiber_length=0.0585 tendon_slack_length=0.2223
        pennation_angle=0.1553343
      MusclePoint: humerus (0.01349 -0.29048 0.01698)
      MusclePoint: radius (0.02905 -0.13086 0.02385)
      MusclePoint: radius (0.03549 -0.22805 0.03937)
      MusclePoint: thirdmc (0.00452 0.02788 0.00112)
      MuscleWrap: wrap_object=ECRB
    Schutte1993Muscle ECU: max_isometric_force=93.17 optimal_fiber_length=0.0622 tendon_slack_length=0.2285
        pennation_angle=0.06108652
      MusclePoint: humerus (0.00083 -0.28955 0.0188)
      MusclePoint: ulna (-0.01391 -0.03201 0.02947)
      MusclePoint: ulna (-0.01705 -0.05428 0.02868)
      MusclePoint: ulna (-0.01793 -0.09573 0.03278)
      MusclePoint: radius (-0.01421 -0.22696 0.03481)
      MusclePoint: fifthmc (-0.00061 0.02067 0.00294)
      MuscleWrap: wrap_object=ECU
    Schutte1993Muscle FCR: max_isometric_force=73.96 optimal_fiber_length=0.0628 tendon_slack_length=0.244
        pennation_angle=0.05410521
      MusclePoint: humerus (0.00758 -0.27806 -0.03705)
      MusclePoint: radius (0.0211 -0.21943 0.00127)
      MusclePoint: secondmc (-0.00345 0.01918 -0.00921)
      MuscleWrap: wrap_object=Elbow_PT_ECRL method=hybrid
      MuscleWrap: wrap_object=FCR
    Schutte1993Muscle FCU: max_isometric_force=128.93 optimal_fiber_length=0.0509 tendon_slack_length=0.265
        pennation_angle=0.2111848
      MusclePoint: humerus (0.00219 -0.2774 -0.0388)
      MusclePoint: FCUpt (0.00549 0 0)
      MusclePoint: radius (0.01082 -0.22327 0.00969)
      MusclePoint: fifthmc (0.00154 0.01703 -0.0033)
      MuscleWrap: wrap_object=FCU
      MuscleWrap: wrap_object=Elbow_PT_ECRL method=hybrid
    Schutte1993Muscle PT: max_isometric_force=566.22 optimal_fiber_length=0.0492 tendon_slack_length=0.098
        pennation_angle=0.1745329
      MusclePoint: humerus (0.0036 -0.2759 -0.0365)
      MusclePoint: ulna (0.00846 -0.03373 -0.01432)
      MusclePoint: ptpt (0.00464 -0.00026 -0.00214)
      MuscleViaPoint: radius (0.0236 -0.0934 0.0094) coordinate=pro_sup range=(-1.570796 0.5096361)
      MusclePoint: radius (0.0254 -0.1088 0.0198)
      MuscleWrap: wrap_object=Elbow_PT_ECRL method=hybrid
    Schutte1993Muscle DELT1_l: max_isometric_force=1142.6 optimal_fiber_length=0.0976 tendon_slack_length=0.093
        pennation_angle=0.3839724
      MusclePoint: humerus_l (0.00896 -0.11883 -0.00585)
      MusclePoint: humerus_l (0.01623 -0.11033 -0.00412)
      MusclePoint: scapula_l (0.04347 -0.03252 -0.00099)
      MusclePoint: clavicle_l (-0.014 0.01106 -0.08021)
      MuscleWrap: wrap_object=delt2hum_l
      MuscleWrap: wrap_object=DELT1hh_l method=hybrid range=(2 3)
    Schutte1993Muscle DELT2_l: max_isometric_force=1142.6 optimal_fiber_length=0.1078 tendon_slack_length=0.1095
        pennation_angle=0.2617994
      MusclePoint: humerus_l (0.00461 -0.13611 -0.0056)
      MusclePoint: DELT2pt2_l (0.0272 0.00535 -0.04807)
      MusclePoint: scapula_l (0.00005 0.00294 -0.02233)
      MusclePoint: scapula_l (-0.01078 -0.00034 -0.0062)
      MuscleWrap: wrap_object=Deltoid2_l method=hybrid
      MuscleWrap: wrap_object=delt2hum_l
      MuscleWrap: wrap_object=TMAJ_LAT_PEC_CORBhh_l
    Schutte1993Muscle DELT3_l: max_isometric_force=259.88 optimal_fiber_length=0.1367 tendon_slack_length=0.038
        pennation_angle=0.3141593
      MusclePoint: scapula_l (-0.05573 0.00122 0.02512)
      MusclePoint: scapula_l (-0.07247 -0.03285 -0.01233)
      MusclePoint: humerus_l (0.00206 -0.07602 -0.01045)
      MuscleWrap: wrap_object=Delt3_l
      MuscleWrap: wrap_object=delt3hum_l method=hybrid
      MuscleWrap: wrap_object=TMAJ_LAT_PEC_CORBhh_l
    Schutte1993Muscle SUPSP_l: max_isometric_force=487.82 optimal_fiber_length=0.0682 tendon_slack_length=0.0395
        pennation_angle=0.122173
      MusclePoint: humerus_l (0.00256 0.01063 -0.02593)
      MusclePoint: scapula_l (-0.01918 0.00127 0.01271)
      MusclePoint: scapula_l (-0.044 -0.01512 0.05855)
      MuscleWrap: wrap_object=SUPSP_l method=hybrid
    Schutte1993Muscle INFSP_l: max_isometric_force=1210.84 optimal_fiber_length=0.0755 tendon_slack_length=0.0308
        pennation_angle=0.3228859
      MusclePoint: humerus_l (-0.00887 0.00484 -0.02448)
      MusclePoint: scapula_l (-0.07382 -0.05476 0.04781)
      MuscleWrap: wrap_object=INFSP_l
      MuscleWrap: wrap_object=INFSP_and_TMIN_hum_head_l method=hybrid
    Schutte1993Muscle SUBSC_l: max_isometric_force=1377.81 optimal_fiber_length=0.0873 tendon_slack_length=0.033
        pennation_angle=0.3490659
      MusclePoint: humerus_l (0.01403 0.0084 0.01331)
      MusclePoint: scapula_l (-0.01831 -0.05223 0.02457)
      MusclePoint: scapula_l (-0.07246 -0.03943 0.06475)
      MuscleWrap: wrap_object=SUBSCAP_l method=hybrid
    Schutte1993Muscle TMIN_l: max_isometric_force=354.25 optimal_fiber_length=0.0741 tendon_slack_length=0.0713
        pennation_angle=0.418879
      MusclePoint: humerus_l (-0.0011 -0.01264 -0.02156)
      MusclePoint: scapula_l (-0.09473 -0.07991 0.04737)
      MusclePoint: scapula_l (-0.09643 -0.08121 0.05298)
      MuscleWrap: wrap_object=TMIN_l method=hybrid range=(1 2)
      MuscleWrap: wrap_object=INFSP_and_TMIN_hum_head_l method=hybrid range=(1 2)
      MuscleWrap: wrap_object=TMINhum_l range=(1 2)
    Schutte1993Muscle TMAJ_l: max_isometric_force=425.39 optimal_fiber_length=0.1624 tendon_slack_length=0.02
        pennation_angle=0.2792527
      MusclePoint: humerus_l (0.00998 -0.05419 0.00568)
      MusclePoint: scapula_l (-0.10264 -0.10319 0.05829)
      MusclePoint: scapula_l (-0.10489 -0.10895 0.07117)
      MuscleWrap: wrap_object=TMAJ_LAThum_l
      MuscleWrap: wrap_object=LAT_TMAJhh_l range=(1 2)
      MuscleWrap: wrap_object=LAT_TMAJ2hh_l
    Schutte1993Muscle PECM1_l: max_isometric_force=364.41 optimal_fiber_length=0.1442 tendon_slack_length=0.0028
        pennation_angle=0.296706
      MusclePoint: humerus_l (0.01169 -0.04191 -0.0078)
      MusclePoint: PEC1pt2_l (0.01615 -0.04045 0.00577)
      MusclePoint: PEC1pt3_l (0.00958 -0.01509 -0.12664)
      MusclePoint: clavicle_l (0.00321 -0.00013 -0.05113)
      MuscleWrap: wrap_object=Thorax_l method=hybrid
      MuscleWrap: wrap_object=PEC12hum_l range=(2 3)
      MuscleWrap: wrap_object=PEC1hh_l method=hybrid
    Schutte1993Muscle PECM2_l: max_isometric_force=515.41 optimal_fiber_length=0.1385 tendon_slack_length=0.089
        pennation_angle=0.4363323
      MusclePoint: humerus_l (0.01274 -0.04289 -0.00785)
      MusclePoint: PEC2pt2_l (0.01453 -0.04568 0.00687)
      MusclePoint: PEC2pt3_l (0.02018 -0.04165 -0.1269)
      MusclePoint: thorax (0.03091 -0.03922 -0.09705)
      MusclePoint: thorax (0.02769 -0.04498 -0.02271)
      MuscleWrap: wrap_object=Thorax method=hybrid
      MuscleWrap: wrap_object=PEC12hum_l range=(2 3)
      MuscleWrap: wrap_object=TMAJ_LAT_PEC_CORBhh_l
      MuscleWrap: wrap_object=PEC23hh_l
    Schutte1993Muscle PECM3_l: max_isometric_force=390.55 optimal_fiber_length=0.1385 tendon_slack_length=0.132
        pennation_angle=0.4363323
      MusclePoint: humerus_l (0.01269 -0.04375 -0.0075)
      MusclePoint: PEC3pt2_l (0.01243 -0.05157 0.01807)
      MusclePoint: PEC3pt3_l (0.02984 -0.071 -0.1151)
      MusclePoint: thorax (0.0525 -0.08417 -0.08935)
      MusclePoint: thorax (0.05724 -0.11654 -0.03787)
      MuscleWrap: wrap_object=Thorax method=hybrid
      MuscleWrap: wrap_object=PEC3hum_l range=(2 3)
      MuscleWrap: wrap_object=PEC23hh_l
    Schutte1993Muscle LAT1_l: max_isometric_force=389.1 optimal_fiber_length=0.254 tendon_slack_length=0.12
        pennation_angle=0.4363323
      MusclePoint: humerus_l (0.0105 -0.03415 0.00653)
      MusclePoint: LAT1pt2_l (-0.07947 -0.08581 0.02188)
      MusclePoint: LAT1pt3_l (-0.11215 -0.09779 0.05322)
      MusclePoint: thorax (-0.11828 -0.10118 -0.03316)
      MusclePoint: thorax (-0.09578 -0.11724 -0.00882)
      MuscleWrap: wrap_object=TMAJ_LAThum_l
      MuscleWrap: wrap_object=LAT_TMAJhh_l range=(1 2)
      MuscleWrap: wrap_object=LAT_TMAJ2hh_l
    Schutte1993Muscle LAT2_l: max_isometric_force=389.1 optimal_fiber_length=0.2324 tendon_slack_length=0.1765
        pennation_angle=0.3316126
      MusclePoint: humerus_l (0.00968 -0.04071 0.00611)
      MusclePoint: LAT2pt2_l (-0.0764 -0.1022 0.01808)
      MusclePoint: LAT2pt3_l (-0.10054 -0.13969 0.05258)
      MusclePoint: thorax (-0.10992 -0.16908 -0.02878)
      MusclePoint: thorax (-0.07186 -0.18818 -0.00815)
      MuscleWrap: wrap_object=TMAJ_LAThum_l
      MuscleWrap: wrap_object=LAT_TMAJhh_l range=(1 2)
      MuscleWrap: wrap_object=LAT_TMAJ2hh_l
    Schutte1993Muscle LAT3_l: max_isometric_force=281.66 optimal_fiber_length=0.2789 tendon_slack_length=0.1403
        pennation_angle=0.3665191
      MusclePoint: humerus_l (0.01208 -0.03922 0.00416)
      MusclePoint: LAT3pt2_l (-0.05678 -0.13303 0.0213)
      MusclePoint: LAT3pt3_l (-0.09449 -0.17553 0.04606)
      MusclePoint: thorax (-0.11157 -0.19387 -0.05532)
      MusclePoint: thorax (-0.07117 -0.24858 -0.00907)
      MuscleWrap: wrap_object=TMAJ_LAThum_l
      MuscleWrap: wrap_object=LAT_TMAJhh_l range=(1 2)
      MuscleWrap: wrap_object=LAT_TMAJ2hh_l
    Schutte1993Muscle CORB_l: max_isometric_force=242.46 optimal_fiber_length=0.0932 tendon_slack_length=0.097
        pennation_angle=0
      MusclePoint: scapula_l (0.0125 -0.04127 0.02652)
      MusclePoint: scapula_l (0.00483 -0.06958 0.01563)
      MusclePoint: humerus_l (0.00743 -0.15048 0.00782)
      MuscleWrap: wrap_object=CORBhum_l
      MuscleWrap: wrap_object=TMAJ_LAT_PEC_CORBhh_l
    Schutte1993Muscle TRIlong_l: max_isometric_force=798.52 optimal_fiber_length=0.134 tendon_slack_length=0.143
        pennation_angle=0.2094395
      MusclePoint: scapula_l (-0.04565 -0.04073 0.01377)
      MusclePoint: humerus_l (-0.02714 -0.11441 0.00664)
      MusclePoint: humerus_l (-0.03184 -0.22637 0.01217)
      MusclePoint: humerus_l (-0.01743 -0.26757 0.01208)
      MusclePoint: ulna_l (-0.0219 0.01046 0.00078)
      MuscleWrap: wrap_object=TRI_l
      MuscleWrap: wrap_object=TRIlonghh_l method=hybrid
      MuscleWrap: wrap_object=TRIlongglen_l
    Schutte1993Muscle TRIlat_l: max_isometric_force=624.3 optimal_fiber_length=0.1138 tendon_slack_length=0.098
        pennation_angle=0.1570796
      MusclePoint: humerus_l (-0.00599 -0.12646 -0.00428)
      MusclePoint: humerus_l (-0.02344 -0.14528 -0.00928)
      MusclePoint: humerus_l (-0.03184 -0.22637 0.01217)
      MusclePoint: humerus_l (-0.01743 -0.26757 0.01208)
      MusclePoint: ulna_l (-0.0219 0.01046 0.00078)
      MuscleWrap: wrap_object=TRI_l
    Schutte1993Muscle TRImed_l: max_isometric_force=624.3 optimal_fiber_length=0.1138 tendon_slack_length=0.0908
        pennation_angle=0.1570796
      MusclePoint: humerus_l (-0.00838 -0.13695 0.00906)
      MusclePoint: humerus_l (-0.02601 -0.15139 0.0108)
      MusclePoint: humerus_l (-0.03184 -0.22637 0.01217)
      MusclePoint: humerus_l (-0.01743 -0.26757 0.01208)
      MusclePoint: ulna_l (-0.0219 0.01046 0.00078)
      MuscleWrap: wrap_object=TRI_l
    Schutte1993Muscle ANC_l: max_isometric_force=350 optimal_fiber_length=0.027 tendon_slack_length=0.018
        pennation_angle=0
      MusclePoint: humerus_l (-0.00744 -0.28359 -0.00979)
      MusclePoint: ulna_l (-0.02532 -0.00124 -0.006)
      MuscleWrap: wrap_object=ANC_l method=hybrid
    Schutte1993Muscle BIClong_l: max_isometric_force=624.3 optimal_fiber_length=0.1157 tendon_slack_length=0.2723
        pennation_angle=0
      MusclePoint: scapula_l (-0.03123 -0.02353 0.01305)
      MusclePoint: scapula_l (-0.02094 -0.01309 0.00461)
      MusclePoint: humerus_l (0.02131 0.01793 -0.01028)
      MusclePoint: humerus_l (0.02378 -0.00511 -0.01201)
      MusclePoint: humerus_l (0.01345 -0.02827 -0.00136)
      MusclePoint: humerus_l (0.01068 -0.07736 0.00165)
      MusclePoint: humerus_l (0.01703 -0.12125 -0.00024)
      MusclePoint: humerus_l (0.0228 -0.1754 0.0063)
      MusclePoint: bicpt2_l (0 0 0)
      MuscleViaPoint: bicpt_l (0 0 0) coordinate=pro_sup_l range=(-0.6387905 1.570796)
      MusclePoint: radius_l (-0.002 -0.0375 0.002)
      MuscleWrap: wrap_object=Elbow_BIC_BRD_l method=hybrid
      MuscleWrap: wrap_object=BIClong_l method=hybrid range=(2 3)
    Schutte1993Muscle BICshort_l: max_isometric_force=435.56 optimal_fiber_length=0.1321 tendon_slack_length=0.1923
        pennation_angle=0
      MusclePoint: scapula_l (0.01268 -0.03931 0.02625)
      MusclePoint: scapula_l (0.00093 -0.06704 0.01593)
      MusclePoint: humerus_l (0.01117 -0.07576 0.01101)
      MusclePoint: humerus_l (0.01703 -0.12125 0.01079)
      MusclePoint: humerus_l (0.0228 -0.1754 0.0063)
      MusclePoint: bicpt2_l (0 0 0)
      MuscleViaPoint: bicpt_l (0 0 0) coordinate=pro_sup_l range=(-0.6387905 1.570796)
      MusclePoint: radius_l (-0.002 -0.0375 0.002)
      MuscleWrap: wrap_object=Elbow_BIC_BRD_l method=hybrid
    Schutte1993Muscle BRA_l: max_isometric_force=987.26 optimal_fiber_length=0.0858 tendon_slack_length=0.0535
        pennation_angle=0
      MusclePoint: humerus_l (0.0068 -0.1739 0.0036)
      MuscleViaPoint: humerus_l (0.01894 -0.28559 0.01105) coordinate=elbow_flexion_l range=(0 0.8131489)
      MuscleViaPoint: ulna_l (0.00498 -0.01463 -0.00128) coordinate=elbow_flexion_l range=(0 0.8131489)
      MusclePoint: ulna_l (-0.0032 -0.0239 -0.0009)
    Schutte1993Muscle BRD_l: max_isometric_force=261.33 optimal_fiber_length=0.1726 tendon_slack_length=0.133
        pennation_angle=0
      MusclePoint: humerus_l (-0.0098 -0.19963 -0.00223)
      MusclePoint: radius_l (0.03577 -0.12742 -0.02315)
      MusclePoint: radius_l (0.0419 -0.221 -0.0224)
      MuscleWrap: wrap_object=Elbow_BIC_BRD_l method=hybrid
    Schutte1993Muscle ECRL_l: max_isometric_force=304.89 optimal_fiber_length=0.081 tendon_slack_length=0.224
        pennation_angle=0
      MusclePoint: humerus_l (-0.0073 -0.2609 -0.0091)
      MusclePoint: radius_l (0.03195 -0.13463 -0.02779)
      MusclePoint: radius_l (0.04243 -0.23684 -0.0362)
      MusclePoint: secondmc_l (0.00249 0.0164 -0.0008)
      MuscleWrap: wrap_object=Elbow_PT_ECRL_l method=hybrid
      MuscleWrap: wrap_object=ECRL_l
    Schutte1993Muscle ECRB_l: max_isometric_force=100.52 optimal_fiber_length=0.0585 tendon_slack_length=0.2223
        pennation_angle=0.1553343
      MusclePoint: humerus_l (0.01349 -0.29048 -0.01698)
      MusclePoint: radius_l (0.02905 -0.13086 -0.02385)
      MusclePoint: radius_l (0.03549 -0.22805 -0.03937)
      MusclePoint: thirdmc_l (0.00452 0.02788 -0.00112)
      MuscleWrap: wrap_object=ECRB_l
    Schutte1993Muscle ECU_l: max_isometric_force=93.17 optimal_fiber_length=0.0622 tendon_slack_length=0.2285
        pennation_angle=0.06108652
      MusclePoint: humerus_l (0.00083 -0.28955 -0.0188)
      MusclePoint: ulna_l (-0.01391 -0.03201 -0.02947)
      MusclePoint: ulna_l (-0.01705 -0.05428 -0.02868)
      MusclePoint: ulna_l (-0.01793 -0.09573 -0.03278)
      MusclePoint: radius_l (-0.01421 -0.22696 -0.03481)
      MusclePoint: fifthmc_l (-0.00061 0.02067 -0.00294)
      MuscleWrap: wrap_object=ECU_l
    Schutte1993Muscle FCR_l: max_isometric_force=73.96 optimal_fiber_length=0.0628 tendon_slack_length=0.244
        pennation_angle=0.05410521
      MusclePoint: humerus_l (0.00758 -0.27806 0.03705)
      MusclePoint: radius_l (0.0211 -0.21943 -0.00127)
      MusclePoint: secondmc_l (-0.00345 0.01918 0.00921)
      MuscleWrap: wrap_object=Elbow_PT_ECRL_l method=hybrid
      MuscleWrap: wrap_object=FCR_l
    Schutte1993Muscle FCU_l: max_isometric_force=128.93 optimal_fiber_length=0.0509 tendon_slack_length=0.265
        pennation_angle=0.2111848
      MusclePoint: humerus_l (0.00219 -0.2774 0.0388)
      MusclePoint: FCUpt_l (0.00549 0 0)
      MusclePoint: radius_l (0.01082 -0.22327 -0.00969)
      MusclePoint: fifthmc_l (0.00154 0.01703 0.0033)
      MuscleWrap: wrap_object=FCU_l
      MuscleWrap: wrap_object=Elbow_PT_ECRL_l method=hybrid
    Schutte1993Muscle PT_l: max_isometric_force=566.22 optimal_fiber_length=0.0492 tendon_slack_length=0.098
        pennation_angle=0.1745329
      MusclePoint: humerus_l (0.0036 -0.2759 0.0365)
      MusclePoint: ulna_l (0.00846 -0.03373 0.01432)
      MusclePoint: ptpt_l (0.00464 -0.00026 0.00214)
      MuscleViaPoint: radius_l (0.0236 -0.0934 -0.0094) coordinate=pro_sup_l range=(-1.570796 0.5096361)
      MusclePoint: radius_l (0.0254 -0.1088 -0.0198)
      MuscleWrap: wrap_object=Elbow_PT_ECRL_l method=hybrid
  DynamicsEngine:
    SimbodyEngine: gravity=(0 -9.80665 0)
      BodySet:
        Body ground: mass=0 mass_center=(0 0 0) inertia_xx=0 inertia_yy=0 inertia_zz=0 meshes=treadmill.vtp
        Body pelvis: mass=11.777 mass_center=(-0.0707 0 0) inertia_xx=0.1028 inertia_yy=0.0871 inertia_zz=0.0579
            meshes=(sacrum.vtp pelvis_r.vtp pelvis_l.vtp)
          CustomJoint ground_pelvis: parent_body=ground location_in_parent=(0 0 0) location=(0 0 0)
            Coordinate pelvis_tx: default_value=0 range=(-5 5) clamped=true
            Coordinate pelvis_ty: default_value=0.93 range=(-1 2) clamped=true
            Coordinate pelvis_tz: default_value=0 range=(-3 3) clamped=true
            Coordinate pelvis_tilt: default_value=0 range=(-1.570796 1.570796) clamped=true
            Coordinate pelvis_list: default_value=0 range=(-1.570796 1.570796) clamped=true
            Coordinate pelvis_rotation: default_value=0 range=(-1.570796 1.570796) clamped=true
            TransformAxis tx: coordinate=pelvis_tx is_rotation=false axis=(1 0 0)
            TransformAxis ty: coordinate=pelvis_ty is_rotation=false axis=(0 1 0)
            TransformAxis tz: coordinate=pelvis_tz is_rotation=false axis=(0 0 1)
            TransformAxis rx: coordinate=pelvis_tilt axis=(1 0 0)
            TransformAxis ry: coordinate=pelvis_list axis=(0 1 0)
            TransformAxis rz: coordinate=pelvis_rotation axis=(0 0 1)
        Body thorax: mass=0 mass_center=(0 0 0) inertia_xx=0 inertia_yy=0 inertia_zz=0
            meshes=(thorax.vtp hat_skull.vtp hat_jaw.vtp hat_spine.vtp)
          CustomJoint back: parent_body=pelvis location_in_parent=(-0.1007 0.0815 0) location=(-0.0205 -0.3785 0)
            Coordinate back_tilt: default_value=0 range=(-1.570796 1.570796) clamped=true
            Coordinate back_list: default_value=0 range=(-1.570796 1.570796) clamped=true
            Coordinate back_rotation: default_value=0 range=(-1.570796 1.570796) clamped=true
            TransformAxis rx: coordinate=back_tilt axis=(1 0 0)
            TransformAxis ry: coordinate=back_list axis=(0 1 0)
            TransformAxis rz: coordinate=back_rotation axis=(0 0 1)
          WrapEllipsoid Thorax: dimensions=(0.1 0.135 0.08) xyz_body_rotation=(0.0434587 -0.3319616 0.1898918)
              translation=(-0.0386 -0.1273 0.0709)
          WrapEllipsoid Thorax_l: dimensions=(0.1 0.135 0.08) xyz_body_rotation=(-0.0434587 0.3319616 0.1898918)
              translation=(-0.0386 -0.1273 -0.0709)
        Body femur_r: mass=9.3014 mass_center=(0 -0.17 0) inertia_xx=0.1339 inertia_yy=0.0351 inertia_zz=0.1412
            meshes=femur_r.vtp
          CustomJoint hip_r: parent_body=pelvis location_in_parent=(-0.0707 -0.0661 0.0835) location=(0 0 0)
            Coordinate hip_flexion_r: default_value=0 range=(-2.094395 2.094395) clamped=true
            Coordinate hip_adduction_r: default_value=0 range=(-2.094395 2.094395) clamped=true
            Coordinate hip_rotation_r: default_value=0 range=(-2.094395 2.094395) clamped=true
            TransformAxis rz: coordinate=hip_flexion_r axis=(0 0 1)
            TransformAxis rx: coordinate=hip_adduction_r axis=(1 0 0)
            TransformAxis ry: coordinate=hip_rotation_r axis=(0 1 0)
        Body tibia_r: mass=3.7075 mass_center=(0 -0.1867 0) inertia_xx=0.0504 inertia_yy=0.0051 inertia_zz=0.0511
            meshes=(tibia_r.vtp fibula_r.vtp)
          CustomJoint knee_r: parent_body=femur_r location_in_parent=(0 0 0) location=(0 0 0)
            Coordinate knee_angle_r: default_value=0 range=(-2.094395 0.1745329) clamped=true
            TransformAxis tx: coordinate=knee_angle_r is_rotation=false axis=(1 0 0)
              natCubicSpline: x=(-2.094395 -1.745329 -1.396263 -1.047198 -0.6981317 -0.3490659 -0.1745329 0.1973442 0.337395 0.4901776 1.52146 2.094395)
                  y=(-0.0032 0.00179 0.00411 0.0041 0.00212 -0.001 -0.0031 -0.005227 -0.005435 -0.005574 -0.005435 -0.00525)
            TransformAxis ty: coordinate=knee_angle_r is_rotation=false axis=(0 1 0)
              natCubicSpline: x=(-2.094395 -1.22173 -0.5235988 -0.3490659 -0.1745329 0.1591486 2.094395)
                  y=(-0.4226 -0.4082 -0.399 -0.3976 -0.3966 -0.395264 -0.396)
            TransformAxis rz: coordinate=knee_angle_r axis=(0 0 1)
        Body talus_r: mass=0.1 mass_center=(0 0 0) inertia_xx=0.001 inertia_yy=0.001 inertia_zz=0.001
            meshes=talus_r.vtp
          CustomJoint ankle_r: parent_body=tibia_r location_in_parent=(0 -0.43 0) location=(0 0 0)
            Coordinate ankle_angle_r: default_value=0 range=(-1.570796 1.570796) clamped=true
            TransformAxis rz: coordinate=ankle_angle_r axis=(0 0 1)
        Body calcn_r: mass=1.25 mass_center=(0.1 0.03 0) inertia_xx=0.0014 inertia_yy=0.0039 inertia_zz=0.0041
            meshes=foot_r.vtp
          CustomJoint subtalar_r: parent_body=talus_r location_in_parent=(-0.04877 -0.04195 0.00792) location=(0 0 0)
            Coordinate subtalar_angle_r: default_value=0 range=(-1.570796 1.570796) clamped=true
            TransformAxis rz: coordinate=subtalar_angle_r axis=(0.7871796 0.6047475 -0.1209495)
        Body toes_r: mass=0.2166 mass_center=(0.0346 0.006 -0.0175) inertia_xx=0.0001 inertia_yy=0.0002
            inertia_zz=0.001 meshes=bofoot_r.vtp
          CustomJoint mtp_r: parent_body=calcn_r location_in_parent=(0.1788 -0.002 0.00108) location=(0 0 0)
            Coordinate mtp_angle_r: default_value=0 range=(-1.570796 1.570796) clamped=true
            TransformAxis rz: coordinate=mtp_angle_r axis=(-0.5809544 0 0.8139361)
        Body femur_l: mass=9.3014 mass_center=(0 -0.17 0) inertia_xx=0.1339 inertia_yy=0.0351 inertia_zz=0.1412
            meshes=femur_l.vtp
          CustomJoint hip_l: parent_body=pelvis location_in_parent=(-0.0707 -0.0661 -0.0835) location=(0 0 0)
            Coordinate hip_flexion_l: default_value=0 range=(-2.094395 2.094395) clamped=true
            Coordinate hip_adduction_l: default_value=0 range=(-2.094395 2.094395) clamped=true
            Coordinate hip_rotation_l: default_value=0 range=(-2.094395 2.094395) clamped=true
            TransformAxis rz: coordinate=hip_flexion_l axis=(0 0 1)
            TransformAxis rx: coordinate=hip_adduction_l axis=(-1 0 0)
            TransformAxis ry: coordinate=hip_rotation_l axis=(0 -1 0)
        Body tibia_l: mass=3.7075 mass_center=(0 -0.1867 0) inertia_xx=0.0504 inertia_yy=0.0051 inertia_zz=0.0511
            meshes=(tibia_l.vtp fibula_l.vtp)
          CustomJoint knee_l: parent_body=femur_l location_in_parent=(0 0 0) location=(0 0 0)
            Coordinate knee_angle_l: default_value=0 range=(-2.094395 0.1745329) clamped=true
            TransformAxis tx: coordinate=knee_angle_l is_rotation=false axis=(1 0 0)
              natCubicSpline: x=(-2.094395 -1.745329 -1.396263 -1.047198 -0.6981317 -0.3490659 -0.1745329 0.1973442 0.337395 0.4901776 1.52146 2.094395)
                  y=(-0.0032 0.00179 0.00411 0.0041 0.00212 -0.001 -0.0031 -0.005227 -0.005435 -0.005574 -0.005435 -0.00525)
            TransformAxis ty: coordinate=knee_angle_l is_rotation=false axis=(0 1 0)
              natCubicSpline: x=(-2.094395 -1.22173 -0.5235988 -0.3490659 -0.1745329 0.1591486 2.094395)
                  y=(-0.4226 -0.4082 -0.399 -0.3976 -0.3966 -0.395264 -0.396)
            TransformAxis rz: coordinate=knee_angle_l axis=(0 0 1)
        Body talus_l: mass=0.1 mass_center=(0 0 0) inertia_xx=0.001 inertia_yy=0.001 inertia_zz=0.001
            meshes=talus_l.vtp
          CustomJoint ankle_l: parent_body=tibia_l location_in_parent=(0 -0.43 0) location=(0 0 0)
            Coordinate ankle_angle_l: default_value=0 range=(-1.570796 1.570796) clamped=true
            TransformAxis rz: coordinate=ankle_angle_l axis=(0 0 1)
        Body calcn_l: mass=1.25 mass_center=(0.1 0.03 0) inertia_xx=0.0014 inertia_yy=0.0039 inertia_zz=0.0041
            meshes=foot_l.vtp
          CustomJoint subtalar_l: parent_body=talus_l location_in_parent=(-0.04877 -0.04195 -0.00792) location=(0 0 0)
            Coordinate subtalar_angle_l: default_value=0 range=(-1.570796 1.570796) clamped=true
            TransformAxis rz: coordinate=subtalar_angle_l axis=(-0.7871796 -0.6047475 -0.1209495)
        Body toes_l: mass=0.2166 mass_center=(0.0346 0.006 -0.0175) inertia_xx=0.0001 inertia_yy=0.0002
            inertia_zz=0.001 meshes=bofoot_l.vtp
          CustomJoint mtp_l: parent_body=calcn_l location_in_parent=(0.1788 -0.002 -0.00108) location=(0 0 0)
            Coordinate mtp_angle_l: default_value=0 range=(-1.570796 1.570796) clamped=true
            TransformAxis rz: coordinate=mtp_angle_l axis=(0.5809544 0 0.8139361)
        Body clavicle: mass=0 mass_center=(0 0 0) inertia_xx=0 inertia_yy=0 inertia_zz=0 meshes=clavicle.vtp
          CustomJoint sternoclavicular: parent_body=thorax location_in_parent=(0.006325 0.00693 0.025465)
              location=(0 0 0)
            Coordinate sternoclavicular_r2: default_value=0 initial_value=0 range=(-99999.9 99999.9) clamped=false
            Coordinate sternoclavicular_r3: default_value=0 initial_value=0 range=(-99999.9 99999.9) clamped=false
            TransformAxis r2: axis=(0.0153 0.9892987 -0.1451) coordinate=sternoclavicular_r2
            TransformAxis r3: axis=(-0.9944725 0 -0.104997) coordinate=sternoclavicular_r3
        Body clavphant: mass=0 mass_center=(0 0 0) inertia_xx=0 inertia_yy=0 inertia_zz=0
          CustomJoint unrotscap: parent_body=clavicle location_in_parent=(-0.01433 0.02007 0.135535) location=(0 0 0)
            Coordinate unrotscap_r3: default_value=0 initial_value=0 range=(-99999.9 99999.9) clamped=false
            Coordinate unrotscap_r2: default_value=0 initial_value=0 range=(-99999.9 99999.9) clamped=false
            TransformAxis r3: axis=(-0.9944725 0 -0.104997) coordinate=unrotscap_r3
            TransformAxis r2: axis=(0.0153 0.9892987 -0.1451) coordinate=unrotscap_r2
        Body scapula: mass=0 mass_center=(0 0 0) inertia_xx=0 inertia_yy=0 inertia_zz=0 meshes=scapula.vtp
          CustomJoint acromioclavicular: parent_body=clavphant location_in_parent=(0 0 0) location=(0 0 0)
            Coordinate acromioclavicular_r2: default_value=0 initial_value=0 range=(-99999.9 99999.9) clamped=false
            Coordinate acromioclavicular_r3: default_value=0 initial_value=0 range=(-99999.9 99999.9) clamped=false
            Coordinate acromioclavicular_r1: default_value=0 initial_value=0 range=(-99999.9 99999.9) clamped=false
            TransformAxis r2: axis=(0.1570949 0.9472686 -0.2792909) coordinate=acromioclavicular_r2
            TransformAxis r3: axis=(-0.754084 0.297594 0.585487) coordinate=acromioclavicular_r3
            TransformAxis r1: axis=(0.6376999 0.1186 0.7610998) coordinate=acromioclavicular_r1
          WrapEllipsoid Deltoid2: dimensions=(0.03 0.04 0.035) active=false
              xyz_body_rotation=(3.130423 -1.548805 -1.314233) translation=(-0.0058 -0.0378 0.0096) quadrant=-y
          WrapTorus Delt3: inner_radius=0.04 outer_radius=0.06 active=false
              xyz_body_rotation=(0.6209881 0.32882 -0.5607743) translation=(-0.0973 -0.0428 -0.037)
          WrapTorus INFSP: inner_radius=0.008 outer_radius=0.019 xyz_body_rotation=(0.02530727 0.5883505 0.1518436)
              translation=(-0.0561 -0.0199 -0.0112)
          WrapEllipsoid TMIN: dimensions=(0.03 0.03 0.05) xyz_body_rotation=(-2.097537 -0.2808235 -1.763481)
              translation=(-0.0418 -0.0519 -0.0359) quadrant=x
          WrapCylinder TRIlongglen: radius=0.003 length=0.03 xyz_body_rotation=(1.375319 -0.2946116 2.435956)
              translation=(-0.0359 -0.0309 -0.0132) quadrant=x
        Body scapphant: mass=0 mass_center=(0 0 0) inertia_xx=0 inertia_yy=0 inertia_zz=0
          CustomJoint unrothum: parent_body=scapula location_in_parent=(-0.00955 -0.034 0.009) location=(0 0 0)
            Coordinate unrothum_r1: default_value=0 initial_value=0 range=(-99999.9 99999.9) clamped=false
            Coordinate unrothum_r3: default_value=0 initial_value=0 range=(-99999.9 99999.9) clamped=false
            Coordinate unrothum_r2: default_value=0 initial_value=0 range=(-99999.9 99999.9) clamped=false
            TransformAxis r1: axis=(0.6376999 0.1186 0.7610998) coordinate=unrothum_r1
            TransformAxis r3: axis=(-0.754084 0.297594 0.585487) coordinate=unrothum_r3
            TransformAxis r2: axis=(0.1570949 0.9472686 -0.2792909) coordinate=unrothum_r2
        Body humphant: mass=0 mass_center=(0 0 0) inertia_xx=0 inertia_yy=0 inertia_zz=0
          CustomJoint shoulder0: parent_body=scapphant location_in_parent=(0 0 0) location=(0 0 0)
            Coordinate elv_angle: default_value=0 initial_value=0 range=(-1.570796 2.268928)
                keys=(s_key leftmouse_button) clamped=true restraint_active=false
            TransformAxis r2: axis=(0.004800001 0.9990892 0.04240001) coordinate=elv_angle
        Body humphant1: mass=0 mass_center=(0 0 0) inertia_xx=0 inertia_yy=0 inertia_zz=0
          CustomJoint shoulder1: parent_body=humphant location_in_parent=(0 0 0) location=(0 0 0)
            Coordinate shoulder_elv: default_value=0 initial_value=0 range=(0 3.141593) keys=(s_key middlemouse_button)
                clamped=true restraint_active=false
            Coordinate shoulder1_r2: default_value=0 initial_value=0 range=(-99999.9 99999.9) clamped=false
            TransformAxis r3: axis=(-0.9982614 0.002300001 0.05889802) coordinate=shoulder_elv
            TransformAxis r2: axis=(0.004800001 0.9990892 0.04240001) coordinate=shoulder1_r2
        Body humerus: mass=0 mass_center=(0 0 0) inertia_xx=0 inertia_yy=0 inertia_zz=0 meshes=humerus.vtp
          CustomJoint shoulder2: parent_body=humphant1 location_in_parent=(0 0 0) location=(0 0 0)
            Coordinate shoulder_rot: default_value=0 initial_value=0 range=(-1.570796 0.3490659)
                keys=(s_key rightmouse_button) clamped=true restraint_active=false
            TransformAxis r2: axis=(0.004800001 0.9990892 0.04240001) coordinate=shoulder_rot
          WrapEllipsoid DELT1hh: dimensions=(0.03 0.1 0.05) xyz_body_rotation=(0.05846853 1.004612 0.5703736)
              translation=(-0.0139 -0.0127 -0.0262) quadrant=z
          WrapCylinder delt2hum: radius=0.0094 length=0.05 xyz_body_rotation=(1.680927 -0.02495821 0.05166175)
              translation=(0.0017 -0.0958 0.0011)
          WrapEllipsoid delt3hum: dimensions=(0.01 0.01 0.05) xyz_body_rotation=(1.727352 0.07592182 -2.743134)
              translation=(0.0019 -0.0592 0.0011) quadrant=x
          WrapEllipsoid SUPSP: dimensions=(0.02 0.02 0.02) xyz_body_rotation=(0.03804818 0.00855211 -1.306728)
              translation=(0.0002 0.0077 0.0043)
          WrapEllipsoid INFSP_and_TMIN_hum_head: dimensions=(0.02 0.025 0.02)
              xyz_body_rotation=(-0.2865831 -0.00907571 -0.06841691) translation=(-0.0003 0.0026 0.0038)
          WrapEllipsoid SUBSCAP: dimensions=(0.02 0.017 0.028) xyz_body_rotation=(-0.9245009 0.288852 0.381529)
              translation=(-0.0025 0.0007 -0.0045)
          WrapCylinder TMINhum: radius=0.007 length=0.07 xyz_body_rotation=(1.753532 0.06928957 2.746276)
              translation=(-0.0014 -0.0455 0) quadrant=x
          WrapSphere TMAJ_LAT_PEC_CORBhh: radius=0.03 translation=(0.0007 0 0.006)
          WrapCylinder TMAJ_LAThum: radius=0.007 length=0.04 xyz_body_rotation=(1.536413 -0.06370452 1.41424)
              translation=(0.0007 -0.0443 -0.0055) quadrant=-x
          WrapEllipsoid PEC1hh: dimensions=(0.03 0.02 0.02) xyz_body_rotation=(-0.6204646 -0.3104941 0.3637266)
              translation=(-0.0037 0.0005 -0.0025) quadrant=-z
          WrapCylinder PEC12hum: radius=0.009 length=0.07 xyz_body_rotation=(1.559277 -0.07749262 -0.9258972)
              translation=(0.002 -0.0508 -0.0017) quadrant=x
          WrapSphere PEC23hh: radius=0.02 translation=(-0.0086 0.0021 -0.0004)
          WrapCylinder PEC3hum: radius=0.008 length=0.07 xyz_body_rotation=(1.440944 -0.0561996 1.751961)
              translation=(0.0009 -0.0551 -0.0004) quadrant=-x
          WrapCylinder LAT_TMAJhh: radius=0.007 length=0.045 xyz_body_rotation=(-0.3050835 -0.01832596 -0.6866125)
              translation=(-0.0224 0.0102 0.0094) quadrant=-y
          WrapSphere LAT_TMAJ2hh: radius=0.03 xyz_body_rotation=(-0.1272345 0.2761111 0.01972222)
              translation=(-0.0016 0.0092 0.0052) quadrant=-z
          WrapCylinder CORBhum: radius=0.008 length=0.05 xyz_body_rotation=(-1.608321 0.09599311 0.8752826)
              translation=(0.0027 -0.1202 -0.0059) quadrant=x
          WrapEllipsoid TRIlonghh: dimensions=(0.035 0.02 0.02) xyz_body_rotation=(3.001617 -0.853466 2.574186)
              translation=(-0.0078 -0.0041 -0.0014) quadrant=z
          WrapCylinder TRI: radius=0.016 length=0.04 xyz_body_rotation=(-0.1401499 -0.00628319 0.1549852)
              translation=(0.0028 -0.2919 -0.0119)
          WrapEllipsoid ANC: dimensions=(0.02 0.02 0.02) xyz_body_rotation=(0.00750492 -0.1966986 1.049292)
              translation=(0.0134 -0.2861 -0.0008) quadrant=-x
          WrapEllipsoid BIClong: dimensions=(0.025 0.02 0.02) xyz_body_rotation=(-2.004336 -1.001644 0.9754645)
              translation=(0.0033 0.0073 0.0003) quadrant=-y
          WrapEllipsoid Elbow_BIC_BRD: dimensions=(0.015 0.015 0.1) xyz_body_rotation=(-0.1286308 0.1375319 0.03071779)
              translation=(0.0019 -0.289 -0.014) quadrant=x
          WrapEllipsoid Elbow_PT_ECRL: dimensions=(0.018 0.025 0.035)
              xyz_body_rotation=(-0.1610939 -0.1108284 0.6145304) translation=(0.003 -0.2872 -0.0069) quadrant=x
        Body ulna: mass=0 mass_center=(0 0 0) inertia_xx=0 inertia_yy=0 inertia_zz=0 meshes=ulna.vtp
          CustomJoint elbow: parent_body=humerus location_in_parent=(0.0061 -0.2904 -0.0123) location=(0 0 0)
            Coordinate elbow_flexion: default_value=0 initial_value=0 range=(0 2.268928) keys=(e_key leftmouse_button)
                clamped=true restraint_active=false
            TransformAxis r3: axis=(0.04940001 0.03660001 0.9981082) coordinate=elbow_flexion
        Body radius: mass=0 mass_center=(0 0 0) inertia_xx=0 inertia_yy=0 inertia_zz=0 meshes=radius.vtp
          CustomJoint radioulnar: parent_body=ulna location_in_parent=(0.0004 -0.011503 0.019999) location=(0 0 0)
            Coordinate pro_sup: default_value=0 initial_value=0 range=(-1.570796 1.570796)
                keys=(p_key leftmouse_button) clamped=true restraint_active=false
            TransformAxis r2: axis=(-0.01716099 0.9926656 -0.119668) coordinate=pro_sup
          WrapTorus ECU: inner_radius=0.006 outer_radius=0.009 xyz_body_rotation=(-0.9866346 -0.1488766 0.222704)
              translation=(-0.0163 -0.2417 0.0349)
        Body lunate: mass=0 mass_center=(0 0 0) inertia_xx=0 inertia_yy=0 inertia_zz=0 meshes=lunate.vtp
          CustomJoint radiocarpal: parent_body=radius location_in_parent=(0.018 -0.242 0.025) location=(0 0 0)
            Coordinate deviation: default_value=0 initial_value=0 range=(-0.1745329 0.4363323)
                keys=(v_key leftmouse_button) clamped=true restraint_active=false
            Coordinate flexion: default_value=0 initial_value=0 range=(-1.22173 1.22173) keys=(f_key leftmouse_button)
                clamped=true restraint_active=false
            TransformAxis r1: axis=(-0.819064 -0.135611 -0.557444) coordinate=deviation
              natCubicSpline: x=(-0.1745329 0 0.4363323) y=(-0.1745329 0 0.4363323)
            TransformAxis r3: axis=(0.9564267 -0.2522069 0.147104) coordinate=flexion
              natCubicSpline: x=(-1.570796 1.570796) y=(-0.7853982 0.7853982)
          WrapTorus ECRL: inner_radius=0.008 outer_radius=0.016 xyz_body_rotation=(1.538333 0.2343977 0.7311184)
              translation=(0.0222 -0.0096 0.0208)
          WrapTorus ECRB: inner_radius=0.008 outer_radius=0.01 xyz_body_rotation=(1.312662 -0.1178097 -0.1162389)
              translation=(0.0126 -0.0095 0.0186)
          WrapTorus FCR: inner_radius=0.001 outer_radius=0.0025 xyz_body_rotation=(-1.555961 -0.1532399 -0.1000074)
              translation=(0.0032 -0.0045 -0.019)
          WrapTorus FCU: inner_radius=0.0068 outer_radius=0.008 xyz_body_rotation=(-1.573763 -0.07976155 0.39235)
              translation=(-0.0123 -0.0124 -0.0171)
        Body scaphoid: mass=0 mass_center=(0 0 0) inertia_xx=0 inertia_yy=0 inertia_zz=0 meshes=scaphoid.vtp
          WeldJoint lun_scaph: parent_body=lunate location_in_parent=(0.012345 -0.004464 -0.001254) location=(0 0 0)
        Body pisiform: mass=0 mass_center=(0 0 0) inertia_xx=0 inertia_yy=0 inertia_zz=0 meshes=pisiform.vtp
          WeldJoint lun_pis: parent_body=lunate location_in_parent=(-0.013388 -0.009886 -0.010593) location=(0 0 0)
        Body triquetrum: mass=0 mass_center=(0 0 0) inertia_xx=0 inertia_yy=0 inertia_zz=0 meshes=triquetrum.vtp
          WeldJoint lun_triq: parent_body=lunate location_in_parent=(-0.010784 -0.007499 -0.001289) location=(0 0 0)
        Body capitate: mass=0 mass_center=(0 0 0) inertia_xx=0 inertia_yy=0 inertia_zz=0 meshes=capitate.vtp
          CustomJoint proximal_distal: parent_body=lunate location_in_parent=(0.003992 -0.015054 0.002327)
              location=(0 0 0)
            Coordinate proximal_distal_r1: default_value=0 initial_value=0 range=(-99999.9 99999.9) clamped=false
            Coordinate proximal_distal_r3: default_value=0 initial_value=0 range=(-99999.9 99999.9) clamped=false
            TransformAxis r1: axis=(0.8991357 -0.3490529 -0.2640399) coordinate=proximal_distal_r1
            TransformAxis r3: axis=(0.9971185 0.01069999 -0.07510096) coordinate=proximal_distal_r3
        Body trapezium: mass=0 mass_center=(0 0 0) inertia_xx=0 inertia_yy=0 inertia_zz=0 meshes=trapezium.vtp
          WeldJoint cap_trpzm: parent_body=capitate location_in_parent=(0.015293 -0.004569 -0.010308) location=(0 0 0)
        Body trapezoid: mass=0 mass_center=(0 0 0) inertia_xx=0 inertia_yy=0 inertia_zz=0 meshes=trapezoid.vtp
          WeldJoint cap_trpzd: parent_body=capitate location_in_parent=(0.009143 -0.004062 -0.002464) location=(0 0 0)
        Body hamate: mass=0 mass_center=(0 0 0) inertia_xx=0 inertia_yy=0 inertia_zz=0 meshes=hamate.vtp
          WeldJoint cap_ham: parent_body=capitate location_in_parent=(-0.010969 -0.002495 -0.00075) location=(0 0 0)
        Body firstmc1: mass=0 mass_center=(0 0 0) inertia_xx=0 inertia_yy=0 inertia_zz=0
          WeldJoint CMC1a: parent_body=trapezium location_in_parent=(0 0 0) location=(0 0 0)
        Body firstmc: mass=0 mass_center=(0 0 0) inertia_xx=0 inertia_yy=0 inertia_zz=0 meshes=1mc.vtp
          WeldJoint CMC1b: parent_body=firstmc1 location_in_parent=(0.0072 -0.0054 -0.0025) location=(0 0 0)
        Body secondmc: mass=0 mass_center=(0 0 0) inertia_xx=0 inertia_yy=0 inertia_zz=0 meshes=2mc.vtp
          WeldJoint CMC2: parent_body=capitate location_in_parent=(0.014685 -0.03762 0.005032) location=(0 0 0)
        Body thirdmc: mass=0 mass_center=(0 0 0) inertia_xx=0 inertia_yy=0 inertia_zz=0 meshes=3mc.vtp
          WeldJoint CMC3: parent_body=capitate location_in_parent=(0.000477 -0.039239 0.007377) location=(0 0 0)
        Body fourthmc: mass=0 mass_center=(0 0 0) inertia_xx=0 inertia_yy=0 inertia_zz=0 meshes=4mc.vtp
          WeldJoint CMC4: parent_body=capitate location_in_parent=(-0.012046 -0.040519 0.003513) location=(0 0 0)
        Body fifthmc: mass=0 mass_center=(0 0 0) inertia_xx=0 inertia_yy=0 inertia_zz=0 meshes=5mc.vtp
          WeldJoint CMC5: parent_body=capitate location_in_parent=(-0.021896 -0.034683 -0.004218) location=(0 0 0)
        Body proximal_thumb: mass=0 mass_center=(0 0 0) inertia_xx=0 inertia_yy=0 inertia_zz=0 meshes=thumbprox.vtp
          WeldJoint MCP: parent_body=firstmc location_in_parent=(0.0165 -0.0292 -0.0127) location=(0 0 0)
        Body distal_thumb: mass=0 mass_center=(0 0 0) inertia_xx=0 inertia_yy=0 inertia_zz=0 meshes=thumbdist.vtp
          WeldJoint IP: parent_body=proximal_thumb location_in_parent=(0.014 -0.0259 -0.0101) location=(0 0 0)
        Body 2proxph: mass=0 mass_center=(0 0 0) inertia_xx=0 inertia_yy=0 inertia_zz=0 meshes=2proxph.vtp
          WeldJoint 2MCP: parent_body=secondmc location_in_parent=(0.003501 -0.028243 0.00362) location=(0 0 0)
        Body 2midph: mass=0 mass_center=(0 0 0) inertia_xx=0 inertia_yy=0 inertia_zz=0 meshes=2midph.vtp
          WeldJoint 2prox-midph: parent_body=2proxph location_in_parent=(0.007517 -0.041273 0.007326) location=(0 0 0)
        Body 2distph: mass=0 mass_center=(0 0 0) inertia_xx=0 inertia_yy=0 inertia_zz=0 meshes=2distph.vtp
          WeldJoint 2mid-distph: parent_body=2midph location_in_parent=(0.003333 -0.024888 0.00122) location=(0 0 0)
        Body 3proxph: mass=0 mass_center=(0 0 0) inertia_xx=0 inertia_yy=0 inertia_zz=0 meshes=3proxph.vtp
          WeldJoint 3MCP: parent_body=thirdmc location_in_parent=(0.00024 -0.02629 0.001778) location=(0 0 0)
        Body 3midph: mass=0 mass_center=(0 0 0) inertia_xx=0 inertia_yy=0 inertia_zz=0 meshes=3midph.vtp
          WeldJoint 3prox-midph: parent_body=3proxph location_in_parent=(0.00165 -0.044211 0.00623) location=(0 0 0)
        Body 3distph: mass=0 mass_center=(0 0 0) inertia_xx=0 inertia_yy=0 inertia_zz=0 meshes=3distph.vtp
          WeldJoint 3mid-distph: parent_body=3midph location_in_parent=(0.001365 -0.029047 0.001954) location=(0 0 0)
        Body 4proxph: mass=0 mass_center=(0 0 0) inertia_xx=0 inertia_yy=0 inertia_zz=0 meshes=4proxph.vtp
          WeldJoint 4MCP: parent_body=fourthmc location_in_parent=(-0.00183 -0.023689 -0.000173) location=(0 0 0)
        Body 4midph: mass=0 mass_center=(0 0 0) inertia_xx=0 inertia_yy=0 inertia_zz=0 meshes=4midph.vtp
          WeldJoint 4prox-midph: parent_body=4proxph location_in_parent=(-0.003528 -0.040255 0.001345) location=(0 0 0)
        Body 4distph: mass=0 mass_center=(0 0 0) inertia_xx=0 inertia_yy=0 inertia_zz=0 meshes=4distph.vtp
          WeldJoint 4mid-distph: parent_body=4midph location_in_parent=(-0.002317 -0.024789 0.000563) location=(0 0 0)
        Body 5proxph: mass=0 mass_center=(0 0 0) inertia_xx=0 inertia_yy=0 inertia_zz=0 meshes=5proxph.vtp
          WeldJoint 5MCP: parent_body=fifthmc location_in_parent=(-0.001597 -0.021431 -0.001496) location=(0 0 0)
        Body 5midph: mass=0 mass_center=(0 0 0) inertia_xx=0 inertia_yy=0 inertia_zz=0 meshes=5midph.vtp
          WeldJoint 5prox-midph: parent_body=5proxph location_in_parent=(-0.005279 -0.035563 -0.002879)
              location=(0 0 0)
        Body 5distph: mass=0 mass_center=(0 0 0) inertia_xx=0 inertia_yy=0 inertia_zz=0 meshes=5distph.vtp
          WeldJoint 5mid-distph: parent_body=5midph location_in_parent=(-0.002871 -0.020677 -0.002243) location=(0 0 0)
        Body bicpt: mass=0 mass_center=(0 0 0) inertia_xx=0 inertia_yy=0 inertia_zz=0
          CustomJoint bicpt: parent_body=radius location_in_parent=(0 0 0) location=(0 0 0)
            Coordinate bicpt_tx: default_value=-0.0001 initial_value=-0.0001 range=(-99999.9 99999.9) clamped=false
            Coordinate bicpt_ty: default_value=-0.0276 initial_value=-0.0276 range=(-99999.9 99999.9) clamped=false
            Coordinate bicpt_tz: default_value=-0.0043 initial_value=-0.0043 range=(-99999.9 99999.9) clamped=false
            TransformAxis tx: is_rotation=false axis=(1 0 0) coordinate=bicpt_tx
            TransformAxis ty: is_rotation=false axis=(0 1 0) coordinate=bicpt_ty
            TransformAxis tz: is_rotation=false axis=(0 0 1) coordinate=bicpt_tz
        Body bicpt2: mass=0 mass_center=(0 0 0) inertia_xx=0 inertia_yy=0 inertia_zz=0
          CustomJoint bicpt2: parent_body=radius location_in_parent=(0 0 0) location=(0 0 0)
            Coordinate bicpt2_tx: default_value=0.0146695 initial_value=0.0146695 range=(-99999.9 99999.9)
                clamped=false
            Coordinate bicpt2_ty: default_value=-0.0102 initial_value=-0.0102 range=(-99999.9 99999.9) clamped=false
            Coordinate bicpt2_tz: default_value=-0.01061843 initial_value=-0.01061843 range=(-99999.9 99999.9)
                clamped=false
            TransformAxis tx: is_rotation=false axis=(1 0 0) coordinate=bicpt2_tx
            TransformAxis ty: is_rotation=false axis=(0 1 0) coordinate=bicpt2_ty
            TransformAxis tz: is_rotation=false axis=(0 0 1) coordinate=bicpt2_tz
        Body ptpt: mass=0 mass_center=(0 0 0) inertia_xx=0 inertia_yy=0 inertia_zz=0
          CustomJoint ptpt: parent_body=ulna location_in_parent=(0 0 0) location=(0 0 0)
            Coordinate ptpt_tx: default_value=0.00755 initial_value=0.00755 range=(-99999.9 99999.9) clamped=false
            Coordinate ptpt_ty: default_value=-0.0649 initial_value=-0.0649 range=(-99999.9 99999.9) clamped=false
            Coordinate ptpt_tz: default_value=-0.00005 initial_value=-0.00005 range=(-99999.9 99999.9) clamped=false
            TransformAxis tx: is_rotation=false axis=(1 0 0) coordinate=ptpt_tx
            TransformAxis ty: is_rotation=false axis=(0 1 0) coordinate=ptpt_ty
            TransformAxis tz: is_rotation=false axis=(0 0 1) coordinate=ptpt_tz
        Body FCUpt: mass=0 mass_center=(0 0 0) inertia_xx=0 inertia_yy=0 inertia_zz=0
          CustomJoint FCUpt: parent_body=radius location_in_parent=(0 0 0) location=(0 0 0)
            Coordinate FCUpt_tx: default_value=0.004 initial_value=0.004 range=(-99999.9 99999.9) clamped=false
            Coordinate FCUpt_ty: default_value=-0.1841 initial_value=-0.1841 range=(-99999.9 99999.9) clamped=false
            Coordinate FCUpt_tz: default_value=0.0005 initial_value=0.0005 range=(-99999.9 99999.9) clamped=false
            TransformAxis tx: is_rotation=false axis=(1 0 0) coordinate=FCUpt_tx
            TransformAxis ty: is_rotation=false axis=(0 1 0) coordinate=FCUpt_ty
            TransformAxis tz: is_rotation=false axis=(0 0 1) coordinate=FCUpt_tz
        Body EDCpt: mass=0 mass_center=(0 0 0) inertia_xx=0 inertia_yy=0 inertia_zz=0
          CustomJoint EDCpt: parent_body=radius location_in_parent=(0 0 0) location=(0 0 0)
            Coordinate EDCpt_tx: default_value=0 initial_value=0 range=(-99999.9 99999.9) clamped=false
            Coordinate EDCpt_ty: default_value=0 initial_value=0 range=(-99999.9 99999.9) clamped=false
            Coordinate EDCpt_tz: default_value=0 initial_value=0 range=(-99999.9 99999.9) clamped=false
            TransformAxis tx: is_rotation=false axis=(1 0 0) coordinate=EDCpt_tx
            TransformAxis ty: is_rotation=false axis=(0 1 0) coordinate=EDCpt_ty
            TransformAxis tz: is_rotation=false axis=(0 0 1) coordinate=EDCpt_tz
        Body APLpt: mass=0 mass_center=(0 0 0) inertia_xx=0 inertia_yy=0 inertia_zz=0
          CustomJoint APLpt: parent_body=capitate location_in_parent=(0 0 0) location=(0 0 0)
            Coordinate APLpt_tx: default_value=0 initial_value=0 range=(-99999.9 99999.9) clamped=false
            Coordinate APLpt_ty: default_value=0 initial_value=0 range=(-99999.9 99999.9) clamped=false
            Coordinate APLpt_tz: default_value=0 initial_value=0 range=(-99999.9 99999.9) clamped=false
            TransformAxis tx: is_rotation=false axis=(1 0 0) coordinate=APLpt_tx
            TransformAxis ty: is_rotation=false axis=(0 1 0) coordinate=APLpt_ty
            TransformAxis tz: is_rotation=false axis=(0 0 1) coordinate=APLpt_tz
        Body FPLpt: mass=0 mass_center=(0 0 0) inertia_xx=0 inertia_yy=0 inertia_zz=0
          CustomJoint FPLpt: parent_body=capitate location_in_parent=(0 0 0) location=(0 0 0)
            Coordinate FPLpt_tx: default_value=0 initial_value=0 range=(-99999.9 99999.9) clamped=false
            Coordinate FPLpt_ty: default_value=0 initial_value=0 range=(-99999.9 99999.9) clamped=false
            Coordinate FPLpt_tz: default_value=0 initial_value=0 range=(-99999.9 99999.9) clamped=false
            TransformAxis tx: is_rotation=false axis=(1 0 0) coordinate=FPLpt_tx
            TransformAxis ty: is_rotation=false axis=(0 1 0) coordinate=FPLpt_ty
            TransformAxis tz: is_rotation=false axis=(0 0 1) coordinate=FPLpt_tz
        Body FPLpt2: mass=0 mass_center=(0 0 0) inertia_xx=0 inertia_yy=0 inertia_zz=0
          WeldJoint FPLpt2: parent_body=capitate location_in_parent=(0 0 0) location=(0 0 0)
        Body PEC1pt2: mass=0 mass_center=(0 0 0) inertia_xx=0 inertia_yy=0 inertia_zz=0
          CustomJoint PEC1pt2: parent_body=humerus location_in_parent=(0 0 0) location=(0 0 0)
            Coordinate PEC1pt2_tx: default_value=0 initial_value=0 range=(-99999.9 99999.9) clamped=false
            Coordinate PEC1pt2_ty: default_value=0 initial_value=0 range=(-99999.9 99999.9) clamped=false
            Coordinate PEC1pt2_tz: default_value=0 initial_value=0 range=(-99999.9 99999.9) clamped=false
            TransformAxis tx: is_rotation=false axis=(1 0 0) coordinate=PEC1pt2_tx
            TransformAxis ty: is_rotation=false axis=(0 1 0) coordinate=PEC1pt2_ty
            TransformAxis tz: is_rotation=false axis=(0 0 1) coordinate=PEC1pt2_tz
        Body PEC1pt3: mass=0 mass_center=(0 0 0) inertia_xx=0 inertia_yy=0 inertia_zz=0
          CustomJoint PEC1pt3: parent_body=thorax location_in_parent=(0 0 0) location=(0 0 0)
            Coordinate PEC1pt3_tx: default_value=0 initial_value=0 range=(-99999.9 99999.9) clamped=false
            Coordinate PEC1pt3_ty: default_value=0 initial_value=0 range=(-99999.9 99999.9) clamped=false
            Coordinate PEC1pt3_tz: default_value=0 initial_value=0 range=(-99999.9 99999.9) clamped=false
            TransformAxis tx: is_rotation=false axis=(1 0 0) coordinate=PEC1pt3_tx
            TransformAxis ty: is_rotation=false axis=(0 1 0) coordinate=PEC1pt3_ty
            TransformAxis tz: is_rotation=false axis=(0 0 1) coordinate=PEC1pt3_tz
        Body PEC2pt2: mass=0 mass_center=(0 0 0) inertia_xx=0 inertia_yy=0 inertia_zz=0
          CustomJoint PEC2pt2: parent_body=humerus location_in_parent=(0 0 0) location=(0 0 0)
            Coordinate PEC2pt2_tx: default_value=0 initial_value=0 range=(-99999.9 99999.9) clamped=false
            Coordinate PEC2pt2_ty: default_value=0 initial_value=0 range=(-99999.9 99999.9) clamped=false
            Coordinate PEC2pt2_tz: default_value=0 initial_value=0 range=(-99999.9 99999.9) clamped=false
            TransformAxis tx: is_rotation=false axis=(1 0 0) coordinate=PEC2pt2_tx
            TransformAxis ty: is_rotation=false axis=(0 1 0) coordinate=PEC2pt2_ty
            TransformAxis tz: is_rotation=false axis=(0 0 1) coordinate=PEC2pt2_tz
        Body PEC2pt3: mass=0 mass_center=(0 0 0) inertia_xx=0 inertia_yy=0 inertia_zz=0
          CustomJoint PEC2pt3: parent_body=thorax location_in_parent=(0 0 0) location=(0 0 0)
            Coordinate PEC2pt3_tx: default_value=0 initial_value=0 range=(-99999.9 99999.9) clamped=false
            Coordinate PEC2pt3_ty: default_value=0 initial_value=0 range=(-99999.9 99999.9) clamped=false
            Coordinate PEC2pt3_tz: default_value=0 initial_value=0 range=(-99999.9 99999.9) clamped=false
            TransformAxis tx: is_rotation=false axis=(1 0 0) coordinate=PEC2pt3_tx
            TransformAxis ty: is_rotation=false axis=(0 1 0) coordinate=PEC2pt3_ty
            TransformAxis tz: is_rotation=false axis=(0 0 1) coordinate=PEC2pt3_tz
        Body PEC3pt2: mass=0 mass_center=(0 0 0) inertia_xx=0 inertia_yy=0 inertia_zz=0
          CustomJoint PEC3pt2: parent_body=humerus location_in_parent=(0 0 0) location=(0 0 0)
            Coordinate PEC3pt2_tx: default_value=0 initial_value=0 range=(-99999.9 99999.9) clamped=false
            Coordinate PEC3pt2_ty: default_value=0 initial_value=0 range=(-99999.9 99999.9) clamped=false
            Coordinate PEC3pt2_tz: default_value=0 initial_value=0 range=(-99999.9 99999.9) clamped=false
            TransformAxis tx: is_rotation=false axis=(1 0 0) coordinate=PEC3pt2_tx
            TransformAxis ty: is_rotation=false axis=(0 1 0) coordinate=PEC3pt2_ty
            TransformAxis tz: is_rotation=false axis=(0 0 1) coordinate=PEC3pt2_tz
        Body PEC3pt3: mass=0 mass_center=(0 0 0) inertia_xx=0 inertia_yy=0 inertia_zz=0
          CustomJoint PEC3pt3: parent_body=thorax location_in_parent=(0 0 0) location=(0 0 0)
            Coordinate PEC3pt3_tx: default_value=0 initial_value=0 range=(-99999.9 99999.9) clamped=false
            Coordinate PEC3pt3_ty: default_value=0.000225322 initial_value=0.000225322 range=(-99999.9 99999.9)
                clamped=false
            Coordinate PEC3pt3_tz: default_value=0 initial_value=0 range=(-99999.9 99999.9) clamped=false
            TransformAxis tx: is_rotation=false axis=(1 0 0) coordinate=PEC3pt3_tx
            TransformAxis ty: is_rotation=false axis=(0 1 0) coordinate=PEC3pt3_ty
            TransformAxis tz: is_rotation=false axis=(0 0 1) coordinate=PEC3pt3_tz
        Body DELT2pt2a: mass=0 mass_center=(0 0 0) inertia_xx=0 inertia_yy=0 inertia_zz=0
          CustomJoint DELT2pt2a: parent_body=humerus location_in_parent=(0 0 0) location=(0 0 0)
            Coordinate DELT2pt2a_tx: default_value=0 initial_value=0 range=(-99999.9 99999.9) clamped=false
            Coordinate DELT2pt2a_ty: default_value=0 initial_value=0 range=(-99999.9 99999.9) clamped=false
            Coordinate DELT2pt2a_tz: default_value=0 initial_value=0 range=(-99999.9 99999.9) clamped=false
            TransformAxis tx: is_rotation=false axis=(1 0 0) coordinate=DELT2pt2a_tx
            TransformAxis ty: is_rotation=false axis=(0 1 0) coordinate=DELT2pt2a_ty
            TransformAxis tz: is_rotation=false axis=(0 0 1) coordinate=DELT2pt2a_tz
        Body DELT2pt2: mass=0 mass_center=(0 0 0) inertia_xx=0 inertia_yy=0 inertia_zz=0
          CustomJoint DELT2pt2: parent_body=DELT2pt2a location_in_parent=(0 0 0) location=(0 0 0)
            Coordinate DELT2pt2_tx: default_value=-0.0004399096 initial_value=-0.0004399096 range=(-99999.9 99999.9)
                clamped=false
            Coordinate DELT2pt2_ty: default_value=0 initial_value=0 range=(-99999.9 99999.9) clamped=false
            Coordinate DELT2pt2_tz: default_value=0 initial_value=0 range=(-99999.9 99999.9) clamped=false
            TransformAxis tx: is_rotation=false axis=(1 0 0) coordinate=DELT2pt2_tx
            TransformAxis ty: is_rotation=false axis=(0 1 0) coordinate=DELT2pt2_ty
            TransformAxis tz: is_rotation=false axis=(0 0 1) coordinate=DELT2pt2_tz
        Body LAT1pt2: mass=0 mass_center=(0 0 0) inertia_xx=0 inertia_yy=0 inertia_zz=0
          CustomJoint LAT1pt2: parent_body=scapula location_in_parent=(0 0 0) location=(0 0 0)
            Coordinate LAT1pt2_tx: default_value=0 initial_value=0 range=(-99999.9 99999.9) clamped=false
            Coordinate LAT1pt2_ty: default_value=0 initial_value=0 range=(-99999.9 99999.9) clamped=false
            Coordinate LAT1pt2_tz: default_value=0 initial_value=0 range=(-99999.9 99999.9) clamped=false
            TransformAxis tx: is_rotation=false axis=(1 0 0) coordinate=LAT1pt2_tx
            TransformAxis ty: is_rotation=false axis=(0 1 0) coordinate=LAT1pt2_ty
            TransformAxis tz: is_rotation=false axis=(0 0 1) coordinate=LAT1pt2_tz
        Body LAT1pt3: mass=0 mass_center=(0 0 0) inertia_xx=0 inertia_yy=0 inertia_zz=0
          CustomJoint LAT1pt3: parent_body=scapula location_in_parent=(0 0 0) location=(0 0 0)
            Coordinate LAT1pt3_tx: default_value=0 initial_value=0 range=(-99999.9 99999.9) clamped=false
            Coordinate LAT1pt3_ty: default_value=0 initial_value=0 range=(-99999.9 99999.9) clamped=false
            Coordinate LAT1pt3_tz: default_value=0 initial_value=0 range=(-99999.9 99999.9) clamped=false
            TransformAxis tx: is_rotation=false axis=(1 0 0) coordinate=LAT1pt3_tx
            TransformAxis ty: is_rotation=false axis=(0 1 0) coordinate=LAT1pt3_ty
            TransformAxis tz: is_rotation=false axis=(0 0 1) coordinate=LAT1pt3_tz
        Body LAT2pt2: mass=0 mass_center=(0 0 0) inertia_xx=0 inertia_yy=0 inertia_zz=0
          CustomJoint LAT2pt2: parent_body=scapula location_in_parent=(0 0 0) location=(0 0 0)
            Coordinate LAT2pt2_tx: default_value=0 initial_value=0 range=(-99999.9 99999.9) clamped=false
            Coordinate LAT2pt2_ty: default_value=0 initial_value=0 range=(-99999.9 99999.9) clamped=false
            Coordinate LAT2pt2_tz: default_value=0 initial_value=0 range=(-99999.9 99999.9) clamped=false
            TransformAxis tx: is_rotation=false axis=(1 0 0) coordinate=LAT2pt2_tx
            TransformAxis ty: is_rotation=false axis=(0 1 0) coordinate=LAT2pt2_ty
            TransformAxis tz: is_rotation=false axis=(0 0 1) coordinate=LAT2pt2_tz
        Body LAT2pt3: mass=0 mass_center=(0 0 0) inertia_xx=0 inertia_yy=0 inertia_zz=0
          CustomJoint LAT2pt3: parent_body=scapula location_in_parent=(0 0 0) location=(0 0 0)
            Coordinate LAT2pt3_tx: default_value=0 initial_value=0 range=(-99999.9 99999.9) clamped=false
            Coordinate LAT2pt3_ty: default_value=0 initial_value=0 range=(-99999.9 99999.9) clamped=false
            Coordinate LAT2pt3_tz: default_value=0 initial_value=0 range=(-99999.9 99999.9) clamped=false
            TransformAxis tx: is_rotation=false axis=(1 0 0) coordinate=LAT2pt3_tx
            TransformAxis ty: is_rotation=false axis=(0 1 0) coordinate=LAT2pt3_ty
            TransformAxis tz: is_rotation=false axis=(0 0 1) coordinate=LAT2pt3_tz
        Body LAT3pt2: mass=0 mass_center=(0 0 0) inertia_xx=0 inertia_yy=0 inertia_zz=0
          CustomJoint LAT3pt2: parent_body=scapula location_in_parent=(0 0 0) location=(0 0 0)
            Coordinate LAT3pt2_tx: default_value=0 initial_value=0 range=(-99999.9 99999.9) clamped=false
            Coordinate LAT3pt2_ty: default_value=0 initial_value=0 range=(-99999.9 99999.9) clamped=false
            Coordinate LAT3pt2_tz: default_value=0 initial_value=0 range=(-99999.9 99999.9) clamped=false
            TransformAxis tx: is_rotation=false axis=(1 0 0) coordinate=LAT3pt2_tx
            TransformAxis ty: is_rotation=false axis=(0 1 0) coordinate=LAT3pt2_ty
            TransformAxis tz: is_rotation=false axis=(0 0 1) coordinate=LAT3pt2_tz
        Body LAT3pt3: mass=0 mass_center=(0 0 0) inertia_xx=0 inertia_yy=0 inertia_zz=0
          CustomJoint LAT3pt3: parent_body=scapula location_in_parent=(0 0 0) location=(0 0 0)
            Coordinate LAT3pt3_tx: default_value=0 initial_value=0 range=(-99999.9 99999.9) clamped=false
            Coordinate LAT3pt3_ty: default_value=0 initial_value=0 range=(-99999.9 99999.9) clamped=false
            Coordinate LAT3pt3_tz: default_value=0 initial_value=0 range=(-99999.9 99999.9) clamped=false
            TransformAxis tx: is_rotation=false axis=(1 0 0) coordinate=LAT3pt3_tx
            TransformAxis ty: is_rotation=false axis=(0 1 0) coordinate=LAT3pt3_ty
            TransformAxis tz: is_rotation=false axis=(0 0 1) coordinate=LAT3pt3_tz
        Body clavicle_l: mass=0 mass_center=(0 0 0) inertia_xx=0 inertia_yy=0 inertia_zz=0 meshes=clavicle_l.vtp
          CustomJoint sternoclavicular_l: parent_body=thorax location_in_parent=(0.006325 0.00693 -0.025465)
              location=(0 0 0)
            Coordinate sternoclavicular_r2_l: default_value=0 initial_value=0 range=(-99999.9 99999.9) clamped=false
            Coordinate sternoclavicular_r3_l: default_value=0 initial_value=0 range=(-99999.9 99999.9) clamped=false
            TransformAxis r2: axis=(-0.0153 -0.9892987 -0.1451) coordinate=sternoclavicular_r2_l
            TransformAxis r3: axis=(0.9944725 0 -0.104997) coordinate=sternoclavicular_r3_l
        Body clavphant_l: mass=0 mass_center=(0 0 0) inertia_xx=0 inertia_yy=0 inertia_zz=0
          CustomJoint unrotscap_l: parent_body=clavicle_l location_in_parent=(-0.01433 0.02007 -0.135535)
              location=(0 0 0)
            Coordinate unrotscap_r3_l: default_value=0 initial_value=0 range=(-99999.9 99999.9) clamped=false
            Coordinate unrotscap_r2_l: default_value=0 initial_value=0 range=(-99999.9 99999.9) clamped=false
            TransformAxis r3: axis=(0.9944725 0 -0.104997) coordinate=unrotscap_r3_l
            TransformAxis r2: axis=(-0.0153 -0.9892987 -0.1451) coordinate=unrotscap_r2_l
        Body scapula_l: mass=0 mass_center=(0 0 0) inertia_xx=0 inertia_yy=0 inertia_zz=0 meshes=scapula_l.vtp
          CustomJoint acromioclavicular_l: parent_body=clavphant_l location_in_parent=(0 0 0) location=(0 0 0)
            Coordinate acromioclavicular_r2_l: default_value=0 initial_value=0 range=(-99999.9 99999.9) clamped=false
            Coordinate acromioclavicular_r3_l: default_value=0 initial_value=0 range=(-99999.9 99999.9) clamped=false
            Coordinate acromioclavicular_r1_l: default_value=0 initial_value=0 range=(-99999.9 99999.9) clamped=false
            TransformAxis r2: axis=(-0.1570949 -0.9472686 -0.2792909) coordinate=acromioclavicular_r2_l
            TransformAxis r3: axis=(0.754084 -0.297594 0.585487) coordinate=acromioclavicular_r3_l
            TransformAxis r1: axis=(-0.6376999 -0.1186 0.7610998) coordinate=acromioclavicular_r1_l
          WrapEllipsoid Deltoid2_l: dimensions=(0.03 0.04 0.035) active=false
              xyz_body_rotation=(-3.130423 1.548805 -1.314233) translation=(-0.0058 -0.0378 -0.0096) quadrant=-y
          WrapTorus Delt3_l: inner_radius=0.04 outer_radius=0.06 active=false
              xyz_body_rotation=(-0.6209881 -0.32882 -0.5607743) translation=(-0.0973 -0.0428 0.037)
          WrapTorus INFSP_l: inner_radius=0.008 outer_radius=0.019 xyz_body_rotation=(-0.02530727 -0.5883505 0.1518436)
              translation=(-0.0561 -0.0199 0.0112)
          WrapEllipsoid TMIN_l: dimensions=(0.03 0.03 0.05) xyz_body_rotation=(2.097537 0.2808235 -1.763481)
              translation=(-0.0418 -0.0519 0.0359) quadrant=x
          WrapCylinder TRIlongglen_l: radius=0.003 length=0.03 xyz_body_rotation=(-1.375319 0.2946116 2.435956)
              translation=(-0.0359 -0.0309 0.0132) quadrant=x
        Body scapphant_l: mass=0 mass_center=(0 0 0) inertia_xx=0 inertia_yy=0 inertia_zz=0
          CustomJoint unrothum_l: parent_body=scapula_l location_in_parent=(-0.00955 -0.034 -0.009) location=(0 0 0)
            Coordinate unrothum_r1_l: default_value=0 initial_value=0 range=(-99999.9 99999.9) clamped=false
            Coordinate unrothum_r3_l: default_value=0 initial_value=0 range=(-99999.9 99999.9) clamped=false
            Coordinate unrothum_r2_l: default_value=0 initial_value=0 range=(-99999.9 99999.9) clamped=false
            TransformAxis r1: axis=(-0.6376999 -0.1186 0.7610998) coordinate=unrothum_r1_l
            TransformAxis r3: axis=(0.754084 -0.297594 0.585487) coordinate=unrothum_r3_l
            TransformAxis r2: axis=(-0.1570949 -0.9472686 -0.2792909) coordinate=unrothum_r2_l
        Body humphant_l: mass=0 mass_center=(0 0 0) inertia_xx=0 inertia_yy=0 inertia_zz=0
          CustomJoint shoulder0_l: parent_body=scapphant_l location_in_parent=(0 0 0) location=(0 0 0)
            Coordinate elv_angle_l: default_value=0 initial_value=0 range=(-1.570796 2.268928)
                keys=(s_key leftmouse_button) clamped=true restraint_active=false
            TransformAxis r2: axis=(-0.004800001 -0.9990892 0.04240001) coordinate=elv_angle_l
        Body humphant1_l: mass=0 mass_center=(0 0 0) inertia_xx=0 inertia_yy=0 inertia_zz=0
          CustomJoint shoulder1_l: parent_body=humphant_l location_in_parent=(0 0 0) location=(0 0 0)
            Coordinate shoulder_elv_l: default_value=0 initial_value=0 range=(0 3.141593)
                keys=(s_key middlemouse_button) clamped=true restraint_active=false
            Coordinate shoulder1_r2_l: default_value=0 initial_value=0 range=(-99999.9 99999.9) clamped=false
            TransformAxis r3: axis=(0.9982614 -0.002300001 0.05889802) coordinate=shoulder_elv_l
            TransformAxis r2: axis=(-0.004800001 -0.9990892 0.04240001) coordinate=shoulder1_r2_l
        Body humerus_l: mass=0 mass_center=(0 0 0) inertia_xx=0 inertia_yy=0 inertia_zz=0 meshes=humerus_l.vtp
          CustomJoint shoulder2_l: parent_body=humphant1_l location_in_parent=(0 0 0) location=(0 0 0)
            Coordinate shoulder_rot_l: default_value=0 initial_value=0 range=(-1.570796 0.3490659)
                keys=(s_key rightmouse_button) clamped=true restraint_active=false
            TransformAxis r2: axis=(-0.004800001 -0.9990892 0.04240001) coordinate=shoulder_rot_l
          WrapEllipsoid DELT1hh_l: dimensions=(0.03 0.1 0.05) xyz_body_rotation=(-0.05846853 -1.004612 0.5703736)
              translation=(-0.0139 -0.0127 0.0262) quadrant=-z
          WrapCylinder delt2hum_l: radius=0.0094 length=0.05 xyz_body_rotation=(-1.680927 0.02495821 0.05166175)
              translation=(0.0017 -0.0958 -0.0011)
          WrapEllipsoid delt3hum_l: dimensions=(0.01 0.01 0.05) xyz_body_rotation=(-1.727352 -0.07592182 -2.743134)
              translation=(0.0019 -0.0592 -0.0011) quadrant=x
          WrapEllipsoid SUPSP_l: dimensions=(0.02 0.02 0.02) xyz_body_rotation=(-0.03804818 -0.00855211 -1.306728)
              translation=(0.0002 0.0077 -0.0043)
          WrapEllipsoid INFSP_and_TMIN_hum_head_l: dimensions=(0.02 0.025 0.02)
              xyz_body_rotation=(0.2865831 0.00907571 -0.06841691) translation=(-0.0003 0.0026 -0.0038)
          WrapEllipsoid SUBSCAP_l: dimensions=(0.02 0.017 0.028) xyz_body_rotation=(0.9245009 -0.288852 0.381529)
              translation=(-0.0025 0.0007 0.0045)
          WrapCylinder TMINhum_l: radius=0.007 length=0.07 xyz_body_rotation=(-1.753532 -0.06928957 2.746276)
              translation=(-0.0014 -0.0455 0) quadrant=x
          WrapSphere TMAJ_LAT_PEC_CORBhh_l: radius=0.03 translation=(0.0007 0 -0.006)
          WrapCylinder TMAJ_LAThum_l: radius=0.007 length=0.04 xyz_body_rotation=(-1.536413 0.06370452 1.41424)
              translation=(0.0007 -0.0443 0.0055) quadrant=-x
          WrapEllipsoid PEC1hh_l: dimensions=(0.03 0.02 0.02) xyz_body_rotation=(0.6204646 0.3104941 0.3637266)
              translation=(-0.0037 0.0005 0.0025) quadrant=z
          WrapCylinder PEC12hum_l: radius=0.009 length=0.07 xyz_body_rotation=(-1.559277 0.07749262 -0.9258972)
              translation=(0.002 -0.0508 0.0017) quadrant=x
          WrapSphere PEC23hh_l: radius=0.02 translation=(-0.0086 0.0021 0.0004)
          WrapCylinder PEC3hum_l: radius=0.008 length=0.07 xyz_body_rotation=(-1.440944 0.0561996 1.751961)
              translation=(0.0009 -0.0551 0.0004) quadrant=-x
          WrapCylinder LAT_TMAJhh_l: radius=0.007 length=0.045 xyz_body_rotation=(0.3050835 0.01832596 -0.6866125)
              translation=(-0.0224 0.0102 -0.0094) quadrant=-y
          WrapSphere LAT_TMAJ2hh_l: radius=0.03 xyz_body_rotation=(0.1272345 -0.2761111 0.01972222)
              translation=(-0.0016 0.0092 -0.0052) quadrant=z
          WrapCylinder CORBhum_l: radius=0.008 length=0.05 xyz_body_rotation=(1.608321 -0.09599311 0.8752826)
              translation=(0.0027 -0.1202 0.0059) quadrant=x
          WrapEllipsoid TRIlonghh_l: dimensions=(0.035 0.02 0.02) xyz_body_rotation=(-3.001617 0.853466 2.574186)
              translation=(-0.0078 -0.0041 0.0014) quadrant=-z
          WrapCylinder TRI_l: radius=0.016 length=0.04 xyz_body_rotation=(0.1401499 0.00628319 0.1549852)
              translation=(0.0028 -0.2919 0.0119)
          WrapEllipsoid ANC_l: dimensions=(0.02 0.02 0.02) xyz_body_rotation=(-0.00750492 0.1966986 1.049292)
              translation=(0.0134 -0.2861 0.0008) quadrant=-x
          WrapEllipsoid BIClong_l: dimensions=(0.025 0.02 0.02) xyz_body_rotation=(2.004336 1.001644 0.9754645)
              translation=(0.0033 0.0073 -0.0003) quadrant=-y
          WrapEllipsoid Elbow_BIC_BRD_l: dimensions=(0.015 0.015 0.1)
              xyz_body_rotation=(0.1286308 -0.1375319 0.03071779) translation=(0.0019 -0.289 0.014) quadrant=x
          WrapEllipsoid Elbow_PT_ECRL_l: dimensions=(0.018 0.025 0.035)
              xyz_body_rotation=(0.1610939 0.1108284 0.6145304) translation=(0.003 -0.2872 0.0069) quadrant=x
        Body ulna_l: mass=0 mass_center=(0 0 0) inertia_xx=0 inertia_yy=0 inertia_zz=0 meshes=ulna_l.vtp
          CustomJoint elbow_l: parent_body=humerus_l location_in_parent=(0.0061 -0.2904 0.0123) location=(0 0 0)
            Coordinate elbow_flexion_l: default_value=0 initial_value=0 range=(0 2.268928)
                keys=(e_key leftmouse_button) clamped=true restraint_active=false
            TransformAxis r3: axis=(-0.04940001 -0.03660001 0.9981082) coordinate=elbow_flexion_l
        Body radius_l: mass=0 mass_center=(0 0 0) inertia_xx=0 inertia_yy=0 inertia_zz=0 meshes=radius_l.vtp
          CustomJoint radioulnar_l: parent_body=ulna_l location_in_parent=(0.0004 -0.011503 -0.019999) location=(0 0 0)
            Coordinate pro_sup_l: default_value=0 initial_value=0 range=(-1.570796 1.570796)
                keys=(p_key leftmouse_button) clamped=true restraint_active=false
            TransformAxis r2: axis=(0.01716099 -0.9926656 -0.119668) coordinate=pro_sup_l
          WrapTorus ECU_l: inner_radius=0.006 outer_radius=0.009 xyz_body_rotation=(0.9866346 0.1488766 0.222704)
              translation=(-0.0163 -0.2417 -0.0349)
        Body lunate_l: mass=0 mass_center=(0 0 0) inertia_xx=0 inertia_yy=0 inertia_zz=0 meshes=lunate_l.vtp
          CustomJoint radiocarpal_l: parent_body=radius_l location_in_parent=(0.018 -0.242 -0.025) location=(0 0 0)
            Coordinate deviation_l: default_value=0 initial_value=0 range=(-0.1745329 0.4363323)
                keys=(v_key leftmouse_button) clamped=true restraint_active=false
            Coordinate flexion_l: default_value=0 initial_value=0 range=(-1.22173 1.22173)
                keys=(f_key leftmouse_button) clamped=true restraint_active=false
            TransformAxis r1: axis=(0.819064 0.135611 -0.557444) coordinate=deviation_l
              natCubicSpline: x=(-0.1745329 0 0.4363323) y=(-0.1745329 0 0.4363323)
            TransformAxis r3: axis=(-0.9564267 0.2522069 0.147104) coordinate=flexion_l
              natCubicSpline: x=(-1.570796 1.570796) y=(-0.7853982 0.7853982)
          WrapTorus ECRL_l: inner_radius=0.008 outer_radius=0.016 xyz_body_rotation=(-1.538333 -0.2343977 0.7311184)
              translation=(0.0222 -0.0096 -0.0208)
          WrapTorus ECRB_l: inner_radius=0.008 outer_radius=0.01 xyz_body_rotation=(-1.312662 0.1178097 -0.1162389)
              translation=(0.0126 -0.0095 -0.0186)
          WrapTorus FCR_l: inner_radius=0.001 outer_radius=0.0025 xyz_body_rotation=(1.555961 0.1532399 -0.1000074)
              translation=(0.0032 -0.0045 0.019)
          WrapTorus FCU_l: inner_radius=0.0068 outer_radius=0.008 xyz_body_rotation=(1.573763 0.07976155 0.39235)
              translation=(-0.0123 -0.0124 0.0171)
        Body scaphoid_l: mass=0 mass_center=(0 0 0) inertia_xx=0 inertia_yy=0 inertia_zz=0 meshes=scaphoid_l.vtp
          WeldJoint lun_scaph_l: parent_body=lunate_l location_in_parent=(0.012345 -0.004464 0.001254) location=(0 0 0)
        Body pisiform_l: mass=0 mass_center=(0 0 0) inertia_xx=0 inertia_yy=0 inertia_zz=0 meshes=pisiform_l.vtp
          WeldJoint lun_pis_l: parent_body=lunate_l location_in_parent=(-0.013388 -0.009886 0.010593) location=(0 0 0)
        Body triquetrum_l: mass=0 mass_center=(0 0 0) inertia_xx=0 inertia_yy=0 inertia_zz=0 meshes=triquetrum_l.vtp
          WeldJoint lun_triq_l: parent_body=lunate_l location_in_parent=(-0.010784 -0.007499 0.001289) location=(0 0 0)
        Body capitate_l: mass=0 mass_center=(0 0 0) inertia_xx=0 inertia_yy=0 inertia_zz=0 meshes=capitate_l.vtp
          CustomJoint proximal_distal_l: parent_body=lunate_l location_in_parent=(0.003992 -0.015054 -0.002327)
              location=(0 0 0)
            Coordinate proximal_distal_r1_l: default_value=0 initial_value=0 range=(-99999.9 99999.9) clamped=false
            Coordinate proximal_distal_r3_l: default_value=0 initial_value=0 range=(-99999.9 99999.9) clamped=false
            TransformAxis r1: axis=(-0.8991357 0.3490529 -0.2640399) coordinate=proximal_distal_r1_l
            TransformAxis r3: axis=(-0.9971185 -0.01069999 -0.07510096) coordinate=proximal_distal_r3_l
        Body trapezium_l: mass=0 mass_center=(0 0 0) inertia_xx=0 inertia_yy=0 inertia_zz=0 meshes=trapezium_l.vtp
          WeldJoint cap_trpzm_l: parent_body=capitate_l location_in_parent=(0.015293 -0.004569 0.010308)
              location=(0 0 0)
        Body trapezoid_l: mass=0 mass_center=(0 0 0) inertia_xx=0 inertia_yy=0 inertia_zz=0 meshes=trapezoid_l.vtp
          WeldJoint cap_trpzd_l: parent_body=capitate_l location_in_parent=(0.009143 -0.004062 0.002464)
              location=(0 0 0)
        Body hamate_l: mass=0 mass_center=(0 0 0) inertia_xx=0 inertia_yy=0 inertia_zz=0 meshes=hamate_l.vtp
          WeldJoint cap_ham_l: parent_body=capitate_l location_in_parent=(-0.010969 -0.002495 0.00075) location=(0 0 0)
        Body firstmc1_l: mass=0 mass_center=(0 0 0) inertia_xx=0 inertia_yy=0 inertia_zz=0
          WeldJoint CMC1a_l: parent_body=trapezium_l location_in_parent=(0 0 0) location=(0 0 0)
        Body firstmc_l: mass=0 mass_center=(0 0 0) inertia_xx=0 inertia_yy=0 inertia_zz=0 meshes=1mc_l.vtp
          WeldJoint CMC1b_l: parent_body=firstmc1_l location_in_parent=(0.0072 -0.0054 0.0025) location=(0 0 0)
        Body secondmc_l: mass=0 mass_center=(0 0 0) inertia_xx=0 inertia_yy=0 inertia_zz=0 meshes=2mc_l.vtp
          WeldJoint CMC2_l: parent_body=capitate_l location_in_parent=(0.014685 -0.03762 -0.005032) location=(0 0 0)
        Body thirdmc_l: mass=0 mass_center=(0 0 0) inertia_xx=0 inertia_yy=0 inertia_zz=0 meshes=3mc_l.vtp
          WeldJoint CMC3_l: parent_body=capitate_l location_in_parent=(0.000477 -0.039239 -0.007377) location=(0 0 0)
        Body fourthmc_l: mass=0 mass_center=(0 0 0) inertia_xx=0 inertia_yy=0 inertia_zz=0 meshes=4mc_l.vtp
          WeldJoint CMC4_l: parent_body=capitate_l location_in_parent=(-0.012046 -0.040519 -0.003513) location=(0 0 0)
        Body fifthmc_l: mass=0 mass_center=(0 0 0) inertia_xx=0 inertia_yy=0 inertia_zz=0 meshes=5mc_l.vtp
          WeldJoint CMC5_l: parent_body=capitate_l location_in_parent=(-0.021896 -0.034683 0.004218) location=(0 0 0)
        Body proximal_thumb_l: mass=0 mass_center=(0 0 0) inertia_xx=0 inertia_yy=0 inertia_zz=0 meshes=thumbprox_l.vtp
          WeldJoint MCP_l: parent_body=firstmc_l location_in_parent=(0.0165 -0.0292 0.0127) location=(0 0 0)
        Body distal_thumb_l: mass=0 mass_center=(0 0 0) inertia_xx=0 inertia_yy=0 inertia_zz=0 meshes=thumbdist_l.vtp
          WeldJoint IP_l: parent_body=proximal_thumb_l location_in_parent=(0.014 -0.0259 0.0101) location=(0 0 0)
        Body 2proxph_l: mass=0 mass_center=(0 0 0) inertia_xx=0 inertia_yy=0 inertia_zz=0 meshes=2proxph_l.vtp
          WeldJoint 2MCP_l: parent_body=secondmc_l location_in_parent=(0.003501 -0.028243 -0.00362) location=(0 0 0)
        Body 2midph_l: mass=0 mass_center=(0 0 0) inertia_xx=0 inertia_yy=0 inertia_zz=0 meshes=2midph_l.vtp
          WeldJoint 2prox-midph_l: parent_body=2proxph_l location_in_parent=(0.007517 -0.041273 -0.007326)
              location=(0 0 0)
        Body 2distph_l: mass=0 mass_center=(0 0 0) inertia_xx=0 inertia_yy=0 inertia_zz=0 meshes=2distph_l.vtp
          WeldJoint 2mid-distph_l: parent_body=2midph_l location_in_parent=(0.003333 -0.024888 -0.00122)
              location=(0 0 0)
        Body 3proxph_l: mass=0 mass_center=(0 0 0) inertia_xx=0 inertia_yy=0 inertia_zz=0 meshes=3proxph_l.vtp
          WeldJoint 3MCP_l: parent_body=thirdmc_l location_in_parent=(0.00024 -0.02629 -0.001778) location=(0 0 0)
        Body 3midph_l: mass=0 mass_center=(0 0 0) inertia_xx=0 inertia_yy=0 inertia_zz=0 meshes=3midph_l.vtp
          WeldJoint 3prox-midph_l: parent_body=3proxph_l location_in_parent=(0.00165 -0.044211 -0.00623)
              location=(0 0 0)
        Body 3distph_l: mass=0 mass_center=(0 0 0) inertia_xx=0 inertia_yy=0 inertia_zz=0 meshes=3distph_l.vtp
          WeldJoint 3mid-distph_l: parent_body=3midph_l location_in_parent=(0.001365 -0.029047 -0.001954)
              location=(0 0 0)
        Body 4proxph_l: mass=0 mass_center=(0 0 0) inertia_xx=0 inertia_yy=0 inertia_zz=0 meshes=4proxph_l.vtp
          WeldJoint 4MCP_l: parent_body=fourthmc_l location_in_parent=(-0.00183 -0.023689 0.000173) location=(0 0 0)
        Body 4midph_l: mass=0 mass_center=(0 0 0) inertia_xx=0 inertia_yy=0 inertia_zz=0 meshes=4midph_l.vtp
          WeldJoint 4prox-midph_l: parent_body=4proxph_l location_in_parent=(-0.003528 -0.040255 -0.001345)
              location=(0 0 0)
        Body 4distph_l: mass=0 mass_center=(0 0 0) inertia_xx=0 inertia_yy=0 inertia_zz=0 meshes=4distph_l.vtp
          WeldJoint 4mid-distph_l: parent_body=4midph_l location_in_parent=(-0.002317 -0.024789 -0.000563)
              location=(0 0 0)
        Body 5proxph_l: mass=0 mass_center=(0 0 0) inertia_xx=0 inertia_yy=0 inertia_zz=0 meshes=5proxph_l.vtp
          WeldJoint 5MCP_l: parent_body=fifthmc_l location_in_parent=(-0.001597 -0.021431 0.001496) location=(0 0 0)
        Body 5midph_l: mass=0 mass_center=(0 0 0) inertia_xx=0 inertia_yy=0 inertia_zz=0 meshes=5midph_l.vtp
          WeldJoint 5prox-midph_l: parent_body=5proxph_l location_in_parent=(-0.005279 -0.035563 0.002879)
              location=(0 0 0)
        Body 5distph_l: mass=0 mass_center=(0 0 0) inertia_xx=0 inertia_yy=0 inertia_zz=0 meshes=5distph_l.vtp
          WeldJoint 5mid-distph_l: parent_body=5midph_l location_in_parent=(-0.002871 -0.020677 0.002243)
              location=(0 0 0)
        Body bicpt_l: mass=0 mass_center=(0 0 0) inertia_xx=0 inertia_yy=0 inertia_zz=0
          CustomJoint bicpt_l: parent_body=radius_l location_in_parent=(0 0 0) location=(0 0 0)
            Coordinate bicpt_tx_l: default_value=-0.0001 initial_value=-0.0001 range=(-99999.9 99999.9) clamped=false
            Coordinate bicpt_ty_l: default_value=-0.0276 initial_value=-0.0276 range=(-99999.9 99999.9) clamped=false
            Coordinate bicpt_tz_l: default_value=-0.0043 initial_value=-0.0043 range=(-99999.9 99999.9) clamped=false
            TransformAxis tx: is_rotation=false axis=(1 0 0) coordinate=bicpt_tx_l
            TransformAxis ty: is_rotation=false axis=(0 1 0) coordinate=bicpt_ty_l
            TransformAxis tz: is_rotation=false axis=(0 0 -1) coordinate=bicpt_tz_l
        Body bicpt2_l: mass=0 mass_center=(0 0 0) inertia_xx=0 inertia_yy=0 inertia_zz=0
          CustomJoint bicpt2_l: parent_body=radius_l location_in_parent=(0 0 0) location=(0 0 0)
            Coordinate bicpt2_tx_l: default_value=0.0146695 initial_value=0.0146695 range=(-99999.9 99999.9)
                clamped=false
            Coordinate bicpt2_ty_l: default_value=-0.0102 initial_value=-0.0102 range=(-99999.9 99999.9) clamped=false
            Coordinate bicpt2_tz_l: default_value=-0.01061843 initial_value=-0.01061843 range=(-99999.9 99999.9)
                clamped=false
            TransformAxis tx: is_rotation=false axis=(1 0 0) coordinate=bicpt2_tx_l
            TransformAxis ty: is_rotation=false axis=(0 1 0) coordinate=bicpt2_ty_l
            TransformAxis tz: is_rotation=false axis=(0 0 -1) coordinate=bicpt2_tz_l
        Body ptpt_l: mass=0 mass_center=(0 0 0) inertia_xx=0 inertia_yy=0 inertia_zz=0
          CustomJoint ptpt_l: parent_body=ulna_l location_in_parent=(0 0 0) location=(0 0 0)
            Coordinate ptpt_tx_l: default_value=0.00755 initial_value=0.00755 range=(-99999.9 99999.9) clamped=false
            Coordinate ptpt_ty_l: default_value=-0.0649 initial_value=-0.0649 range=(-99999.9 99999.9) clamped=false
            Coordinate ptpt_tz_l: default_value=-0.00005 initial_value=-0.00005 range=(-99999.9 99999.9) clamped=false
            TransformAxis tx: is_rotation=false axis=(1 0 0) coordinate=ptpt_tx_l
            TransformAxis ty: is_rotation=false axis=(0 1 0) coordinate=ptpt_ty_l
            TransformAxis tz: is_rotation=false axis=(0 0 -1) coordinate=ptpt_tz_l
        Body FCUpt_l: mass=0 mass_center=(0 0 0) inertia_xx=0 inertia_yy=0 inertia_zz=0
          CustomJoint FCUpt_l: parent_body=radius_l location_in_parent=(0 0 0) location=(0 0 0)
            Coordinate FCUpt_tx_l: default_value=0.004 initial_value=0.004 range=(-99999.9 99999.9) clamped=false
            Coordinate FCUpt_ty_l: default_value=-0.1841 initial_value=-0.1841 range=(-99999.9 99999.9) clamped=false
            Coordinate FCUpt_tz_l: default_value=0.0005 initial_value=0.0005 range=(-99999.9 99999.9) clamped=false
            TransformAxis tx: is_rotation=false axis=(1 0 0) coordinate=FCUpt_tx_l
            TransformAxis ty: is_rotation=false axis=(0 1 0) coordinate=FCUpt_ty_l
            TransformAxis tz: is_rotation=false axis=(0 0 -1) coordinate=FCUpt_tz_l
        Body EDCpt_l: mass=0 mass_center=(0 0 0) inertia_xx=0 inertia_yy=0 inertia_zz=0
          CustomJoint EDCpt_l: parent_body=radius_l location_in_parent=(0 0 0) location=(0 0 0)
            Coordinate EDCpt_tx_l: default_value=0 initial_value=0 range=(-99999.9 99999.9) clamped=false
            Coordinate EDCpt_ty_l: default_value=0 initial_value=0 range=(-99999.9 99999.9) clamped=false
            Coordinate EDCpt_tz_l: default_value=0 initial_value=0 range=(-99999.9 99999.9) clamped=false
            TransformAxis tx: is_rotation=false axis=(1 0 0) coordinate=EDCpt_tx_l
            TransformAxis ty: is_rotation=false axis=(0 1 0) coordinate=EDCpt_ty_l
            TransformAxis tz: is_rotation=false axis=(0 0 -1) coordinate=EDCpt_tz_l
        Body APLpt_l: mass=0 mass_center=(0 0 0) inertia_xx=0 inertia_yy=0 inertia_zz=0
          CustomJoint APLpt_l: parent_body=capitate_l location_in_parent=(0 0 0) location=(0 0 0)
            Coordinate APLpt_tx_l: default_value=0 initial_value=0 range=(-99999.9 99999.9) clamped=false
            Coordinate APLpt_ty_l: default_value=0 initial_value=0 range=(-99999.9 99999.9) clamped=false
            Coordinate APLpt_tz_l: default_value=0 initial_value=0 range=(-99999.9 99999.9) clamped=false
            TransformAxis tx: is_rotation=false axis=(1 0 0) coordinate=APLpt_tx_l
            TransformAxis ty: is_rotation=false axis=(0 1 0) coordinate=APLpt_ty_l
            TransformAxis tz: is_rotation=false axis=(0 0 -1) coordinate=APLpt_tz_l
        Body FPLpt_l: mass=0 mass_center=(0 0 0) inertia_xx=0 inertia_yy=0 inertia_zz=0
          CustomJoint FPLpt_l: parent_body=capitate_l location_in_parent=(0 0 0) location=(0 0 0)
            Coordinate FPLpt_tx_l: default_value=0 initial_value=0 range=(-99999.9 99999.9) clamped=false
            Coordinate FPLpt_ty_l: default_value=0 initial_value=0 range=(-99999.9 99999.9) clamped=false
            Coordinate FPLpt_tz_l: default_value=0 initial_value=0 range=(-99999.9 99999.9) clamped=false
            TransformAxis tx: is_rotation=false axis=(1 0 0) coordinate=FPLpt_tx_l
            TransformAxis ty: is_rotation=false axis=(0 1 0) coordinate=FPLpt_ty_l
            TransformAxis tz: is_rotation=false axis=(0 0 -1) coordinate=FPLpt_tz_l
        Body FPLpt2_l: mass=0 mass_center=(0 0 0) inertia_xx=0 inertia_yy=0 inertia_zz=0
          WeldJoint FPLpt2_l: parent_body=capitate_l location_in_parent=(0 0 0) location=(0 0 0)
        Body PEC1pt2_l: mass=0 mass_center=(0 0 0) inertia_xx=0 inertia_yy=0 inertia_zz=0
          CustomJoint PEC1pt2_l: parent_body=humerus_l location_in_parent=(0 0 0) location=(0 0 0)
            Coordinate PEC1pt2_tx_l: default_value=0 initial_value=0 range=(-99999.9 99999.9) clamped=false
            Coordinate PEC1pt2_ty_l: default_value=0 initial_value=0 range=(-99999.9 99999.9) clamped=false
            Coordinate PEC1pt2_tz_l: default_value=0 initial_value=0 range=(-99999.9 99999.9) clamped=false
            TransformAxis tx: is_rotation=false axis=(1 0 0) coordinate=PEC1pt2_tx_l
            TransformAxis ty: is_rotation=false axis=(0 1 0) coordinate=PEC1pt2_ty_l
            TransformAxis tz: is_rotation=false axis=(0 0 -1) coordinate=PEC1pt2_tz_l
        Body PEC1pt3_l: mass=0 mass_center=(0 0 0) inertia_xx=0 inertia_yy=0 inertia_zz=0
          CustomJoint PEC1pt3_l: parent_body=thorax location_in_parent=(0 0 0) location=(0 0 0)
            Coordinate PEC1pt3_tx_l: default_value=0 initial_value=0 range=(-99999.9 99999.9) clamped=false
            Coordinate PEC1pt3_ty_l: default_value=0 initial_value=0 range=(-99999.9 99999.9) clamped=false
            Coordinate PEC1pt3_tz_l: default_value=0 initial_value=0 range=(-99999.9 99999.9) clamped=false
            TransformAxis tx: is_rotation=false axis=(1 0 0) coordinate=PEC1pt3_tx_l
            TransformAxis ty: is_rotation=false axis=(0 1 0) coordinate=PEC1pt3_ty_l
            TransformAxis tz: is_rotation=false axis=(0 0 -1) coordinate=PEC1pt3_tz_l
        Body PEC2pt2_l: mass=0 mass_center=(0 0 0) inertia_xx=0 inertia_yy=0 inertia_zz=0
          CustomJoint PEC2pt2_l: parent_body=humerus_l location_in_parent=(0 0 0) location=(0 0 0)
            Coordinate PEC2pt2_tx_l: default_value=0 initial_value=0 range=(-99999.9 99999.9) clamped=false
            Coordinate PEC2pt2_ty_l: default_value=0 initial_value=0 range=(-99999.9 99999.9) clamped=false
            Coordinate PEC2pt2_tz_l: default_value=0 initial_value=0 range=(-99999.9 99999.9) clamped=false
            TransformAxis tx: is_rotation=false axis=(1 0 0) coordinate=PEC2pt2_tx_l
            TransformAxis ty: is_rotation=false axis=(0 1 0) coordinate=PEC2pt2_ty_l
            TransformAxis tz: is_rotation=false axis=(0 0 -1) coordinate=PEC2pt2_tz_l
        Body PEC2pt3_l: mass=0 mass_center=(0 0 0) inertia_xx=0 inertia_yy=0 inertia_zz=0
          CustomJoint PEC2pt3_l: parent_body=thorax location_in_parent=(0 0 0) location=(0 0 0)
            Coordinate PEC2pt3_tx_l: default_value=0 initial_value=0 range=(-99999.9 99999.9) clamped=false
            Coordinate PEC2pt3_ty_l: default_value=0 initial_value=0 range=(-99999.9 99999.9) clamped=false
            Coordinate PEC2pt3_tz_l: default_value=0 initial_value=0 range=(-99999.9 99999.9) clamped=false
            TransformAxis tx: is_rotation=false axis=(1 0 0) coordinate=PEC2pt3_tx_l
            TransformAxis ty: is_rotation=false axis=(0 1 0) coordinate=PEC2pt3_ty_l
            TransformAxis tz: is_rotation=false axis=(0 0 -1) coordinate=PEC2pt3_tz_l
        Body PEC3pt2_l: mass=0 mass_center=(0 0 0) inertia_xx=0 inertia_yy=0 inertia_zz=0
          CustomJoint PEC3pt2_l: parent_body=humerus_l location_in_parent=(0 0 0) location=(0 0 0)
            Coordinate PEC3pt2_tx_l: default_value=0 initial_value=0 range=(-99999.9 99999.9) clamped=false
            Coordinate PEC3pt2_ty_l: default_value=0 initial_value=0 range=(-99999.9 99999.9) clamped=false
            Coordinate PEC3pt2_tz_l: default_value=0 initial_value=0 range=(-99999.9 99999.9) clamped=false
            TransformAxis tx: is_rotation=false axis=(1 0 0) coordinate=PEC3pt2_tx_l
            TransformAxis ty: is_rotation=false axis=(0 1 0) coordinate=PEC3pt2_ty_l
            TransformAxis tz: is_rotation=false axis=(0 0 -1) coordinate=PEC3pt2_tz_l
        Body PEC3pt3_l: mass=0 mass_center=(0 0 0) inertia_xx=0 inertia_yy=0 inertia_zz=0
          CustomJoint PEC3pt3_l: parent_body=thorax location_in_parent=(0 0 0) location=(0 0 0)
            Coordinate PEC3pt3_tx_l: default_value=0 initial_value=0 range=(-99999.9 99999.9) clamped=false
            Coordinate PEC3pt3_ty_l: default_value=0.000225322 initial_value=0.000225322 range=(-99999.9 99999.9)
                clamped=false
            Coordinate PEC3pt3_tz_l: default_value=0 initial_value=0 range=(-99999.9 99999.9) clamped=false
            TransformAxis tx: is_rotation=false axis=(1 0 0) coordinate=PEC3pt3_tx_l
            TransformAxis ty: is_rotation=false axis=(0 1 0) coordinate=PEC3pt3_ty_l
            TransformAxis tz: is_rotation=false axis=(0 0 -1) coordinate=PEC3pt3_tz_l
        Body DELT2pt2a_l: mass=0 mass_center=(0 0 0) inertia_xx=0 inertia_yy=0 inertia_zz=0
          CustomJoint DELT2pt2a_l: parent_body=humerus_l location_in_parent=(0 0 0) location=(0 0 0)
            Coordinate DELT2pt2a_tx_l: default_value=0 initial_value=0 range=(-99999.9 99999.9) clamped=false
            Coordinate DELT2pt2a_ty_l: default_value=0 initial_value=0 range=(-99999.9 99999.9) clamped=false
            Coordinate DELT2pt2a_tz_l: default_value=0 initial_value=0 range=(-99999.9 99999.9) clamped=false
            TransformAxis tx: is_rotation=false axis=(1 0 0) coordinate=DELT2pt2a_tx_l
            TransformAxis ty: is_rotation=false axis=(0 1 0) coordinate=DELT2pt2a_ty_l
            TransformAxis tz: is_rotation=false axis=(0 0 -1) coordinate=DELT2pt2a_tz_l
        Body DELT2pt2_l: mass=0 mass_center=(0 0 0) inertia_xx=0 inertia_yy=0 inertia_zz=0
          CustomJoint DELT2pt2_l: parent_body=DELT2pt2a_l location_in_parent=(0 0 0) location=(0 0 0)
            Coordinate DELT2pt2_tx_l: default_value=-0.0004399096 initial_value=-0.0004399096 range=(-99999.9 99999.9)
                clamped=false
            Coordinate DELT2pt2_ty_l: default_value=0 initial_value=0 range=(-99999.9 99999.9) clamped=false
            Coordinate DELT2pt2_tz_l: default_value=0 initial_value=0 range=(-99999.9 99999.9) clamped=false
            TransformAxis tx: is_rotation=false axis=(1 0 0) coordinate=DELT2pt2_tx_l
            TransformAxis ty: is_rotation=false axis=(0 1 0) coordinate=DELT2pt2_ty_l
            TransformAxis tz: is_rotation=false axis=(0 0 -1) coordinate=DELT2pt2_tz_l
        Body LAT1pt2_l: mass=0 mass_center=(0 0 0) inertia_xx=0 inertia_yy=0 inertia_zz=0
          CustomJoint LAT1pt2_l: parent_body=scapula_l location_in_parent=(0 0 0) location=(0 0 0)
            Coordinate LAT1pt2_tx_l: default_value=0 initial_value=0 range=(-99999.9 99999.9) clamped=false
            Coordinate LAT1pt2_ty_l: default_value=0 initial_value=0 range=(-99999.9 99999.9) clamped=false
            Coordinate LAT1pt2_tz_l: default_value=0 initial_value=0 range=(-99999.9 99999.9) clamped=false
            TransformAxis tx: is_rotation=false axis=(1 0 0) coordinate=LAT1pt2_tx_l
            TransformAxis ty: is_rotation=false axis=(0 1 0) coordinate=LAT1pt2_ty_l
            TransformAxis tz: is_rotation=false axis=(0 0 -1) coordinate=LAT1pt2_tz_l
        Body LAT1pt3_l: mass=0 mass_center=(0 0 0) inertia_xx=0 inertia_yy=0 inertia_zz=0
          CustomJoint LAT1pt3_l: parent_body=scapula_l location_in_parent=(0 0 0) location=(0 0 0)
            Coordinate LAT1pt3_tx_l: default_value=0 initial_value=0 range=(-99999.9 99999.9) clamped=false
            Coordinate LAT1pt3_ty_l: default_value=0 initial_value=0 range=(-99999.9 99999.9) clamped=false
            Coordinate LAT1pt3_tz_l: default_value=0 initial_value=0 range=(-99999.9 99999.9) clamped=false
            TransformAxis tx: is_rotation=false axis=(1 0 0) coordinate=LAT1pt3_tx_l
            TransformAxis ty: is_rotation=false axis=(0 1 0) coordinate=LAT1pt3_ty_l
            TransformAxis tz: is_rotation=false axis=(0 0 -1) coordinate=LAT1pt3_tz_l
        Body LAT2pt2_l: mass=0 mass_center=(0 0 0) inertia_xx=0 inertia_yy=0 inertia_zz=0
          CustomJoint LAT2pt2_l: parent_body=scapula_l location_in_parent=(0 0 0) location=(0 0 0)
            Coordinate LAT2pt2_tx_l: default_value=0 initial_value=0 range=(-99999.9 99999.9) clamped=false
            Coordinate LAT2pt2_ty_l: default_value=0 initial_value=0 range=(-99999.9 99999.9) clamped=false
            Coordinate LAT2pt2_tz_l: default_value=0 initial_value=0 range=(-99999.9 99999.9) clamped=false
            TransformAxis tx: is_rotation=false axis=(1 0 0) coordinate=LAT2pt2_tx_l
            TransformAxis ty: is_rotation=false axis=(0 1 0) coordinate=LAT2pt2_ty_l
            TransformAxis tz: is_rotation=false axis=(0 0 -1) coordinate=LAT2pt2_tz_l
        Body LAT2pt3_l: mass=0 mass_center=(0 0 0) inertia_xx=0 inertia_yy=0 inertia_zz=0
          CustomJoint LAT2pt3_l: parent_body=scapula_l location_in_parent=(0 0 0) location=(0 0 0)
            Coordinate LAT2pt3_tx_l: default_value=0 initial_value=0 range=(-99999.9 99999.9) clamped=false
            Coordinate LAT2pt3_ty_l: default_value=0 initial_value=0 range=(-99999.9 99999.9) clamped=false
            Coordinate LAT2pt3_tz_l: default_value=0 initial_value=0 range=(-99999.9 99999.9) clamped=false
            TransformAxis tx: is_rotation=false axis=(1 0 0) coordinate=LAT2pt3_tx_l
            TransformAxis ty: is_rotation=false axis=(0 1 0) coordinate=LAT2pt3_ty_l
            TransformAxis tz: is_rotation=false axis=(0 0 -1) coordinate=LAT2pt3_tz_l
        Body LAT3pt2_l: mass=0 mass_center=(0 0 0) inertia_xx=0 inertia_yy=0 inertia_zz=0
          CustomJoint LAT3pt2_l: parent_body=scapula_l location_in_parent=(0 0 0) location=(0 0 0)
            Coordinate LAT3pt2_tx_l: default_value=0 initial_value=0 range=(-99999.9 99999.9) clamped=false
            Coordinate LAT3pt2_ty_l: default_value=0 initial_value=0 range=(-99999.9 99999.9) clamped=false
            Coordinate LAT3pt2_tz_l: default_value=0 initial_value=0 range=(-99999.9 99999.9) clamped=false
            TransformAxis tx: is_rotation=false axis=(1 0 0) coordinate=LAT3pt2_tx_l
            TransformAxis ty: is_rotation=false axis=(0 1 0) coordinate=LAT3pt2_ty_l
            TransformAxis tz: is_rotation=false axis=(0 0 -1) coordinate=LAT3pt2_tz_l
        Body LAT3pt3_l: mass=0 mass_center=(0 0 0) inertia_xx=0 inertia_yy=0 inertia_zz=0
          CustomJoint LAT3pt3_l: parent_body=scapula_l location_in_parent=(0 0 0) location=(0 0 0)
            Coordinate LAT3pt3_tx_l: default_value=0 initial_value=0 range=(-99999.9 99999.9) clamped=false
            Coordinate LAT3pt3_ty_l: default_value=0 initial_value=0 range=(-99999.9 99999.9) clamped=false
            Coordinate LAT3pt3_tz_l: default_value=0 initial_value=0 range=(-99999.9 99999.9) clamped=false
            TransformAxis tx: is_rotation=false axis=(1 0 0) coordinate=LAT3pt3_tx_l
            TransformAxis ty: is_rotation=false axis=(0 1 0) coordinate=LAT3pt3_ty_l
            TransformAxis tz: is_rotation=false axis=(0 0 -1) coordinate=LAT3pt3_tz_l
      ConstraintSet:
        CoordinateCouplerConstraint sternoclavicular_r2_con: dependent_coordinate_name=sternoclavicular_r2
            independent_coordinate_names=shoulder_elv
          coupled_coordinates_function f0:
            natCubicSpline f0: x=(0 2.617994) y=(0 -0.6335545)
        CoordinateCouplerConstraint sternoclavicular_r3_con: dependent_coordinate_name=sternoclavicular_r3
            independent_coordinate_names=shoulder_elv
          coupled_coordinates_function f1:
            natCubicSpline f1: x=(0 3.141593) y=(0 0.3220132)
        CoordinateCouplerConstraint unrotscap_r2_con: dependent_coordinate_name=unrotscap_r2
            independent_coordinate_names=shoulder_elv
          coupled_coordinates_function f2:
            natCubicSpline f2: x=(0 2.617994) y=(0 0.6335545)
        CoordinateCouplerConstraint unrotscap_r3_con: dependent_coordinate_name=unrotscap_r3
            independent_coordinate_names=shoulder_elv
          coupled_coordinates_function f3:
            natCubicSpline f3: x=(0 3.141593) y=(0 -0.3220132)
        CoordinateCouplerConstraint acromioclavicular_r1_con: dependent_coordinate_name=acromioclavicular_r1
            independent_coordinate_names=shoulder_elv
          coupled_coordinates_function f4:
            natCubicSpline f4: x=(0 2.617994) y=(0 0.4660029)
        CoordinateCouplerConstraint acromioclavicular_r2_con: dependent_coordinate_name=acromioclavicular_r2
            independent_coordinate_names=shoulder_elv
          coupled_coordinates_function f5:
            natCubicSpline f5: x=(0 2.617994) y=(0 -0.1282817)
        CoordinateCouplerConstraint acromioclavicular_r3_con: dependent_coordinate_name=acromioclavicular_r3
            independent_coordinate_names=shoulder_elv
          coupled_coordinates_function f6:
            natCubicSpline f6: x=(0 2.617994) y=(0 1.036726)
        CoordinateCouplerConstraint unrothum_r1_con: dependent_coordinate_name=unrothum_r1
            independent_coordinate_names=shoulder_elv
          coupled_coordinates_function f7:
            natCubicSpline f7: x=(0 2.617994) y=(0 -0.4660029)
        CoordinateCouplerConstraint unrothum_r2_con: dependent_coordinate_name=unrothum_r2
            independent_coordinate_names=shoulder_elv
          coupled_coordinates_function f8:
            natCubicSpline f8: x=(0 2.617994) y=(0 0.1282817)
        CoordinateCouplerConstraint unrothum_r3_con: dependent_coordinate_name=unrothum_r3
            independent_coordinate_names=shoulder_elv
          coupled_coordinates_function f9:
            natCubicSpline f9: x=(0 2.617994) y=(0 -1.036726)
        CoordinateCouplerConstraint shoulder1_r2_con: dependent_coordinate_name=shoulder1_r2
            independent_coordinate_names=elv_angle
          coupled_coordinates_function f11:
            natCubicSpline f11: x=(-1.570796 3.141593) y=(1.570796 -3.141593)
        CoordinateCouplerConstraint proximal_distal_r1_con: dependent_coordinate_name=proximal_distal_r1
            independent_coordinate_names=deviation
          coupled_coordinates_function f18:
            natCubicSpline f18: x=(-0.1745329 0 0.4363323) y=(-0.2617994 0 0.4363323)
        CoordinateCouplerConstraint proximal_distal_r3_con: dependent_coordinate_name=proximal_distal_r3
            independent_coordinate_names=flexion
          coupled_coordinates_function f19:
            natCubicSpline f19: x=(-1.22173 1.22173) y=(-0.6108652 0.6108652)
        CoordinateCouplerConstraint bicpt_tx_con: dependent_coordinate_name=bicpt_tx
            independent_coordinate_names=elbow_flexion
          coupled_coordinates_function f70:
            natCubicSpline f70: x=(0 2.268928) y=(-0.0001 0.0042)
        CoordinateCouplerConstraint bicpt_ty_con: dependent_coordinate_name=bicpt_ty
            independent_coordinate_names=elbow_flexion
          coupled_coordinates_function f71:
            natCubicSpline f71: x=(0 2.268928) y=(-0.0276 -0.0425)
        CoordinateCouplerConstraint bicpt_tz_con: dependent_coordinate_name=bicpt_tz
            independent_coordinate_names=elbow_flexion
          coupled_coordinates_function f72:
            natCubicSpline f72: x=(0 2.268928) y=(-0.0043 -0.0067)
        CoordinateCouplerConstraint bicpt2_tx_con: dependent_coordinate_name=bicpt2_tx
            independent_coordinate_names=pro_sup
          coupled_coordinates_function f80:
            natCubicSpline f80: x=(-1.570796 -0.6108652 1.578228) y=(-0.003 0.01 0.01376)
        CoordinateCouplerConstraint bicpt2_ty_con: dependent_coordinate_name=bicpt2_ty
            independent_coordinate_names=elbow_flexion
          coupled_coordinates_function f81:
            natCubicSpline f81: x=(0 2.274834) y=(-0.0102 -0.045607)
        CoordinateCouplerConstraint bicpt2_tz_con: dependent_coordinate_name=bicpt2_tz
            independent_coordinate_names=pro_sup
          coupled_coordinates_function f82:
            natCubicSpline f82: x=(-1.570796 -0.6108652 1.575614) y=(-0.0095 -0.011533 -0.000331)
        CoordinateCouplerConstraint ptpt_tx_con: dependent_coordinate_name=ptpt_tx independent_coordinate_names=pro_sup
          coupled_coordinates_function f90:
            natCubicSpline f90: x=(-1.570796 1.570796) y=(0.0142 0.0009)
        CoordinateCouplerConstraint ptpt_ty_con: dependent_coordinate_name=ptpt_ty independent_coordinate_names=pro_sup
          coupled_coordinates_function f91:
            natCubicSpline f91: x=(-1.570796 1.570796) y=(-0.0606 -0.0692)
        CoordinateCouplerConstraint ptpt_tz_con: dependent_coordinate_name=ptpt_tz independent_coordinate_names=pro_sup
          coupled_coordinates_function f92:
            natCubicSpline f92: x=(-1.570796 1.570796) y=(0.0072 -0.0073)
        CoordinateCouplerConstraint FCUpt_tx_con: dependent_coordinate_name=FCUpt_tx
            independent_coordinate_names=pro_sup
          coupled_coordinates_function f100:
            natCubicSpline f100: x=(-1.570796 0 1.570796) y=(-0.0027 0.004 0.0132)
        CoordinateCouplerConstraint FCUpt_ty_con: dependent_coordinate_name=FCUpt_ty
            independent_coordinate_names=pro_sup
          coupled_coordinates_function f101:
            natCubicSpline f101: x=(-1.570796 0 1.570796) y=(-0.1838 -0.1841 -0.1821)
        CoordinateCouplerConstraint FCUpt_tz_con: dependent_coordinate_name=FCUpt_tz
            independent_coordinate_names=pro_sup
          coupled_coordinates_function f102:
            natCubicSpline f102: x=(-1.570796 0 1.570796) y=(0.0069 0.0005 0.0002)
        CoordinateCouplerConstraint EDCpt_tx_con: dependent_coordinate_name=EDCpt_tx
            independent_coordinate_names=pro_sup
          coupled_coordinates_function f110:
            natCubicSpline f110: x=(-1.570796 0 1.570796) y=(0.0108 0 -0.0108)
        CoordinateCouplerConstraint EDCpt_ty_con: dependent_coordinate_name=EDCpt_ty
            independent_coordinate_names=pro_sup
          coupled_coordinates_function f111:
            natCubicSpline f111: x=(-1.570796 0 1.570796) y=(-0.0013 0 0.0038)
        CoordinateCouplerConstraint EDCpt_tz_con: dependent_coordinate_name=EDCpt_tz
            independent_coordinate_names=pro_sup
          coupled_coordinates_function f112:
            natCubicSpline f112: x=(-1.570796 0 1.570796) y=(-0.0035 0 -0.00089)
        CoordinateCouplerConstraint APLpt_tx_con: dependent_coordinate_name=APLpt_tx
            independent_coordinate_names=flexion
          coupled_coordinates_function f120:
            natCubicSpline f120: x=(-1.22173 0 1.22173) y=(0 0 -0.0025)
        CoordinateCouplerConstraint APLpt_ty_con: dependent_coordinate_name=APLpt_ty
            independent_coordinate_names=flexion
          coupled_coordinates_function f121:
            natCubicSpline f121: x=(-1.22173 0 1.22173) y=(0 0 -0.001)
        CoordinateCouplerConstraint APLpt_tz_con: dependent_coordinate_name=APLpt_tz
            independent_coordinate_names=flexion
          coupled_coordinates_function f122:
            natCubicSpline f122: x=(-1.22173 0 1.22173) y=(0 0 -0.005)
        CoordinateCouplerConstraint FPLpt_tx_con: dependent_coordinate_name=FPLpt_tx
            independent_coordinate_names=flexion
          coupled_coordinates_function f130:
            natCubicSpline f130: x=(-1.22173 0 1.22173) y=(0 0 -0.0032)
        CoordinateCouplerConstraint FPLpt_ty_con: dependent_coordinate_name=FPLpt_ty
            independent_coordinate_names=flexion
          coupled_coordinates_function f131:
            natCubicSpline f131: x=(-1.22173 0 1.22173) y=(0 0 -0.0096)
        CoordinateCouplerConstraint FPLpt_tz_con: dependent_coordinate_name=FPLpt_tz
            independent_coordinate_names=flexion
          coupled_coordinates_function f132:
            natCubicSpline f132: x=(-1.22173 0 1.22173) y=(0 0 -0.0054)
        CoordinateCouplerConstraint PEC1pt2_tx_con: dependent_coordinate_name=PEC1pt2_tx
            independent_coordinate_names=shoulder_elv
          coupled_coordinates_function f150:
            natCubicSpline f150: x=(0 3.141593) y=(0 0.0059)
        CoordinateCouplerConstraint PEC1pt2_ty_con: dependent_coordinate_name=PEC1pt2_ty
            independent_coordinate_names=shoulder_elv
          coupled_coordinates_function f151:
            natCubicSpline f151: x=(0 3.141593) y=(0 0.0207)
        CoordinateCouplerConstraint PEC1pt2_tz_con: dependent_coordinate_name=PEC1pt2_tz
            independent_coordinate_names=shoulder_elv
          coupled_coordinates_function f152:
            natCubicSpline f152: x=(0 3.141593) y=(0 0.0144)
        CoordinateCouplerConstraint PEC1pt3_tx_con: dependent_coordinate_name=PEC1pt3_tx
            independent_coordinate_names=shoulder_elv
          coupled_coordinates_function f160:
            natCubicSpline f160: x=(0 3.141593) y=(0 -0.0193)
        CoordinateCouplerConstraint PEC1pt3_ty_con: dependent_coordinate_name=PEC1pt3_ty
            independent_coordinate_names=shoulder_elv
          coupled_coordinates_function f161:
            natCubicSpline f161: x=(0 3.141593) y=(0 0.0466)
        CoordinateCouplerConstraint PEC1pt3_tz_con: dependent_coordinate_name=PEC1pt3_tz
            independent_coordinate_names=shoulder_elv
          coupled_coordinates_function f162:
            natCubicSpline f162: x=(0 3.141593) y=(0 -0.0442)
        CoordinateCouplerConstraint PEC2pt2_tx_con: dependent_coordinate_name=PEC2pt2_tx
            independent_coordinate_names=shoulder_elv
          coupled_coordinates_function f170:
            natCubicSpline f170: x=(0 3.141593) y=(0 0.0059)
        CoordinateCouplerConstraint PEC2pt2_ty_con: dependent_coordinate_name=PEC2pt2_ty
            independent_coordinate_names=shoulder_elv
          coupled_coordinates_function f171:
            natCubicSpline f171: x=(0 3.141593) y=(0 0.0207)
        CoordinateCouplerConstraint PEC2pt2_tz_con: dependent_coordinate_name=PEC2pt2_tz
            independent_coordinate_names=shoulder_elv
          coupled_coordinates_function f172:
            natCubicSpline f172: x=(0 3.141593) y=(0 0.0144)
        CoordinateCouplerConstraint PEC2pt3_tx_con: dependent_coordinate_name=PEC2pt3_tx
            independent_coordinate_names=shoulder_elv
          coupled_coordinates_function f180:
            natCubicSpline f180: x=(0 3.141593) y=(0 0.0013)
        CoordinateCouplerConstraint PEC2pt3_ty_con: dependent_coordinate_name=PEC2pt3_ty
            independent_coordinate_names=shoulder_elv
          coupled_coordinates_function f181:
            natCubicSpline f181: x=(0 3.141593) y=(0 0.0432)
        CoordinateCouplerConstraint PEC2pt3_tz_con: dependent_coordinate_name=PEC2pt3_tz
            independent_coordinate_names=shoulder_elv
          coupled_coordinates_function f182:
            natCubicSpline f182: x=(0 3.141593) y=(0 -0.0227)
        CoordinateCouplerConstraint PEC3pt2_tx_con: dependent_coordinate_name=PEC3pt2_tx
            independent_coordinate_names=shoulder_elv
          coupled_coordinates_function f190:
            natCubicSpline f190: x=(0 0.7475172 3.141593) y=(0 0.002482 0.0059)
        CoordinateCouplerConstraint PEC3pt2_ty_con: dependent_coordinate_name=PEC3pt2_ty
            independent_coordinate_names=shoulder_elv
          coupled_coordinates_function f191:
            natCubicSpline f191: x=(0 3.131491) y=(0 0.011474)
        CoordinateCouplerConstraint PEC3pt2_tz_con: dependent_coordinate_name=PEC3pt2_tz
            independent_coordinate_names=shoulder_elv
          coupled_coordinates_function f192:
            natCubicSpline f192: x=(0 0.6230557 2.291237 3.125328) y=(0 0.009968 0.018193 0.017746)
        CoordinateCouplerConstraint PEC3pt3_tx_con: dependent_coordinate_name=PEC3pt3_tx
            independent_coordinate_names=shoulder_elv
          coupled_coordinates_function f200:
            natCubicSpline f200: x=(0 3.141593) y=(0 0)
        CoordinateCouplerConstraint PEC3pt3_ty_con: dependent_coordinate_name=PEC3pt3_ty
            independent_coordinate_names=shoulder_elv
          coupled_coordinates_function f201:
            natCubicSpline f201: x=(0.01010158 1.59605 3.141593) y=(0.000222 0.011219 0.0441)
        CoordinateCouplerConstraint PEC3pt3_tz_con: dependent_coordinate_name=PEC3pt3_tz
            independent_coordinate_names=shoulder_elv
          coupled_coordinates_function f202:
            natCubicSpline f202: x=(0 3.141593) y=(0 0)
        CoordinateCouplerConstraint DELT2pt2a_tx_con: dependent_coordinate_name=DELT2pt2a_tx
            independent_coordinate_names=shoulder_elv
          coupled_coordinates_function f210:
            natCubicSpline f210: x=(0 3.141593) y=(0 -0.0169)
        CoordinateCouplerConstraint DELT2pt2a_ty_con: dependent_coordinate_name=DELT2pt2a_ty
            independent_coordinate_names=shoulder_elv
          coupled_coordinates_function f211:
            natCubicSpline f211: x=(0 3.141593) y=(0 -0.0781)
        CoordinateCouplerConstraint DELT2pt2a_tz_con: dependent_coordinate_name=DELT2pt2a_tz
            independent_coordinate_names=shoulder_elv
          coupled_coordinates_function f212:
            natCubicSpline f212: x=(0 1.222292 3.141593) y=(0 -0.005395 -0.0363)
        CoordinateCouplerConstraint DELT2pt2_tx_con: dependent_coordinate_name=DELT2pt2_tx
            independent_coordinate_names=shoulder_rot
          coupled_coordinates_function f220:
            natCubicSpline f220: x=(-1.570796 -0.01015029 0.349046) y=(0.0214 0.000049 -0.020005)
        CoordinateCouplerConstraint DELT2pt2_ty_con: dependent_coordinate_name=DELT2pt2_ty
            independent_coordinate_names=shoulder_rot
          coupled_coordinates_function f221:
            natCubicSpline f221: x=(-1.570796 -1.181885 -0.1694821 0 0.3490659)
                y=(-0.0029 -0.002148 -0.000139 0 -0.001644)
        CoordinateCouplerConstraint DELT2pt2_tz_con: dependent_coordinate_name=DELT2pt2_tz
            independent_coordinate_names=shoulder_rot
          coupled_coordinates_function f222:
            natCubicSpline f222: x=(-1.570796 -0.4966612 0 0.3428927) y=(-0.0455 -0.006762 0 -0.00573)
        CoordinateCouplerConstraint LAT1pt2_tx_con: dependent_coordinate_name=LAT1pt2_tx
            independent_coordinate_names=shoulder_elv
          coupled_coordinates_function f230:
            natCubicSpline f230: x=(0 3.141593) y=(0 -0.0021)
        CoordinateCouplerConstraint LAT1pt2_ty_con: dependent_coordinate_name=LAT1pt2_ty
            independent_coordinate_names=shoulder_elv
          coupled_coordinates_function f231:
            natCubicSpline f231: x=(0 3.141593) y=(0 0.0352)
        CoordinateCouplerConstraint LAT1pt2_tz_con: dependent_coordinate_name=LAT1pt2_tz
            independent_coordinate_names=shoulder_elv
          coupled_coordinates_function f232:
            natCubicSpline f232: x=(0 3.141593) y=(0 -0.0144)
        CoordinateCouplerConstraint LAT1pt3_tx_con: dependent_coordinate_name=LAT1pt3_tx
            independent_coordinate_names=shoulder_elv
          coupled_coordinates_function f240:
            natCubicSpline f240: x=(0 3.141593) y=(0 0.0058)
        CoordinateCouplerConstraint LAT1pt3_ty_con: dependent_coordinate_name=LAT1pt3_ty
            independent_coordinate_names=shoulder_elv
          coupled_coordinates_function f241:
            natCubicSpline f241: x=(0 3.141593) y=(0 0.0508)
        CoordinateCouplerConstraint LAT1pt3_tz_con: dependent_coordinate_name=LAT1pt3_tz
            independent_coordinate_names=shoulder_elv
          coupled_coordinates_function f242:
            natCubicSpline f242: x=(0 3.141593) y=(0 -0.042)
        CoordinateCouplerConstraint LAT2pt2_tx_con: dependent_coordinate_name=LAT2pt2_tx
            independent_coordinate_names=shoulder_elv
          coupled_coordinates_function f250:
            natCubicSpline f250: x=(0 3.141593) y=(0 -0.0141)
        CoordinateCouplerConstraint LAT2pt2_ty_con: dependent_coordinate_name=LAT2pt2_ty
            independent_coordinate_names=shoulder_elv
          coupled_coordinates_function f251:
            natCubicSpline f251: x=(0 3.141593) y=(0 0.0305)
        CoordinateCouplerConstraint LAT2pt2_tz_con: dependent_coordinate_name=LAT2pt2_tz
            independent_coordinate_names=shoulder_elv
          coupled_coordinates_function f252:
            natCubicSpline f252: x=(0 3.141593) y=(0 -0.0129)
        CoordinateCouplerConstraint LAT2pt3_tx_con: dependent_coordinate_name=LAT2pt3_tx
            independent_coordinate_names=shoulder_elv
          coupled_coordinates_function f260:
            natCubicSpline f260: x=(0 3.141593) y=(0 -0.0294)
        CoordinateCouplerConstraint LAT2pt3_ty_con: dependent_coordinate_name=LAT2pt3_ty
            independent_coordinate_names=shoulder_elv
          coupled_coordinates_function f261:
            natCubicSpline f261: x=(0 3.141593) y=(0 0.0644)
        CoordinateCouplerConstraint LAT2pt3_tz_con: dependent_coordinate_name=LAT2pt3_tz
            independent_coordinate_names=shoulder_elv
          coupled_coordinates_function f262:
            natCubicSpline f262: x=(0 3.141593) y=(0 -0.0721)
        CoordinateCouplerConstraint LAT3pt2_tx_con: dependent_coordinate_name=LAT3pt2_tx
            independent_coordinate_names=shoulder_elv
          coupled_coordinates_function f270:
            natCubicSpline f270: x=(0 3.141593) y=(0 -0.0552)
        CoordinateCouplerConstraint LAT3pt2_ty_con: dependent_coordinate_name=LAT3pt2_ty
            independent_coordinate_names=shoulder_elv
          coupled_coordinates_function f271:
            natCubicSpline f271: x=(0 3.141593) y=(0 0.0341)
        CoordinateCouplerConstraint LAT3pt2_tz_con: dependent_coordinate_name=LAT3pt2_tz
            independent_coordinate_names=shoulder_elv
          coupled_coordinates_function f272:
            natCubicSpline f272: x=(0 3.141593) y=(0 -0.0173)
        CoordinateCouplerConstraint LAT3pt3_tx_con: dependent_coordinate_name=LAT3pt3_tx
            independent_coordinate_names=shoulder_elv
          coupled_coordinates_function f280:
            natCubicSpline f280: x=(0 3.141593) y=(0 -0.0366)
        CoordinateCouplerConstraint LAT3pt3_ty_con: dependent_coordinate_name=LAT3pt3_ty
            independent_coordinate_names=shoulder_elv
          coupled_coordinates_function f281:
            natCubicSpline f281: x=(0 3.141593) y=(0 0.0744)
        CoordinateCouplerConstraint LAT3pt3_tz_con: dependent_coordinate_name=LAT3pt3_tz
            independent_coordinate_names=shoulder_elv
          coupled_coordinates_function f282:
            natCubicSpline f282: x=(0 3.141593) y=(0 -0.0901)
        CoordinateCouplerConstraint sternoclavicular_r2_con_l: dependent_coordinate_name=sternoclavicular_r2_l
            independent_coordinate_names=shoulder_elv_l
          coupled_coordinates_function f0_l:
            natCubicSpline f0_l: x=(0 2.617994) y=(0 -0.6335545)
        CoordinateCouplerConstraint sternoclavicular_r3_con_l: dependent_coordinate_name=sternoclavicular_r3_l
            independent_coordinate_names=shoulder_elv_l
          coupled_coordinates_function f1_l:
            natCubicSpline f1_l: x=(0 3.141593) y=(0 0.3220132)
        CoordinateCouplerConstraint unrotscap_r2_con_l: dependent_coordinate_name=unrotscap_r2_l
            independent_coordinate_names=shoulder_elv_l
          coupled_coordinates_function f2_l:
            natCubicSpline f2_l: x=(0 2.617994) y=(0 0.6335545)
        CoordinateCouplerConstraint unrotscap_r3_con_l: dependent_coordinate_name=unrotscap_r3_l
            independent_coordinate_names=shoulder_elv_l
          coupled_coordinates_function f3_l:
            natCubicSpline f3_l: x=(0 3.141593) y=(0 -0.3220132)
        CoordinateCouplerConstraint acromioclavicular_r1_con_l: dependent_coordinate_name=acromioclavicular_r1_l
            independent_coordinate_names=shoulder_elv_l
          coupled_coordinates_function f4_l:
            natCubicSpline f4_l: x=(0 2.617994) y=(0 0.4660029)
        CoordinateCouplerConstraint acromioclavicular_r2_con_l: dependent_coordinate_name=acromioclavicular_r2_l
            independent_coordinate_names=shoulder_elv_l
          coupled_coordinates_function f5_l:
            natCubicSpline f5_l: x=(0 2.617994) y=(0 -0.1282817)
        CoordinateCouplerConstraint acromioclavicular_r3_con_l: dependent_coordinate_name=acromioclavicular_r3_l
            independent_coordinate_names=shoulder_elv_l
          coupled_coordinates_function f6_l:
            natCubicSpline f6_l: x=(0 2.617994) y=(0 1.036726)
        CoordinateCouplerConstraint unrothum_r1_con_l: dependent_coordinate_name=unrothum_r1_l
            independent_coordinate_names=shoulder_elv_l
          coupled_coordinates_function f7_l:
            natCubicSpline f7_l: x=(0 2.617994) y=(0 -0.4660029)
        CoordinateCouplerConstraint unrothum_r2_con_l: dependent_coordinate_name=unrothum_r2_l
            independent_coordinate_names=shoulder_elv_l
          coupled_coordinates_function f8_l:
            natCubicSpline f8_l: x=(0 2.617994) y=(0 0.1282817)
        CoordinateCouplerConstraint unrothum_r3_con_l: dependent_coordinate_name=unrothum_r3_l
            independent_coordinate_names=shoulder_elv_l
          coupled_coordinates_function f9_l:
            natCubicSpline f9_l: x=(0 2.617994) y=(0 -1.036726)
        CoordinateCouplerConstraint shoulder1_r2_con_l: dependent_coordinate_name=shoulder1_r2_l
            independent_coordinate_names=elv_angle_l
          coupled_coordinates_function f11_l:
            natCubicSpline f11_l: x=(-1.570796 3.141593) y=(1.570796 -3.141593)
        CoordinateCouplerConstraint proximal_distal_r1_con_l: dependent_coordinate_name=proximal_distal_r1_l
            independent_coordinate_names=deviation_l
          coupled_coordinates_function f18_l:
            natCubicSpline f18_l: x=(-0.1745329 0 0.4363323) y=(-0.2617994 0 0.4363323)
        CoordinateCouplerConstraint proximal_distal_r3_con_l: dependent_coordinate_name=proximal_distal_r3_l
            independent_coordinate_names=flexion_l
          coupled_coordinates_function f19_l:
            natCubicSpline f19_l: x=(-1.22173 1.22173) y=(-0.6108652 0.6108652)
        CoordinateCouplerConstraint bicpt_tx_con_l: dependent_coordinate_name=bicpt_tx_l
            independent_coordinate_names=elbow_flexion_l
          coupled_coordinates_function f70_l:
            natCubicSpline f70_l: x=(0 2.268928) y=(-0.0001 0.0042)
        CoordinateCouplerConstraint bicpt_ty_con_l: dependent_coordinate_name=bicpt_ty_l
            independent_coordinate_names=elbow_flexion_l
          coupled_coordinates_function f71_l:
            natCubicSpline f71_l: x=(0 2.268928) y=(-0.0276 -0.0425)
        CoordinateCouplerConstraint bicpt_tz_con_l: dependent_coordinate_name=bicpt_tz_l
            independent_coordinate_names=elbow_flexion_l
          coupled_coordinates_function f72_l:
            natCubicSpline f72_l: x=(0 2.268928) y=(-0.0043 -0.0067)
        CoordinateCouplerConstraint bicpt2_tx_con_l: dependent_coordinate_name=bicpt2_tx_l
            independent_coordinate_names=pro_sup_l
          coupled_coordinates_function f80_l:
            natCubicSpline f80_l: x=(-1.570796 -0.6108652 1.578228) y=(-0.003 0.01 0.01376)
        CoordinateCouplerConstraint bicpt2_ty_con_l: dependent_coordinate_name=bicpt2_ty_l
            independent_coordinate_names=elbow_flexion_l
          coupled_coordinates_function f81_l:
            natCubicSpline f81_l: x=(0 2.274834) y=(-0.0102 -0.045607)
        CoordinateCouplerConstraint bicpt2_tz_con_l: dependent_coordinate_name=bicpt2_tz_l
            independent_coordinate_names=pro_sup_l
          coupled_coordinates_function f82_l:
            natCubicSpline f82_l: x=(-1.570796 -0.6108652 1.575614) y=(-0.0095 -0.011533 -0.000331)
        CoordinateCouplerConstraint ptpt_tx_con_l: dependent_coordinate_name=ptpt_tx_l
            independent_coordinate_names=pro_sup_l
          coupled_coordinates_function f90_l:
            natCubicSpline f90_l: x=(-1.570796 1.570796) y=(0.0142 0.0009)
        CoordinateCouplerConstraint ptpt_ty_con_l: dependent_coordinate_name=ptpt_ty_l
            independent_coordinate_names=pro_sup_l
          coupled_coordinates_function f91_l:
            natCubicSpline f91_l: x=(-1.570796 1.570796) y=(-0.0606 -0.0692)
        CoordinateCouplerConstraint ptpt_tz_con_l: dependent_coordinate_name=ptpt_tz_l
            independent_coordinate_names=pro_sup_l
          coupled_coordinates_function f92_l:
            natCubicSpline f92_l: x=(-1.570796 1.570796) y=(0.0072 -0.0073)
        CoordinateCouplerConstraint FCUpt_tx_con_l: dependent_coordinate_name=FCUpt_tx_l
            independent_coordinate_names=pro_sup_l
          coupled_coordinates_function f100_l:
            natCubicSpline f100_l: x=(-1.570796 0 1.570796) y=(-0.0027 0.004 0.0132)
        CoordinateCouplerConstraint FCUpt_ty_con_l: dependent_coordinate_name=FCUpt_ty_l
            independent_coordinate_names=pro_sup_l
          coupled_coordinates_function f101_l:
            natCubicSpline f101_l: x=(-1.570796 0 1.570796) y=(-0.1838 -0.1841 -0.1821)
        CoordinateCouplerConstraint FCUpt_tz_con_l: dependent_coordinate_name=FCUpt_tz_l
            independent_coordinate_names=pro_sup_l
          coupled_coordinates_function f102_l:
            natCubicSpline f102_l: x=(-1.570796 0 1.570796) y=(0.0069 0.0005 0.0002)
        CoordinateCouplerConstraint EDCpt_tx_con_l: dependent_coordinate_name=EDCpt_tx_l
            independent_coordinate_names=pro_sup_l
          coupled_coordinates_function f110_l:
            natCubicSpline f110_l: x=(-1.570796 0 1.570796) y=(0.0108 0 -0.0108)
        CoordinateCouplerConstraint EDCpt_ty_con_l: dependent_coordinate_name=EDCpt_ty_l
            independent_coordinate_names=pro_sup_l
          coupled_coordinates_function f111_l:
            natCubicSpline f111_l: x=(-1.570796 0 1.570796) y=(-0.0013 0 0.0038)
        CoordinateCouplerConstraint EDCpt_tz_con_l: dependent_coordinate_name=EDCpt_tz_l
            independent_coordinate_names=pro_sup_l
          coupled_coordinates_function f112_l:
            natCubicSpline f112_l: x=(-1.570796 0 1.570796) y=(-0.0035 0 -0.00089)
        CoordinateCouplerConstraint APLpt_tx_con_l: dependent_coordinate_name=APLpt_tx_l
            independent_coordinate_names=flexion_l
          coupled_coordinates_function f120_l:
            natCubicSpline f120_l: x=(-1.22173 0 1.22173) y=(0 0 -0.0025)
        CoordinateCouplerConstraint APLpt_ty_con_l: dependent_coordinate_name=APLpt_ty_l
            independent_coordinate_names=flexion_l
          coupled_coordinates_function f121_l:
            natCubicSpline f121_l: x=(-1.22173 0 1.22173) y=(0 0 -0.001)
        CoordinateCouplerConstraint APLpt_tz_con_l: dependent_coordinate_name=APLpt_tz_l
            independent_coordinate_names=flexion_l
          coupled_coordinates_function f122_l:
            natCubicSpline f122_l: x=(-1.22173 0 1.22173) y=(0 0 -0.005)
        CoordinateCouplerConstraint FPLpt_tx_con_l: dependent_coordinate_name=FPLpt_tx_l
            independent_coordinate_names=flexion_l
          coupled_coordinates_function f130_l:
            natCubicSpline f130_l: x=(-1.22173 0 1.22173) y=(0 0 -0.0032)
        CoordinateCouplerConstraint FPLpt_ty_con_l: dependent_coordinate_name=FPLpt_ty_l
            independent_coordinate_names=flexion_l
          coupled_coordinates_function f131_l:
            natCubicSpline f131_l: x=(-1.22173 0 1.22173) y=(0 0 -0.0096)
        CoordinateCouplerConstraint FPLpt_tz_con_l: dependent_coordinate_name=FPLpt_tz_l
            independent_coordinate_names=flexion_l
          coupled_coordinates_function f132_l:
            natCubicSpline f132_l: x=(-1.22173 0 1.22173) y=(0 0 -0.0054)
        CoordinateCouplerConstraint PEC1pt2_tx_con_l: dependent_coordinate_name=PEC1pt2_tx_l
            independent_coordinate_names=shoulder_elv_l
          coupled_coordinates_function f150_l:
            natCubicSpline f150_l: x=(0 3.141593) y=(0 0.0059)
        CoordinateCouplerConstraint PEC1pt2_ty_con_l: dependent_coordinate_name=PEC1pt2_ty_l
            independent_coordinate_names=shoulder_elv_l
          coupled_coordinates_function f151_l:
            natCubicSpline f151_l: x=(0 3.141593) y=(0 0.0207)
        CoordinateCouplerConstraint PEC1pt2_tz_con_l: dependent_coordinate_name=PEC1pt2_tz_l
            independent_coordinate_names=shoulder_elv_l
          coupled_coordinates_function f152_l:
            natCubicSpline f152_l: x=(0 3.141593) y=(0 0.0144)
        CoordinateCouplerConstraint PEC1pt3_tx_con_l: dependent_coordinate_name=PEC1pt3_tx_l
            independent_coordinate_names=shoulder_elv_l
          coupled_coordinates_function f160_l:
            natCubicSpline f160_l: x=(0 3.141593) y=(0 -0.0193)
        CoordinateCouplerConstraint PEC1pt3_ty_con_l: dependent_coordinate_name=PEC1pt3_ty_l
            independent_coordinate_names=shoulder_elv_l
          coupled_coordinates_function f161_l:
            natCubicSpline f161_l: x=(0 3.141593) y=(0 0.0466)
        CoordinateCouplerConstraint PEC1pt3_tz_con_l: dependent_coordinate_name=PEC1pt3_tz_l
            independent_coordinate_names=shoulder_elv_l
          coupled_coordinates_function f162_l:
            natCubicSpline f162_l: x=(0 3.141593) y=(0 -0.0442)
        CoordinateCouplerConstraint PEC2pt2_tx_con_l: dependent_coordinate_name=PEC2pt2_tx_l
            independent_coordinate_names=shoulder_elv_l
          coupled_coordinates_function f170_l:
            natCubicSpline f170_l: x=(0 3.141593) y=(0 0.0059)
        CoordinateCouplerConstraint PEC2pt2_ty_con_l: dependent_coordinate_name=PEC2pt2_ty_l
            independent_coordinate_names=shoulder_elv_l
          coupled_coordinates_function f171_l:
            natCubicSpline f171_l: x=(0 3.141593) y=(0 0.0207)
        CoordinateCouplerConstraint PEC2pt2_tz_con_l: dependent_coordinate_name=PEC2pt2_tz_l
            independent_coordinate_names=shoulder_elv_l
          coupled_coordinates_function f172_l:
            natCubicSpline f172_l: x=(0 3.141593) y=(0 0.0144)
        CoordinateCouplerConstraint PEC2pt3_tx_con_l: dependent_coordinate_name=PEC2pt3_tx_l
            independent_coordinate_names=shoulder_elv_l
          coupled_coordinates_function f180_l:
            natCubicSpline f180_l: x=(0 3.141593) y=(0 0.0013)
        CoordinateCouplerConstraint PEC2pt3_ty_con_l: dependent_coordinate_name=PEC2pt3_ty_l
            independent_coordinate_names=shoulder_elv_l
          coupled_coordinates_function f181_l:
            natCubicSpline f181_l: x=(0 3.141593) y=(0 0.0432)
        CoordinateCouplerConstraint PEC2pt3_tz_con_l: dependent_coordinate_name=PEC2pt3_tz_l
            independent_coordinate_names=shoulder_elv_l
          coupled_coordinates_function f182_l:
            natCubicSpline f182_l: x=(0 3.141593) y=(0 -0.0227)
        CoordinateCouplerConstraint PEC3pt2_tx_con_l: dependent_coordinate_name=PEC3pt2_tx_l
            independent_coordinate_names=shoulder_elv_l
          coupled_coordinates_function f190_l:
            natCubicSpline f190_l: x=(0 0.7475172 3.141593) y=(0 0.002482 0.0059)
        CoordinateCouplerConstraint PEC3pt2_ty_con_l: dependent_coordinate_name=PEC3pt2_ty_l
            independent_coordinate_names=shoulder_elv_l
          coupled_coordinates_function f191_l:
            natCubicSpline f191_l: x=(0 3.131491) y=(0 0.011474)
        CoordinateCouplerConstraint PEC3pt2_tz_con_l: dependent_coordinate_name=PEC3pt2_tz_l
            independent_coordinate_names=shoulder_elv_l
          coupled_coordinates_function f192_l:
            natCubicSpline f192_l: x=(0 0.6230557 2.291237 3.125328) y=(0 0.009968 0.018193 0.017746)
        CoordinateCouplerConstraint PEC3pt3_tx_con_l: dependent_coordinate_name=PEC3pt3_tx_l
            independent_coordinate_names=shoulder_elv_l
          coupled_coordinates_function f200_l:
            natCubicSpline f200_l: x=(0 3.141593) y=(0 0)
        CoordinateCouplerConstraint PEC3pt3_ty_con_l: dependent_coordinate_name=PEC3pt3_ty_l
            independent_coordinate_names=shoulder_elv_l
          coupled_coordinates_function f201_l:
            natCubicSpline f201_l: x=(0.01010158 1.59605 3.141593) y=(0.000222 0.011219 0.0441)
        CoordinateCouplerConstraint PEC3pt3_tz_con_l: dependent_coordinate_name=PEC3pt3_tz_l
            independent_coordinate_names=shoulder_elv_l
          coupled_coordinates_function f202_l:
            natCubicSpline f202_l: x=(0 3.141593) y=(0 0)
        CoordinateCouplerConstraint DELT2pt2a_tx_con_l: dependent_coordinate_name=DELT2pt2a_tx_l
            independent_coordinate_names=shoulder_elv_l
          coupled_coordinates_function f210_l:
            natCubicSpline f210_l: x=(0 3.141593) y=(0 -0.0169)
        CoordinateCouplerConstraint DELT2pt2a_ty_con_l: dependent_coordinate_name=DELT2pt2a_ty_l
            independent_coordinate_names=shoulder_elv_l
          coupled_coordinates_function f211_l:
            natCubicSpline f211_l: x=(0 3.141593) y=(0 -0.0781)
        CoordinateCouplerConstraint DELT2pt2a_tz_con_l: dependent_coordinate_name=DELT2pt2a_tz_l
            independent_coordinate_names=shoulder_elv_l
          coupled_coordinates_function f212_l:
            natCubicSpline f212_l: x=(0 1.222292 3.141593) y=(0 -0.005395 -0.0363)
        CoordinateCouplerConstraint DELT2pt2_tx_con_l: dependent_coordinate_name=DELT2pt2_tx_l
            independent_coordinate_names=shoulder_rot_l
          coupled_coordinates_function f220_l:
            natCubicSpline f220_l: x=(-1.570796 -0.01015029 0.349046) y=(0.0214 0.000049 -0.020005)
        CoordinateCouplerConstraint DELT2pt2_ty_con_l: dependent_coordinate_name=DELT2pt2_ty_l
            independent_coordinate_names=shoulder_rot_l
          coupled_coordinates_function f221_l:
            natCubicSpline f221_l: x=(-1.570796 -1.181885 -0.1694821 0 0.3490659)
                y=(-0.0029 -0.002148 -0.000139 0 -0.001644)
        CoordinateCouplerConstraint DELT2pt2_tz_con_l: dependent_coordinate_name=DELT2pt2_tz_l
            independent_coordinate_names=shoulder_rot_l
          coupled_coordinates_function f222_l:
            natCubicSpline f222_l: x=(-1.570796 -0.4966612 0 0.3428927) y=(-0.0455 -0.006762 0 -0.00573)
        CoordinateCouplerConstraint LAT1pt2_tx_con_l: dependent_coordinate_name=LAT1pt2_tx_l
            independent_coordinate_names=shoulder_elv_l
          coupled_coordinates_function f230_l:
            natCubicSpline f230_l: x=(0 3.141593) y=(0 -0.0021)
        CoordinateCouplerConstraint LAT1pt2_ty_con_l: dependent_coordinate_name=LAT1pt2_ty_l
            independent_coordinate_names=shoulder_elv_l
          coupled_coordinates_function f231_l:
            natCubicSpline f231_l: x=(0 3.141593) y=(0 0.0352)
        CoordinateCouplerConstraint LAT1pt2_tz_con_l: dependent_coordinate_name=LAT1pt2_tz_l
            independent_coordinate_names=shoulder_elv_l
          coupled_coordinates_function f232_l:
            natCubicSpline f232_l: x=(0 3.141593) y=(0 -0.0144)
        CoordinateCouplerConstraint LAT1pt3_tx_con_l: dependent_coordinate_name=LAT1pt3_tx_l
            independent_coordinate_names=shoulder_elv_l
          coupled_coordinates_function f240_l:
            natCubicSpline f240_l: x=(0 3.141593) y=(0 0.0058)
        CoordinateCouplerConstraint LAT1pt3_ty_con_l: dependent_coordinate_name=LAT1pt3_ty_l
            independent_coordinate_names=shoulder_elv_l
          coupled_coordinates_function f241_l:
            natCubicSpline f241_l: x=(0 3.141593) y=(0 0.0508)
        CoordinateCouplerConstraint LAT1pt3_tz_con_l: dependent_coordinate_name=LAT1pt3_tz_l
            independent_coordinate_names=shoulder_elv_l
          coupled_coordinates_function f242_l:
            natCubicSpline f242_l: x=(0 3.141593) y=(0 -0.042)
        CoordinateCouplerConstraint LAT2pt2_tx_con_l: dependent_coordinate_name=LAT2pt2_tx_l
            independent_coordinate_names=shoulder_elv_l
          coupled_coordinates_function f250_l:
            natCubicSpline f250_l: x=(0 3.141593) y=(0 -0.0141)
        CoordinateCouplerConstraint LAT2pt2_ty_con_l: dependent_coordinate_name=LAT2pt2_ty_l
            independent_coordinate_names=shoulder_elv_l
          coupled_coordinates_function f251_l:
            natCubicSpline f251_l: x=(0 3.141593) y=(0 0.0305)
        CoordinateCouplerConstraint LAT2pt2_tz_con_l: dependent_coordinate_name=LAT2pt2_tz_l
            independent_coordinate_names=shoulder_elv_l
          coupled_coordinates_function f252_l:
            natCubicSpline f252_l: x=(0 3.141593) y=(0 -0.0129)
        CoordinateCouplerConstraint LAT2pt3_tx_con_l: dependent_coordinate_name=LAT2pt3_tx_l
            independent_coordinate_names=shoulder_elv_l
          coupled_coordinates_function f260_l:
            natCubicSpline f260_l: x=(0 3.141593) y=(0 -0.0294)
        CoordinateCouplerConstraint LAT2pt3_ty_con_l: dependent_coordinate_name=LAT2pt3_ty_l
            independent_coordinate_names=shoulder_elv_l
          coupled_coordinates_function f261_l:
            natCubicSpline f261_l: x=(0 3.141593) y=(0 0.0644)
        CoordinateCouplerConstraint LAT2pt3_tz_con_l: dependent_coordinate_name=LAT2pt3_tz_l
            independent_coordinate_names=shoulder_elv_l
          coupled_coordinates_function f262_l:
            natCubicSpline f262_l: x=(0 3.141593) y=(0 -0.0721)
        CoordinateCouplerConstraint LAT3pt2_tx_con_l: dependent_coordinate_name=LAT3pt2_tx_l
            independent_coordinate_names=shoulder_elv_l
          coupled_coordinates_function f270_l:
            natCubicSpline f270_l: x=(0 3.141593) y=(0 -0.0552)
        CoordinateCouplerConstraint LAT3pt2_ty_con_l: dependent_coordinate_name=LAT3pt2_ty_l
            independent_coordinate_names=shoulder_elv_l
          coupled_coordinates_function f271_l:
            natCubicSpline f271_l: x=(0 3.141593) y=(0 0.0341)
        CoordinateCouplerConstraint LAT3pt2_tz_con_l: dependent_coordinate_name=LAT3pt2_tz_l
            independent_coordinate_names=shoulder_elv_l
          coupled_coordinates_function f272_l:
            natCubicSpline f272_l: x=(0 3.141593) y=(0 -0.0173)
        CoordinateCouplerConstraint LAT3pt3_tx_con_l: dependent_coordinate_name=LAT3pt3_tx_l
            independent_coordinate_names=shoulder_elv_l
          coupled_coordinates_function f280_l:
            natCubicSpline f280_l: x=(0 3.141593) y=(0 -0.0366)
        CoordinateCouplerConstraint LAT3pt3_ty_con_l: dependent_coordinate_name=LAT3pt3_ty_l
            independent_coordinate_names=shoulder_elv_l
          coupled_coordinates_function f281_l:
            natCubicSpline f281_l: x=(0 3.141593) y=(0 0.0744)
        CoordinateCouplerConstraint LAT3pt3_tz_con_l: dependent_coordinate_name=LAT3pt3_tz_l
            independent_coordinate_names=shoulder_elv_l
          coupled_coordinates_function f282_l:
            natCubicSpline f282_l: x=(0 3.141593) y=(0 -0.0901)
